# OpenSim document version 40000
Model 4-segment_foot_model:
  gravity: 0 -9.80665 0
  length_units: meters
  force_units: N
  credits:
    Delp S.L., Loan J.P., Hoy M.G., Zajac F.E., Topp E.L., Rosen J.M., Thelen D.G., Anderson F.C., Seth A., Hamner S.R., D'Hondt L.
  publications:
    Notes: 3D, 23 DOF gait model created by D.G. Thelen, Univ. of Wisconsin-Madison, and Samuel Hamner, Ajay Seth, Frank C. Anderson, and Scott L. Delp, Stanford University. Lower extremity joint defintions based on Delp et al. (1990). Low back joint and anthropometry based on Anderson and Pandy (1999, 2001). Planar knee model of Yamaguchi and Zajac (1989). Seth removed the patella to avoid kinematic constraints; insertions of the quadrucepts are handled with moving points in the tibia frame. Hamner added arms adapted from Holzbaur et al., 2005. D'Hondt updated foot model, and added midtarsal and tarsometatarsal joints, foot ligaments and FDB muscle; foot joints and ligaments adapted from Malaquias et al. (2017). D’Hondt, L., Groote, F.D., Afschrift, M.: A dynamic foot model for predictive simulations of gait reveals causal relations between foot structure and whole body mechanics. PLOS Computational Biology, 2024. Malaquias, T.M., Silveira, C., Aerts, W., De Groote, F., Dereymaeker, G., Vander Sloten, J., Jonkers, I: Extended foot-ankle musculoskeletal models for application in movement analysis. Comput. Methods Biomech. Biomed. Engin., 2017. Hamner, S.R., Seth, A, Delp, S.L.: Muscle contributions to propulsion and support during running. Journal of Biomechanics, 2010. Delp, S.L., Loan, J.P., Hoy, M.G., Zajac, F.E., Topp E.L., Rosen, J.M.: An interactive graphics-based model of the lower extremity to study orthopaedic surgical procedures, IEEE Transactions on Biomedical Engineering, vol. 37, pp. 757-767, 1990. Yamaguchi G.T., Zajac F.E.: A planar model of the knee joint to characterize the knee extensor mechanism." J . Biomech. vol. 21. pp. 1-10. 1989. Anderson F.C., Pandy M.G.: A dynamic optimization solution for vertical jumping in three dimensions. Computer Methods in Biomechanics and Biomedical Engineering 2:201-231, 1999. Anderson F.C., Pandy M.G.: Dynamic optimization of human walking. Journal of Biomechanical Engineering 123:381-390, 2001. Holzbaur, KR, WM Murray and SL Delp, 2005. A model of the upper extremity for simulating musculoskeletal surgery and analyzing neuromuscular control. Ann Biomed Eng 33(6): 829-840.
  Ground
  BodySet:
    Body pelvis: mass=9.550021 [kg] mass_center=(-0.0682778 0 0) inertia=(0.08011448 0.08011448 0.04378934 0 0 0)
        meshes=(sacrum.vtp pelvis.vtp l_pelvis.vtp)
    Body femur_r: mass=7.542546 mass_center=(0 -0.1704667 0) inertia=(0.109177 0.02861922 0.1151292 0 0 0)
        meshes=femur_r.vtp
    Body tibia_r: mass=3.005646 mass_center=(0 -0.1752504 0) inertia=(0.03600213 0.003644872 0.03600213 0 0 0)
        meshes=(tibia_r.vtp fibula_r.vtp)
    Body talus_r: mass=0.1146108 mass_center=(0 0 0) inertia=(0.001561428 0.001453938 0.001561428 0 0 0)
        meshes=model_r_talus.stl
    Body calcn_r: mass=0.6123449 mass_center=(0.03570389 0.007511644 -0.004421387)
        inertia=(0.0008212948 0 0.0008212948 0 0 0) meshes=model_r_calcaneus_2.stl
    Body midfoot_r: mass=0.2954572 mass_center=(0.01395438 -0.006397697 -0.00260127)
        inertia=(0.0004403065 0 0.0004403065 0 0 0) meshes=model_r_midfoot.stl
    Body forefoot_r: mass=0.4988495 mass_center=(0.03109281 -0.008181545 -0.0004746148)
        inertia=(0.001090012 0.001053793 0.001053793 0 0 0) meshes=model_r_forefoot.stl
      WrapCylinder MetatarsalHead_r: translation=(0.065 -0.015 -0.02) quadrant=-y radius=0.0095 length=0.05
    Body toes_r: mass=0.2742298 mass_center=(0.03543282 0.007087905 -0.0200725)
        inertia=(0.0001805888 0.0002445255 0.0002445255 0 0 0) meshes=model_r_toes.stl
    Body femur_l: mass=7.542546 mass_center=(0 -0.1704667 0) inertia=(0.109177 0.02861922 0.1151292 0 0 0)
        meshes=femur_l.vtp
    Body tibia_l: mass=3.005646 mass_center=(0 -0.1752504 0) inertia=(0.03600213 0.003644872 0.03600213 0 0 0)
        meshes=(tibia_l.vtp fibula_l.vtp)
    Body talus_l: mass=0.1146108 mass_center=(0 0 0) inertia=(0.001561428 0.001453938 0.001561428 0 0 0)
        meshes=model_l_talus.stl
    Body calcn_l: mass=0.6123449 mass_center=(0.03570389 0.007511644 0.004421387)
        inertia=(0.0008212948 0 0.0008212948 0 0 0) meshes=model_l_calcaneus_2.stl
    Body midfoot_l: mass=0.2954572 mass_center=(0.01395438 -0.006397697 0.00260127)
        inertia=(0.0004403065 0 0.0004403065 0 0 0) meshes=model_l_midfoot.stl
    Body forefoot_l: mass=0.4988495 mass_center=(0.03109281 -0.008181545 0.0004746148)
        inertia=(0.001090012 0.001053793 0.001053793 0 0 0) meshes=model_l_forefoot.stl
      WrapCylinder MetatarsalHead_l: translation=(0.065 -0.015 0.02) quadrant=-y radius=0.0095 length=0.05
    Body toes_l: mass=0.2742298 mass_center=(0.03543282 0.007087905 0.0200725)
        inertia=(0.0001805888 0.0002445255 0.0002445255 0 0 0) meshes=model_l_toes.stl
    Body torso: mass=21.75381 mass_center=(-0.02676027 0.3065051 0) inertia=(1.059662 0.4874639 1.059662 0 0 0)
        meshes=(hat_spine.vtp hat_jaw.vtp hat_skull.vtp hat_ribs_scap.vtp)
    Body humerus_r: mass=1.648163 mass_center=(0 -0.1690334 0) inertia=(0.0102281 0.003528378 0.01148071 0 0 0)
        meshes=humerus_rv.vtp
    Body ulna_r: mass=0.4926244 mass_center=(0 -0.1169315 0) inertia=(0.002260806 0.0004717009 0.002452387 0 0 0)
        meshes=ulna_rv.vtp
    Body radius_r: mass=0.4926244 mass_center=(0 -0.1169315 0) inertia=(0.002260806 0.0004717009 0.002452387 0 0 0)
        meshes=radius_rv.vtp
    Body hand_r: mass=0.3709888 mass_center=(0 -0.06606471 0) inertia=(0.000680837 0.0004175088 0.001022782 0 0 0)
        meshes=(pisiform_rvs.vtp lunate_rvs.vtp scaphoid_rvs.vtp triquetrum_rvs.vtp hamate_rvs.vtp capitate_rvs.vtp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)
    Body humerus_l: mass=1.648163 mass_center=(0 -0.1690334 0) inertia=(0.0102281 0.003528378 0.01148071 0 0 0)
        meshes=humerus_lv.vtp
    Body ulna_l: mass=0.4926244 mass_center=(0 -0.1169315 0) inertia=(0.002260806 0.0004717009 0.002452387 0 0 0)
        meshes=ulna_lv.vtp
    Body radius_l: mass=0.4926244 mass_center=(0 -0.1169315 0) inertia=(0.002260806 0.0004717009 0.002452387 0 0 0)
        meshes=radius_lv.vtp
    Body hand_l: mass=0.3709888 mass_center=(0 -0.06606471 0) inertia=(0.000680837 0.0004175088 0.001022782 0 0 0)
        meshes=(pisiform_lvs.vtp lunate_lvs.vtp scaphoid_lvs.vtp triquetrum_lvs.vtp hamate_lvs.vtp capitate_lvs.vtp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)
  JointSet:
    CustomJoint ground_pelvis: socket_parent_frame=ground_offset socket_child_frame=pelvis_offset
      Coordinate pelvis_tilt: default_value=0 range=(-1.570796 1.570796) clamped=true
      Coordinate pelvis_list: default_value=0 range=(-1.570796 1.570796) clamped=true
      Coordinate pelvis_rotation: default_value=0 range=(-1.570796 1.570796) clamped=true
      Coordinate pelvis_tx: default_value=0 range=(-5 5) clamped=true
      Coordinate pelvis_ty: default_value=0 range=(-1 2) clamped=true
      Coordinate pelvis_tz: default_value=0 range=(-3 3) clamped=true
      PhysicalOffsetFrame ground_offset: socket_parent=/ground translation=(0 0 0) [meters]
      PhysicalOffsetFrame pelvis_offset: socket_parent=/bodyset/pelvis translation=(0 0 0)
      SpatialTransform:
        TransformAxis rotation1: coordinates=pelvis_tilt axis=(0 0 1) LinearFunction(coefficients=1 0)
        TransformAxis rotation2: coordinates=pelvis_list axis=(1 0 0) LinearFunction(coefficients=1 0)
        TransformAxis rotation3: coordinates=pelvis_rotation axis=(0 1 0) LinearFunction(coefficients=1 0)
        TransformAxis translation1: coordinates=pelvis_tx axis=(1 0 0) LinearFunction(coefficients=1 0)
        TransformAxis translation2: coordinates=pelvis_ty axis=(0 1 0) LinearFunction(coefficients=1 0)
        TransformAxis translation3: coordinates=pelvis_tz axis=(0 0 1) LinearFunction(coefficients=1 0)
    CustomJoint hip_r: socket_parent_frame=pelvis_offset socket_child_frame=femur_r_offset
      Coordinate hip_flexion_r: default_value=0 range=(-0.8727 0.8727) clamped=true
      Coordinate hip_adduction_r: default_value=0 range=(-0.5236 0.5236) clamped=true
      Coordinate hip_rotation_r: default_value=0 range=(-0.5236 0.5236) clamped=true
      PhysicalOffsetFrame pelvis_offset: socket_parent=/bodyset/pelvis translation=(-0.0682778 -0.0638354 0.08233069)
      PhysicalOffsetFrame femur_r_offset: socket_parent=/bodyset/femur_r translation=(0 0 0)
      SpatialTransform: axes_held_at_zero=(translation1 translation2 translation3)
        TransformAxis rotation1: coordinates=hip_flexion_r axis=(0 0 1) LinearFunction(coefficients=1 0)
        TransformAxis rotation2: coordinates=hip_adduction_r axis=(1 0 0) LinearFunction(coefficients=1 0)
        TransformAxis rotation3: coordinates=hip_rotation_r axis=(0 1 0) LinearFunction(coefficients=1 0)
    CustomJoint knee_r: socket_parent_frame=femur_r_offset socket_child_frame=tibia_r_offset
      Coordinate knee_angle_r: default_value=0 range=(-2.094395 0.1745329) clamped=true
      PhysicalOffsetFrame femur_r_offset: socket_parent=/bodyset/femur_r translation=(0 0 0)
      PhysicalOffsetFrame tibia_r_offset: socket_parent=/bodyset/tibia_r translation=(0 0 0)
      SpatialTransform: axes_held_at_zero=(rotation2 rotation3 translation3)
        TransformAxis rotation1: coordinates=knee_angle_r axis=(0 0 1) LinearFunction(coefficients=1 0)
        TransformAxis translation1: coordinates=knee_angle_r axis=(1 0 0)
          PolynomialFunction: coefficients=(0.003147986 0.00299342 -0.007857711 -0.004023472)
        TransformAxis translation2: coordinates=knee_angle_r axis=(0 1 0)
            PolynomialFunction(coefficients=-0.003682036 0.005244919 -0.3956505)
    CustomJoint ankle_r: socket_parent_frame=tibia_r_offset socket_child_frame=talus_r_offset
      Coordinate ankle_angle_r: default_value=0 range=(-0.5236 0.5236) clamped=true
      PhysicalOffsetFrame tibia_r_offset: socket_parent=/bodyset/tibia_r translation=(0 -0.4036298 0)
      PhysicalOffsetFrame talus_r_offset: socket_parent=/bodyset/talus_r translation=(0 0 0)
      SpatialTransform: axes_held_at_zero=(rotation2 rotation3 translation1 translation2 translation3)
        TransformAxis rotation1: coordinates=ankle_angle_r axis=(-0.1050135 -0.1740224 0.9791263)
            LinearFunction(coefficients=1 0)
    CustomJoint subtalar_r: socket_parent_frame=talus_r_offset socket_child_frame=calcn_r_offset
      Coordinate subtalar_angle_r: default_value=0 range=(-0.5236 0.5236) clamped=true
      PhysicalOffsetFrame talus_r_offset: socket_parent=/bodyset/talus_r
          translation=(-0.04395062 -0.05996309 0.007903289)
      PhysicalOffsetFrame calcn_r_offset: socket_parent=/bodyset/calcn_r translation=(0 0 0)
      SpatialTransform: axes_held_at_zero=(rotation2 rotation3 translation1 translation2 translation3)
        TransformAxis rotation1: coordinates=subtalar_angle_r axis=(0.7871796 0.6047475 -0.1209495)
            LinearFunction(coefficients=1 0)
    CustomJoint midtarsal_r: socket_parent_frame=calcn_r_offset socket_child_frame=midfoot_r_offset
      Coordinate mtj_angle_r: default_value=0 range=(-1.570796 1.570796) clamped=false
      PhysicalOffsetFrame calcn_r_offset: socket_parent=/bodyset/calcn_r
          translation=(0.07723074 0.02919002 -0.007434893)
      PhysicalOffsetFrame midfoot_r_offset: socket_parent=/bodyset/midfoot_r translation=(0 0 0)
      SpatialTransform: axes_held_at_zero=(rotation2 rotation3 translation1 translation2 translation3)
        TransformAxis rotation1: coordinates=mtj_angle_r axis=(-0.2258 -0.4041 0.8864) LinearFunction(coefficients=1 0)
    WeldJoint tarsometatarsal_r: socket_parent_frame=midfoot_r_offset socket_child_frame=forefoot_r_offset
      PhysicalOffsetFrame midfoot_r_offset: socket_parent=/bodyset/midfoot_r
          translation=(0.02300583 -0.01558453 0.005244348)
      PhysicalOffsetFrame forefoot_r_offset: socket_parent=/bodyset/forefoot_r translation=(0 0 0)
    CustomJoint mtp_r: socket_parent_frame=forefoot_r_offset socket_child_frame=toes_r_offset
      Coordinate mtp_angle_r: default_value=0 range=(-0.3491 0.8727) clamped=false
      PhysicalOffsetFrame forefoot_r_offset: socket_parent=/bodyset/forefoot_r
          translation=(0.06194209 -0.01664216 0.003289906)
      PhysicalOffsetFrame toes_r_offset: socket_parent=/bodyset/toes_r translation=(0 0 0)
      SpatialTransform: axes_held_at_zero=(rotation2 rotation3 translation1 translation2 translation3)
        TransformAxis rotation1: coordinates=mtp_angle_r axis=(-0.282997 0.0424223 0.958182)
            LinearFunction(coefficients=1 0)
    CustomJoint hip_l: socket_parent_frame=pelvis_offset socket_child_frame=femur_l_offset
      Coordinate hip_flexion_l: default_value=0 range=(-0.8727 0.8727) clamped=true
      Coordinate hip_adduction_l: default_value=0 range=(-0.5236 0.5236) clamped=true
      Coordinate hip_rotation_l: default_value=0 range=(-0.5236 0.5236) clamped=true
      PhysicalOffsetFrame pelvis_offset: socket_parent=/bodyset/pelvis translation=(-0.0682778 -0.0638354 -0.08233069)
      PhysicalOffsetFrame femur_l_offset: socket_parent=/bodyset/femur_l translation=(0 0 0)
      SpatialTransform: axes_held_at_zero=(translation1 translation2 translation3)
        TransformAxis rotation1: coordinates=hip_flexion_l axis=(0 0 1) LinearFunction(coefficients=1 0)
        TransformAxis rotation2: coordinates=hip_adduction_l axis=(-1 0 0) LinearFunction(coefficients=1 0)
        TransformAxis rotation3: coordinates=hip_rotation_l axis=(0 -1 0) LinearFunction(coefficients=1 0)
    CustomJoint knee_l: socket_parent_frame=femur_l_offset socket_child_frame=tibia_l_offset
      Coordinate knee_angle_l: default_value=0 range=(-2.094395 0.1745329) clamped=true
      PhysicalOffsetFrame femur_l_offset: socket_parent=/bodyset/femur_l translation=(0 0 0)
      PhysicalOffsetFrame tibia_l_offset: socket_parent=/bodyset/tibia_l translation=(0 0 0)
      SpatialTransform: axes_held_at_zero=(rotation2 rotation3 translation3)
        TransformAxis rotation1: coordinates=knee_angle_l axis=(0 0 1) LinearFunction(coefficients=1 0)
        TransformAxis translation1: coordinates=knee_angle_l axis=(1 0 0)
          PolynomialFunction: coefficients=(0.003147986 0.00299342 -0.007857711 -0.004023472)
        TransformAxis translation2: coordinates=knee_angle_l axis=(0 1 0)
            PolynomialFunction(coefficients=-0.003682036 0.005244919 -0.3956505)
    CustomJoint ankle_l: socket_parent_frame=tibia_l_offset socket_child_frame=talus_l_offset
      Coordinate ankle_angle_l: default_value=0 range=(-0.5236 0.5236) clamped=true
      PhysicalOffsetFrame tibia_l_offset: socket_parent=/bodyset/tibia_l translation=(0 -0.4036298 0)
      PhysicalOffsetFrame talus_l_offset: socket_parent=/bodyset/talus_l translation=(0 0 0)
      SpatialTransform: axes_held_at_zero=(rotation2 rotation3 translation1 translation2 translation3)
        TransformAxis rotation1: coordinates=ankle_angle_l axis=(0.1050135 0.1740224 0.9791263)
            LinearFunction(coefficients=1 0)
    CustomJoint subtalar_l: socket_parent_frame=talus_l_offset socket_child_frame=calcn_l_offset
      Coordinate subtalar_angle_l: default_value=0 range=(-0.5236 0.5236) clamped=true
      PhysicalOffsetFrame talus_l_offset: socket_parent=/bodyset/talus_l
          translation=(-0.04395062 -0.05996309 -0.007903289)
      PhysicalOffsetFrame calcn_l_offset: socket_parent=/bodyset/calcn_l translation=(0 0 0)
      SpatialTransform: axes_held_at_zero=(rotation2 rotation3 translation1 translation2 translation3)
        TransformAxis rotation1: coordinates=subtalar_angle_l axis=(-0.7871796 -0.6047475 -0.1209495)
            LinearFunction(coefficients=1 0)
    CustomJoint midtarsal_l: socket_parent_frame=calcn_l_offset socket_child_frame=midfoot_l_offset
      Coordinate mtj_angle_l: default_value=0 range=(-1.570796 1.570796) clamped=false
      PhysicalOffsetFrame calcn_l_offset: socket_parent=/bodyset/calcn_l
          translation=(0.07723074 0.02919002 0.007434893)
      PhysicalOffsetFrame midfoot_l_offset: socket_parent=/bodyset/midfoot_l translation=(0 0 0)
      SpatialTransform: axes_held_at_zero=(rotation2 rotation3 translation1 translation2 translation3)
        TransformAxis rotation1: coordinates=mtj_angle_l axis=(0.2258 0.4041 0.8864) LinearFunction(coefficients=1 0)
    WeldJoint tarsometatarsal_l: socket_parent_frame=midfoot_l_offset socket_child_frame=forefoot_l_offset
      PhysicalOffsetFrame midfoot_l_offset: socket_parent=/bodyset/midfoot_l
          translation=(0.02300583 -0.01558453 -0.005244348)
      PhysicalOffsetFrame forefoot_l_offset: socket_parent=/bodyset/forefoot_l translation=(0 0 0)
    CustomJoint mtp_l: socket_parent_frame=forefoot_l_offset socket_child_frame=toes_l_offset
      Coordinate mtp_angle_l: default_value=0 range=(-0.3491 0.8727) clamped=false
      PhysicalOffsetFrame forefoot_l_offset: socket_parent=/bodyset/forefoot_l
          translation=(0.06194209 -0.01664216 -0.003289906)
      PhysicalOffsetFrame toes_l_offset: socket_parent=/bodyset/toes_l translation=(0 0 0)
      SpatialTransform: axes_held_at_zero=(rotation2 rotation3 translation1 translation2 translation3)
        TransformAxis rotation1: coordinates=mtp_angle_l axis=(0.282997 -0.0424223 0.958182)
            LinearFunction(coefficients=1 0)
    CustomJoint back: socket_parent_frame=pelvis_offset socket_child_frame=torso_offset
      Coordinate lumbar_extension: default_value=0 range=(-0.5236 0.5236) clamped=true
      Coordinate lumbar_bending: default_value=0 range=(-0.5236 0.5236) clamped=true
      Coordinate lumbar_rotation: default_value=0 range=(-0.5236 0.5236) clamped=true
      PhysicalOffsetFrame pelvis_offset: socket_parent=/bodyset/pelvis translation=(-0.09724999 0.07870779 0)
      PhysicalOffsetFrame torso_offset: socket_parent=/bodyset/torso translation=(0 0 0)
      SpatialTransform: axes_held_at_zero=(translation1 translation2 translation3)
        TransformAxis rotation1: coordinates=lumbar_extension axis=(0 0 1) LinearFunction(coefficients=1 0)
        TransformAxis rotation2: coordinates=lumbar_bending axis=(1 0 0) LinearFunction(coefficients=1 0)
        TransformAxis rotation3: coordinates=lumbar_rotation axis=(0 1 0) LinearFunction(coefficients=1 0)
    CustomJoint acromial_r: socket_parent_frame=torso_offset socket_child_frame=humerus_r_offset
      Coordinate arm_flex_r: default_value=0 range=(-1.570796 1.570796) clamped=true
      Coordinate arm_add_r: default_value=0 range=(-2.094395 1.570796) clamped=true
      Coordinate arm_rot_r: default_value=0 range=(-1.570796 1.570796) clamped=true
      PhysicalOffsetFrame torso_offset: socket_parent=/bodyset/torso translation=(0.002814288 0.3558333 0.1516415)
      PhysicalOffsetFrame humerus_r_offset: socket_parent=/bodyset/humerus_r translation=(0 0 0)
      SpatialTransform: axes_held_at_zero=(translation1 translation2 translation3)
        TransformAxis rotation1: coordinates=arm_flex_r axis=(0 0 1) LinearFunction(coefficients=1 0)
        TransformAxis rotation2: coordinates=arm_add_r axis=(1 0 0) LinearFunction(coefficients=1 0)
        TransformAxis rotation3: coordinates=arm_rot_r axis=(0 1 0) LinearFunction(coefficients=1 0)
    CustomJoint elbow_r: socket_parent_frame=humerus_r_offset socket_child_frame=ulna_r_offset
      Coordinate elbow_flex_r: default_value=0 range=(0 2.618) clamped=true
      PhysicalOffsetFrame humerus_r_offset: socket_parent=/bodyset/humerus_r
          translation=(0.01350607 -0.2941588 -0.009859307)
      PhysicalOffsetFrame ulna_r_offset: socket_parent=/bodyset/ulna_r translation=(0 0 0)
      SpatialTransform: axes_held_at_zero=(rotation2 rotation3 translation1 translation2 translation3)
        TransformAxis rotation1: coordinates=elbow_flex_r axis=(0.226047 0.022269 0.9738618)
            LinearFunction(coefficients=1 0)
    WeldJoint radioulnar_r: socket_parent_frame=ulna_r_offset socket_child_frame=radius_r_offset
      PhysicalOffsetFrame ulna_r_offset: socket_parent=/bodyset/ulna_r
          translation=(-0.006526431 -0.01261919 0.02530532) orientation=(0 1.570796 0) [radians]
      PhysicalOffsetFrame radius_r_offset: socket_parent=/bodyset/radius_r translation=(0 0 0)
    WeldJoint radius_hand_r: socket_parent_frame=radius_r_offset socket_child_frame=hand_r_offset
      PhysicalOffsetFrame radius_r_offset: socket_parent=/bodyset/radius_r
          translation=(-0.008534713 -0.2288093 0.01320421)
      PhysicalOffsetFrame hand_r_offset: socket_parent=/bodyset/hand_r translation=(0 0 0)
    CustomJoint acromial_l: socket_parent_frame=torso_offset socket_child_frame=humerus_l_offset
      Coordinate arm_flex_l: default_value=0 range=(-1.570796 1.570796) clamped=true
      Coordinate arm_add_l: default_value=0 range=(-2.094395 1.570796) clamped=true
      Coordinate arm_rot_l: default_value=0 range=(-1.570796 1.570796) clamped=true
      PhysicalOffsetFrame torso_offset: socket_parent=/bodyset/torso translation=(0.002814288 0.3558333 -0.1516415)
      PhysicalOffsetFrame humerus_l_offset: socket_parent=/bodyset/humerus_l translation=(0 0 0)
      SpatialTransform: axes_held_at_zero=(translation1 translation2 translation3)
        TransformAxis rotation1: coordinates=arm_flex_l axis=(0 0 1) LinearFunction(coefficients=1 0)
        TransformAxis rotation2: coordinates=arm_add_l axis=(-1 0 0) LinearFunction(coefficients=1 0)
        TransformAxis rotation3: coordinates=arm_rot_l axis=(0 -1 0) LinearFunction(coefficients=1 0)
    CustomJoint elbow_l: socket_parent_frame=humerus_l_offset socket_child_frame=ulna_l_offset
      Coordinate elbow_flex_l: default_value=0 range=(0 2.618) clamped=true
      PhysicalOffsetFrame humerus_l_offset: socket_parent=/bodyset/humerus_l
          translation=(0.01350607 -0.2941588 0.009859307)
      PhysicalOffsetFrame ulna_l_offset: socket_parent=/bodyset/ulna_l translation=(0 0 0)
      SpatialTransform: axes_held_at_zero=(rotation2 rotation3 translation1 translation2 translation3)
        TransformAxis rotation1: coordinates=elbow_flex_l axis=(-0.226047 -0.022269 0.9738618)
            LinearFunction(coefficients=1 0)
    WeldJoint radioulnar_l: socket_parent_frame=ulna_l_offset socket_child_frame=radius_l_offset
      PhysicalOffsetFrame ulna_l_offset: socket_parent=/bodyset/ulna_l
          translation=(-0.006526431 -0.01261919 -0.02530532) orientation=(0 -1.570796 0)
      PhysicalOffsetFrame radius_l_offset: socket_parent=/bodyset/radius_l translation=(0 0 0)
    WeldJoint radius_hand_l: socket_parent_frame=radius_l_offset socket_child_frame=hand_l_offset
      PhysicalOffsetFrame radius_l_offset: socket_parent=/bodyset/radius_l
          translation=(-0.008534713 -0.2288093 -0.01320421)
      PhysicalOffsetFrame hand_l_offset: socket_parent=/bodyset/hand_l translation=(0 0 0)
  ForceSet:
    Thelen2003Muscle [values shared by the 94 below unless stated]: FmaxTendonStrain=0.033 FmaxMuscleStrain=0.6
        KshapeActive=0.5 KshapePassive=4 Af=0.3 Flen=1.8 activation_time_constant=0.01 [seconds]
        deactivation_time_constant=0.04 [seconds]
    Thelen2003Muscle glut_med1_r: max_isometric_force=819 optimal_fiber_length=0.05207765
        tendon_slack_length=0.07592629 pennation_angle_at_optimal=0.1396263 [radians]
      PathPoint P1: pelvis (-0.03940218 0.02935849 0.119207)
      PathPoint P2: femur_r (-0.02185984 -0.01173212 0.05565235)
    Thelen2003Muscle glut_med2_r: max_isometric_force=573 optimal_fiber_length=0.08239993 tendon_slack_length=0.0516828
        pennation_angle_at_optimal=0
      PathPoint P1: pelvis (-0.08257075 0.04297542 0.07552732)
      PathPoint P2: femur_r (-0.02587082 -0.005815921 0.05284466)
    Thelen2003Muscle glut_med3_r: max_isometric_force=653 optimal_fiber_length=0.06321903
        tendon_slack_length=0.05186701 pennation_angle_at_optimal=0.3316126
      PathPoint P1: pelvis (-0.11811 0.01014027 0.06389256)
      PathPoint P2: femur_r (-0.03098482 -0.004712902 0.05194219)
    Thelen2003Muscle glut_min1_r: max_isometric_force=270 optimal_fiber_length=0.06657439
        tendon_slack_length=0.01566456 pennation_angle_at_optimal=0.1745329
      PathPoint P1: pelvis (-0.04510005 -0.007725918 0.1041212)
      PathPoint P2: femur_r (-0.007219764 -0.01042855 0.05615372)
    Thelen2003Muscle glut_min2_r: max_isometric_force=285 optimal_fiber_length=0.05494212
        tendon_slack_length=0.02550884 pennation_angle_at_optimal=0
      PathPoint P1: pelvis (-0.06113133 -0.006277308 0.09771224)
      PathPoint P2: femur_r (-0.009626352 -0.01042855 0.05615372)
    Thelen2003Muscle glut_min3_r: max_isometric_force=323 optimal_fiber_length=0.03735129
        tendon_slack_length=0.05012937 pennation_angle_at_optimal=0.01745329
      PathPoint P1: pelvis (-0.08054269 -0.00608416 0.08440129)
      PathPoint P2: femur_r (-0.01353706 -0.008322784 0.05515098)
    Thelen2003Muscle semimem_r: max_isometric_force=1288 optimal_fiber_length=0.07982465 tendon_slack_length=0.3582131
        pennation_angle_at_optimal=0.2617994
      PathPoint P1: pelvis (-0.1151162 -0.09413065 0.0705086)
      ConditionalPathPoint P2: tibia_r (-0.03267435 -0.03303194 -0.01775494)
          socket_coordinate=/jointset/knee_r/knee_angle_r range=(-0.5585054 0.1745329) [radians]
      PathPoint P3: tibia_r (-0.02535079 -0.04478413 -0.01837463)
    Thelen2003Muscle semiten_r: max_isometric_force=410 optimal_fiber_length=0.1991751 tendon_slack_length=0.2531803
        pennation_angle_at_optimal=0.08726646
      PathPoint P1: pelvis (-0.1220212 -0.1061155 0.05954432)
      ConditionalPathPoint P2: tibia_r (-0.03946273 -0.02683669 -0.02137916)
          socket_coordinate=/jointset/knee_r/knee_angle_r range=(-0.3316126 0.1745329)
      PathPoint P3: tibia_r (-0.03119086 -0.04958076 -0.02148245)
      PathPoint P4: tibia_r (-0.01060977 -0.07002508 -0.02300349)
      PathPoint P5: tibia_r (0.002535079 -0.08973723 -0.01812112)
    Thelen2003Muscle bifemlh_r: max_isometric_force=896 optimal_fiber_length=0.1086278 tendon_slack_length=0.3248867
        pennation_angle_at_optimal=0
      PathPoint P1: pelvis (-0.1216446 -0.09905593 0.06846759)
      PathPoint P2: tibia_r (-0.02826143 -0.03379226 0.02763236)
      PathPoint P3: tibia_r (-0.02197068 -0.05284734 0.03220489)
    Thelen2003Muscle bifemsh_r: max_isometric_force=804 optimal_fiber_length=0.1706238 tendon_slack_length=0.08777758
        pennation_angle_at_optimal=0.4014257
      PathPoint P1: femur_r (0.005013725 -0.2116795 0.02346423)
      PathPoint P2: tibia_r (-0.02826143 -0.03379226 0.02763236)
      PathPoint P3: tibia_r (-0.02197068 -0.05284734 0.03220489)
    Thelen2003Muscle sar_r: max_isometric_force=156 optimal_fiber_length=0.5133807 tendon_slack_length=0.09872706
        pennation_angle_at_optimal=0
      PathPoint P1: pelvis (-0.01477582 -0.001255462 0.1224607)
      PathPoint P2: femur_r (-0.003008235 -0.3577794 -0.04221557)
      PathPoint P3: tibia_r (-0.005257941 -0.03933044 -0.03746283)
      PathPoint P4: tibia_r (0.005633508 -0.0552879 -0.03596056)
      PathPoint P5: tibia_r (0.02281571 -0.07884861 -0.02366074)
    Thelen2003Muscle add_long_r: max_isometric_force=627 optimal_fiber_length=0.1383124 tendon_slack_length=0.110249
        pennation_angle_at_optimal=0.1047198
      PathPoint P1: pelvis (-0.03051738 -0.08073584 0.01666334)
      PathPoint P2: femur_r (0.005013725 -0.2116795 0.02346423)
    Thelen2003Muscle add_brev_r: max_isometric_force=429 optimal_fiber_length=0.133193 tendon_slack_length=0.02002903
        pennation_angle_at_optimal=0
      PathPoint P1: pelvis (-0.05668892 -0.08836519 0.01617034)
      PathPoint P2: femur_r (0.0009024705 -0.1199283 0.0294807)
    Thelen2003Muscle add_mag1_r: max_isometric_force=381 optimal_fiber_length=0.08753669 tendon_slack_length=0.06037013
        pennation_angle_at_optimal=0.08726646
      PathPoint P1: pelvis (-0.07069215 -0.1133778 0.02514291)
      PathPoint P2: femur_r (-0.004512353 -0.1214324 0.03399306)
    Thelen2003Muscle add_mag2_r: max_isometric_force=343 optimal_fiber_length=0.1222252 tendon_slack_length=0.1212151
        pennation_angle_at_optimal=0.05235988
      PathPoint P1: pelvis (-0.08025297 -0.1151162 0.03036869)
      PathPoint P2: femur_r (0.005414823 -0.2291272 0.02276231)
    Thelen2003Muscle add_mag3_r: max_isometric_force=488 optimal_fiber_length=0.1319552 tendon_slack_length=0.2508156
        pennation_angle_at_optimal=0.08726646
      PathPoint P1: pelvis (-0.1072744 -0.1102199 0.04813634)
      PathPoint P2: femur_r (0.007019215 -0.3847533 -0.02667302)
    Thelen2003Muscle tfl_r: max_isometric_force=233 optimal_fiber_length=0.09421785 tendon_slack_length=0.4215009
        pennation_angle_at_optimal=0.05235988
      PathPoint P1: pelvis (-0.03003451 0.02066683 0.1223621)
      PathPoint P2: femur_r (0.0294807 -0.09977313 0.05986388)
      PathPoint P3: femur_r (0.005414823 -0.4060115 0.035798)
      PathPoint P4: tibia_r (0.005633508 -0.04571342 0.02788587)
    Thelen2003Muscle pect_r: max_isometric_force=266 optimal_fiber_length=0.09978509 tendon_slack_length=0.03292908
        pennation_angle_at_optimal=0
      PathPoint P1: pelvis (-0.04162338 -0.07416881 0.04446843)
      PathPoint P2: femur_r (-0.01223349 -0.08242564 0.02536945)
    Thelen2003Muscle grac_r: max_isometric_force=162 optimal_fiber_length=0.3495844 tendon_slack_length=0.1251353
        pennation_angle_at_optimal=0.05235988
      PathPoint P1: pelvis (-0.0714744 -0.1146333 0.02754874)
      ConditionalPathPoint P2: tibia_r (-0.02494705 -0.0299437 -0.03543477)
          socket_coordinate=/jointset/knee_r/knee_angle_r range=(-0.4363323 0.1745329)
      PathPoint P3: tibia_r (-0.01824318 -0.04836987 -0.03361327)
      PathPoint P4: tibia_r (0.005633508 -0.07847314 -0.02140733)
    Thelen2003Muscle glut_max1_r: max_isometric_force=573 optimal_fiber_length=0.1389936 tendon_slack_length=0.1223535
        pennation_angle_at_optimal=0.08726646
      PathPoint P1: pelvis (-0.1154059 0.05910327 0.06901974)
      PathPoint P2: pelvis (-0.124677 0.001158888 0.08735928)
      PathPoint P3: femur_r (-0.04582545 -0.02486808 0.03930761)
      PathPoint P4: femur_r (-0.02777604 -0.05675537 0.04712902)
    Thelen2003Muscle glut_max2_r: max_isometric_force=819 optimal_fiber_length=0.1447585 tendon_slack_length=0.1250634
        pennation_angle_at_optimal=0
      PathPoint P1: pelvis (-0.1302783 0.01699702 0.05551159)
      PathPoint P2: pelvis (-0.1328858 -0.05021847 0.09012007)
      PathPoint P3: femur_r (-0.04271694 -0.05314549 0.02938043)
      PathPoint P4: femur_r (-0.01564282 -0.1018789 0.04201502)
    Thelen2003Muscle glut_max3_r: max_isometric_force=552 optimal_fiber_length=0.1421178 tendon_slack_length=0.1431047
        pennation_angle_at_optimal=0.08726646
      PathPoint P1: pelvis (-0.1502691 -0.03032423 0.005718779)
      PathPoint P2: pelvis (-0.1476616 -0.1015958 0.03973565)
      PathPoint P3: femur_r (-0.02998208 -0.1043858 0.01353706)
      PathPoint P4: femur_r (-0.00601647 -0.1422895 0.04121282)
    Thelen2003Muscle iliacus_r: max_isometric_force=1073 optimal_fiber_length=0.09767838 tendon_slack_length=0.09767838
        pennation_angle_at_optimal=0.1221731
      PathPoint P1: pelvis (-0.06509086 0.0352495 0.08420409)
      PathPoint P2: pelvis (-0.02491609 -0.05311569 0.0799643)
      ConditionalPathPoint P3: pelvis (-0.0278133 -0.07774205 0.0804573)
          socket_coordinate=/jointset/hip_r/hip_flexion_r range=(-1.570796 0.7853982)
      PathPoint P4: femur_r (0.001704667 -0.05444906 0.005715647)
      PathPoint P5: femur_r (-0.01935298 -0.06227047 0.01293541)
    Thelen2003Muscle psoas_r: max_isometric_force=1113 optimal_fiber_length=0.09749959 tendon_slack_length=0.1559993
        pennation_angle_at_optimal=0.1396263
      PathPoint P1: pelvis (-0.06248336 0.08566112 0.02849529)
      PathPoint P2: pelvis (-0.02298461 -0.05504717 0.07483712)
      ConditionalPathPoint P3: pelvis (-0.0278133 -0.07774205 0.0804573)
          socket_coordinate=/jointset/hip_r/hip_flexion_r range=(-1.570796 0.7853982)
      PathPoint P4: femur_r (0.001604392 -0.05083917 0.003810431)
      PathPoint P5: femur_r (-0.01885161 -0.05986388 0.01042855)
    Thelen2003Muscle quad_fem_r: max_isometric_force=381 optimal_fiber_length=0.0534126 tendon_slack_length=0.02373893
        pennation_angle_at_optimal=0
      PathPoint P1: pelvis (-0.1103841 -0.1111566 0.05127181)
      PathPoint P2: femur_r (-0.03820459 -0.03599855 0.03670047)
    Thelen2003Muscle gem_r: max_isometric_force=164 optimal_fiber_length=0.02370322 tendon_slack_length=0.03851773
        pennation_angle_at_optimal=0
      PathPoint P1: pelvis (-0.1094183 -0.07919066 0.07040014)
      PathPoint P2: femur_r (-0.01423898 -0.003309059 0.04442161)
    Thelen2003Muscle peri_r: max_isometric_force=444 optimal_fiber_length=0.02549223 tendon_slack_length=0.1127541
        pennation_angle_at_optimal=0.1745329
      PathPoint P1: pelvis (-0.1348173 0.0002897219 0.02317091)
      PathPoint P2: pelvis (-0.1152128 -0.02665442 0.06477996)
      PathPoint P3: femur_r (-0.01484063 -0.003609882 0.04381996)
    Thelen2003Muscle rect_fem_r: max_isometric_force=1169 optimal_fiber_length=0.114302 tendon_slack_length=0.3108213
        pennation_angle_at_optimal=0.08726646
      PathPoint P1: pelvis (-0.02848932 -0.03003451 0.09544445)
      ConditionalPathPoint P2: femur_r (0.03349168 -0.4041063 0.001905216)
          socket_coordinate=/jointset/knee_r/knee_angle_r range=(-2.617994 -1.459968)
      MovingPathPoint P3: tibia_r socket_x_coordinate=/jointset/knee_r/knee_angle_r
          socket_y_coordinate=/jointset/knee_r/knee_angle_r socket_z_coordinate=/jointset/knee_r/knee_angle_r
        x_location: MultiplierFunction: scale=0.9389181
          SimmSpline: x=(-2.0944 -1.99997 -1.5708 -1.45752 -1.39626 -1.0472 -0.698132 -0.526391 -0.349066 -0.174533 0 0.00017453 0.00034907 0.0279253 0.0872665 0.174533 2.0944)
              y=(0.0155805 0.0179938 0.0275081 0.0296564 0.0307615 0.0365695 0.0422074 0.0450902 0.048391 0.0534299 0.0617576 0.0617669 0.0617762 0.0633083 0.066994 0.0733035 0.0573481)
        y_location: MultiplierFunction: scale=0.9386739
          SimmSpline: x=(-2.0944 -1.99997 -1.5708 -1.45752 -1.39626 -1.0472 -0.698132 -0.526391 -0.349066 -0.174533 0 0.00017453 0.00034907 0.0279253 0.0872665 0.174533 2.0944)
              y=(0.0234116 0.0237613 0.0251141 0.0252795 0.0253146 0.0249184 0.0242373 0.0238447 0.0234197 0.0227644 0.020984 0.0209814 0.0209788 0.0205225 0.0191754 0.0159554 -0.0673774)
        z_location: MultiplierFunction: scale=0.9389181
          SimmSpline: x=(-2.0944 0.1745) y=(0.0014 0.0014)
    Thelen2003Muscle vas_med_r: max_isometric_force=1294 optimal_fiber_length=0.08962709 tendon_slack_length=0.1268878
        pennation_angle_at_optimal=0.08726646
      PathPoint P1: femur_r (0.01403843 -0.2104762 0.01885161)
      PathPoint P2: femur_r (0.03569772 -0.2776601 0.0009024705)
      ConditionalPathPoint P3: femur_r (0.03710157 -0.4059112 -0.01253431)
          socket_coordinate=/jointset/knee_r/knee_angle_r range=(-2.617994 -1.210037)
      ConditionalPathPoint P4: femur_r (0.02747521 -0.426668 -0.01313596)
          socket_coordinate=/jointset/knee_r/knee_angle_r range=(-2.617994 -1.780061)
      MovingPathPoint P5: tibia_r socket_x_coordinate=/jointset/knee_r/knee_angle_r
          socket_y_coordinate=/jointset/knee_r/knee_angle_r socket_z_coordinate=/jointset/knee_r/knee_angle_r
        x_location: MultiplierFunction: scale=0.9389181
          SimmSpline: x=(-2.0944 -1.99997 -1.5708 -1.45752 -1.39626 -1.0472 -0.698132 -0.526391 -0.349066 -0.174533 0 0.00017453 0.00034907 0.0279253 0.0872665 0.174533 2.0944)
              y=(0.00981097 0.0122243 0.0217371 0.0238851 0.0249902 0.0307959 0.0364187 0.0392871 0.0425654 0.0475764 0.0559586 0.0559681 0.0559776 0.0575419 0.0613368 0.0679503 0.0629332)
        y_location: MultiplierFunction: scale=0.9386739
          SimmSpline: x=(-2.0944 -1.99997 -1.5708 -1.45752 -1.39626 -1.0472 -0.698132 -0.526391 -0.349066 -0.174533 0 0.00017453 0.00034907 0.0279253 0.0872665 0.174533 2.0944)
              y=(0.0224154 0.0227651 0.0241265 0.0242933 0.0243287 0.0239462 0.0233593 0.0230677 0.0228342 0.0226362 0.0217917 0.0217903 0.0217889 0.0215365 0.0206842 0.0183269 -0.0656205)
        z_location: MultiplierFunction: scale=0.9389181
          SimmSpline: x=(-2.0944 2.0944) y=(-0.0146 -0.0146)
    Thelen2003Muscle vas_int_r: max_isometric_force=1365 optimal_fiber_length=0.08785447 tendon_slack_length=0.1373357
        pennation_angle_at_optimal=0.05235988
      PathPoint P1: femur_r (0.02907961 -0.1929281 0.0310851)
      PathPoint P2: femur_r (0.03359196 -0.2089721 0.02857823)
      ConditionalPathPoint P3: femur_r (0.03439416 -0.4041063 0.005515098)
          socket_coordinate=/jointset/knee_r/knee_angle_r range=(-2.617994 -1.42)
      MovingPathPoint P4: tibia_r socket_x_coordinate=/jointset/knee_r/knee_angle_r
          socket_y_coordinate=/jointset/knee_r/knee_angle_r socket_z_coordinate=/jointset/knee_r/knee_angle_r
        x_location: MultiplierFunction: scale=0.9389181
          SimmSpline: x=(-2.0944 -1.99997 -1.5708 -1.45752 -1.39626 -1.0472 -0.698132 -0.526391 -0.349066 -0.174533 0 0.00017453 0.00034907 0.0279253 0.0872665 0.174533 2.0944)
              y=(0.0082733 0.0106866 0.0202042 0.022353 0.0234583 0.0292715 0.0349465 0.037871 0.0412569 0.0465287 0.0554632 0.0554735 0.0554837 0.0571717 0.061272 0.0684368 0.0648818)
        y_location: MultiplierFunction: scale=0.9386739
          SimmSpline: x=(-2.0944 -1.99997 -1.5708 -1.45752 -1.39626 -1.0472 -0.698132 -0.526391 -0.349066 -0.174533 0 0.00017453 0.00034907 0.0279253 0.0872665 0.174533 2.0944)
              y=(0.025599 0.0259487 0.0273124 0.0274796 0.0275151 0.0271363 0.0265737 0.0263073 0.0261187 0.0260129 0.0252923 0.0252911 0.0252898 0.0250526 0.0242191 0.0218288 -0.0685706)
        z_location: MultiplierFunction: scale=0.9389181
          SimmSpline: x=(-2.0944 2.0944) y=(0.0018 0.0018)
    Thelen2003Muscle vas_lat_r: max_isometric_force=1871 optimal_fiber_length=0.08448231 tendon_slack_length=0.1579015
        pennation_angle_at_optimal=0.08726646
      PathPoint P1: femur_r (0.004813176 -0.1859089 0.0349958)
      PathPoint P2: femur_r (0.02697384 -0.2598112 0.04101227)
      ConditionalPathPoint P3: femur_r (0.0361991 -0.4041063 0.02055627)
          socket_coordinate=/jointset/knee_r/knee_angle_r range=(-2.617994 -1.210037)
      ConditionalPathPoint P4: femur_r (0.02536945 -0.4254647 0.01845051)
          socket_coordinate=/jointset/knee_r/knee_angle_r range=(-2.617994 -1.920037)
      MovingPathPoint P5: tibia_r socket_x_coordinate=/jointset/knee_r/knee_angle_r
          socket_y_coordinate=/jointset/knee_r/knee_angle_r socket_z_coordinate=/jointset/knee_r/knee_angle_r
        x_location: MultiplierFunction: scale=0.9389181
          SimmSpline: x=(-2.0944 -1.99997 -1.5708 -1.45752 -1.39626 -1.0472 -0.698132 -0.526391 -0.349066 -0.174533 0 0.00017453 0.00034907 0.0279253 0.0872665 0.174533 2.0944)
              y=(0.0142897 0.016703 0.0262145 0.0283623 0.0294674 0.0352709 0.0408785 0.0437291 0.0469704 0.0518742 0.0599557 0.0599647 0.0599738 0.0614577 0.0650351 0.0711867 0.0583766)
        y_location: MultiplierFunction: scale=0.9386739
          SimmSpline: x=(-2.0944 -1.99997 -1.5708 -1.45752 -1.39626 -1.0472 -0.698132 -0.526391 -0.349066 -0.174533 0 0.00017453 0.00034907 0.0279253 0.0872665 0.174533 2.0944)
              y=(0.0215318 0.0218815 0.0232362 0.0234019 0.0234371 0.0230439 0.0223842 0.0220151 0.0216359 0.0210971 0.0195864 0.0195842 0.019582 0.01919 0.018008 0.0151073 -0.0653421)
        z_location: MultiplierFunction: scale=0.9389181
          SimmSpline: x=(-2.0944 2.0944) y=(0.0165 0.0165)
    Thelen2003Muscle med_gas_r: max_isometric_force=1870 optimal_fiber_length=0.05709458 tendon_slack_length=0.3711148
        pennation_angle_at_optimal=0.296706
      PathPoint P1: femur_r (-0.01905216 -0.3939785 -0.02356451)
      ConditionalPathPoint P2: femur_r (-0.03008235 -0.4033041 -0.02587082)
          socket_coordinate=/jointset/knee_r/knee_angle_r range=(-0.7853982 0.1745329)
      PathPoint P3: calcn_r (0 0.04431122 -0.005288817)
    Thelen2003Muscle lat_gas_r: max_isometric_force=820 optimal_fiber_length=0.06087263 tendon_slack_length=0.3614313
        pennation_angle_at_optimal=0.1396263
      PathPoint P1: femur_r (-0.02206039 -0.3956832 0.02727467)
      ConditionalPathPoint P2: femur_r (-0.03008235 -0.402903 0.02747521)
          socket_coordinate=/jointset/knee_r/knee_angle_r range=(-0.7853982 0.1745329)
      PathPoint P3: calcn_r (0 0.04431122 -0.005288817)
    Thelen2003Muscle soleus_r: max_isometric_force=4259 optimal_fiber_length=0.04779569 tendon_slack_length=0.2389785
        pennation_angle_at_optimal=0.4363323
      PathPoint P1: tibia_r (-0.002253403 -0.1438987 0.006666318)
      PathPoint P2: calcn_r (0 0.04431122 -0.005288817)
    Thelen2003Muscle tib_post_r: max_isometric_force=1588 optimal_fiber_length=0.03007615 tendon_slack_length=0.3007615
        pennation_angle_at_optimal=0.2094395
      PathPoint P1: tibia_r (-0.00882583 -0.1265332 0.001783944)
      PathPoint P2: tibia_r (-0.01352042 -0.3802568 -0.02150122)
      PathPoint P3: calcn_r (0.03757927 0.04774177 -0.02853965)
      PathPoint P4: midfoot_r (0.0005721473 0.001013649 -0.0233426)
    Thelen2003Muscle flex_dig_r: max_isometric_force=310 optimal_fiber_length=0.03252889 tendon_slack_length=0.3826929
        pennation_angle_at_optimal=0.1221731
      PathPoint P1: tibia_r (-0.00779302 -0.1920527 -0.001690053)
      PathPoint P2: tibia_r (-0.01445934 -0.3802568 -0.01840279)
      PathPoint P3: calcn_r (0.03929151 0.04502592 -0.02794092)
      PathPoint P4: midfoot_r (-0.01342709 -0.004032687 -0.01880961)
      PathPoint P5: forefoot_r (0.04917931 -0.02518359 0.01376607)
      PathPoint P6: toes_r (-0.001712245 -0.01114927 0.01466898)
      PathPoint P7: toes_r (0.02568367 -0.0101487 0.02145463)
      PathPoint P8: toes_r (0.0397421 -0.008576365 0.02414894)
    Thelen2003Muscle flex_hal_r: max_isometric_force=322 optimal_fiber_length=0.04093934 tendon_slack_length=0.3617895
        pennation_angle_at_optimal=0.1745329
      PathPoint P1: tibia_r (-0.007417453 -0.2190865 0.0229096)
      PathPoint P2: tibia_r (-0.01746388 -0.3828851 -0.01633717)
      PathPoint P3: calcn_r (0.03370419 0.03945128 -0.02404915)
      PathPoint P4: midfoot_r (0.0163119 -0.01947014 -0.01811109)
      PathPoint P5: forefoot_r (0.05530735 -0.023 -0.027)
      PathPoint P6: toes_r (0.01396831 -0.009148123 -0.03044408)
      PathPoint P7: toes_r (0.0506464 -0.01457982 -0.03006181)
      PathWrap: wrap_object=MetatarsalHead_r method=hybrid range=(5 6)
    Thelen2003Muscle tib_ant_r: max_isometric_force=905 optimal_fiber_length=0.09434574 tendon_slack_length=0.2146847
        pennation_angle_at_optimal=0.08726646
      PathPoint P1: tibia_r (0.01680663 -0.1524406 0.01079756)
      PathPoint P2: tibia_r (0.0308904 -0.3708701 -0.01661885)
      PathPoint P3: midfoot_r (0.04497376 0.009615513 -0.02084099)
    Thelen2003Muscle per_brev_r: max_isometric_force=435 optimal_fiber_length=0.05484301 tendon_slack_length=0.1765945
        pennation_angle_at_optimal=0.08726646
      PathPoint P1: tibia_r (-0.006572426 -0.2483731 0.03051484)
      PathPoint P2: tibia_r (-0.01859058 -0.3927412 0.02657138)
      PathPoint P3: tibia_r (-0.01352042 -0.4031605 0.02713473)
      PathPoint P4: calcn_r (0.04244565 0.03859364 0.02325084)
      PathPoint P5: forefoot_r (-0.02268535 -0.009356485 0.03123189)
    Thelen2003Muscle per_long_r: max_isometric_force=943 optimal_fiber_length=0.04948137 tendon_slack_length=0.3483892
        pennation_angle_at_optimal=0.1745329
      PathPoint P1: tibia_r (0.000469459 -0.1471841 0.03398883)
      PathPoint P2: tibia_r (-0.0194356 -0.3947124 0.02685306)
      PathPoint P3: tibia_r (-0.01521047 -0.4054133 0.02713473)
      PathPoint P4: calcn_r (0.03947175 0.03287607 0.02205337)
      PathPoint P5: midfoot_r (0.002770918 -0.03247213 0.02700875)
      PathPoint P6: midfoot_r (0.01787321 -0.02342133 0.0098603)
      PathPoint P7: forefoot_r (0.0169679 -0.005211676 -0.02000093)
    Thelen2003Muscle per_tert_r: max_isometric_force=180 optimal_fiber_length=0.08792177 tendon_slack_length=0.1112934
        pennation_angle_at_optimal=0.2268928
      PathPoint P1: tibia_r (0.0009389181 -0.2632042 0.02168901)
      PathPoint P2: tibia_r (0.02150122 -0.3819464 0.0149288)
      PathPoint P3: forefoot_r (-0.002914804 0.0006694051 0.03094893)
    Thelen2003Muscle ext_dig_r: max_isometric_force=512 optimal_fiber_length=0.09708468 tendon_slack_length=0.3283747
        pennation_angle_at_optimal=0.1396263
      PathPoint P1: tibia_r (0.003004538 -0.1296309 0.02591414)
      PathPoint P2: tibia_r (0.02713473 -0.3761267 0.00676021)
      PathPoint P3: midfoot_r (0.005858191 0.02627047 0.007335104)
      PathPoint P4: forefoot_r (0.04539435 -0.005743826 0.01516312)
      PathPoint P5: toes_r (0.0002703544 0.006718153 0.01526772)
      PathPoint P6: toes_r (0.03992234 -0.0005717577 0.02494725)
    Thelen2003Muscle ext_hal_r: max_isometric_force=162 optimal_fiber_length=0.1050929 tendon_slack_length=0.2887688
        pennation_angle_at_optimal=0.1047198
      PathPoint P1: tibia_r (0.001126702 -0.1658637 0.02140733)
      PathPoint P2: tibia_r (0.03060873 -0.3740616 -0.007980804)
      PathPoint P3: midfoot_r (0.01018386 0.02641341 -0.01362059)
      PathPoint P4: forefoot_r (0.01628619 0.03056279 -0.02345523)
      PathPoint P5: forefoot_r (0.05602829 0.006263085 -0.02575037)
      PathPoint P6: toes_r (0.02685521 0.005860516 -0.02844831)
      PathPoint P7: toes_r (0.05073651 0.00485994 -0.02256075)
    Thelen2003Muscle FDB_r: max_isometric_force=600 optimal_fiber_length=0.023 tendon_slack_length=0.123
        pennation_angle_at_optimal=0.3491
      PathPoint FDB_r_P1: calcn_r (0.03236061 -0.016 -0.0152083)
      PathPoint FDB_r_P3: toes_r (0.015 -0.002727308 -0.01425658)
      PathWrap: wrap_object=MetatarsalHead_r method=hybrid range=(1 2)
    Thelen2003Muscle glut_med1_l: max_isometric_force=819 optimal_fiber_length=0.05207765
        tendon_slack_length=0.07592629 pennation_angle_at_optimal=0.1396263
      PathPoint P1: pelvis (-0.03940218 0.02935849 -0.119207)
      PathPoint P2: femur_l (-0.02185984 -0.01173212 -0.05565235)
    Thelen2003Muscle glut_med2_l: max_isometric_force=573 optimal_fiber_length=0.08239993 tendon_slack_length=0.0516828
        pennation_angle_at_optimal=0
      PathPoint P1: pelvis (-0.08257075 0.04297542 -0.07552732)
      PathPoint P2: femur_l (-0.02587082 -0.005815921 -0.05284466)
    Thelen2003Muscle glut_med3_l: max_isometric_force=653 optimal_fiber_length=0.06321903
        tendon_slack_length=0.05186701 pennation_angle_at_optimal=0.3316126
      PathPoint P1: pelvis (-0.11811 0.01014027 -0.06389256)
      PathPoint P2: femur_l (-0.03098482 -0.004712902 -0.05194219)
    Thelen2003Muscle glut_min1_l: max_isometric_force=270 optimal_fiber_length=0.06657439
        tendon_slack_length=0.01566456 pennation_angle_at_optimal=0.1745329
      PathPoint P1: pelvis (-0.04510005 -0.007725918 -0.1041212)
      PathPoint P2: femur_l (-0.007219764 -0.01042855 -0.05615372)
    Thelen2003Muscle glut_min2_l: max_isometric_force=285 optimal_fiber_length=0.05494212
        tendon_slack_length=0.02550884 pennation_angle_at_optimal=0
      PathPoint P1: pelvis (-0.06113133 -0.006277308 -0.09771224)
      PathPoint P2: femur_l (-0.009626352 -0.01042855 -0.05615372)
    Thelen2003Muscle glut_min3_l: max_isometric_force=323 optimal_fiber_length=0.03735129
        tendon_slack_length=0.05012937 pennation_angle_at_optimal=0.01745329
      PathPoint P1: pelvis (-0.08054269 -0.00608416 -0.08440129)
      PathPoint P2: femur_l (-0.01353706 -0.008322784 -0.05515098)
    Thelen2003Muscle semimem_l: max_isometric_force=1288 optimal_fiber_length=0.07982465 tendon_slack_length=0.3582131
        pennation_angle_at_optimal=0.2617994
      PathPoint P1: pelvis (-0.1151162 -0.09413065 -0.0705086)
      ConditionalPathPoint P2: tibia_l (-0.03267435 -0.03303194 0.01775494)
          socket_coordinate=/jointset/knee_l/knee_angle_l range=(-0.5585054 0.1745329)
      PathPoint P3: tibia_l (-0.02535079 -0.04478413 0.01837463)
    Thelen2003Muscle semiten_l: max_isometric_force=410 optimal_fiber_length=0.1991751 tendon_slack_length=0.2531803
        pennation_angle_at_optimal=0.08726646
      PathPoint P1: pelvis (-0.1220212 -0.1061155 -0.05954432)
      ConditionalPathPoint P2: tibia_l (-0.03946273 -0.02683669 0.02137916)
          socket_coordinate=/jointset/knee_l/knee_angle_l range=(-0.3316126 0.1745329)
      PathPoint P3: tibia_l (-0.03119086 -0.04958076 0.02148245)
      PathPoint P4: tibia_l (-0.01060977 -0.07002508 0.02300349)
      PathPoint P5: tibia_l (0.002535079 -0.08973723 0.01812112)
    Thelen2003Muscle bifemlh_l: max_isometric_force=896 optimal_fiber_length=0.1086278 tendon_slack_length=0.3248867
        pennation_angle_at_optimal=0
      PathPoint P1: pelvis (-0.1216446 -0.09905593 -0.06846759)
      PathPoint P2: tibia_l (-0.02826143 -0.03379226 -0.02763236)
      PathPoint P3: tibia_l (-0.02197068 -0.05284734 -0.03220489)
    Thelen2003Muscle bifemsh_l: max_isometric_force=804 optimal_fiber_length=0.1706238 tendon_slack_length=0.08777758
        pennation_angle_at_optimal=0.4014257
      PathPoint P1: femur_l (0.005013725 -0.2116795 -0.02346423)
      PathPoint P2: tibia_l (-0.02826143 -0.03379226 -0.02763236)
      PathPoint P3: tibia_l (-0.02197068 -0.05284734 -0.03220489)
    Thelen2003Muscle sar_l: max_isometric_force=156 optimal_fiber_length=0.5133807 tendon_slack_length=0.09872706
        pennation_angle_at_optimal=0
      PathPoint P1: pelvis (-0.01477582 -0.001255462 -0.1224607)
      PathPoint P2: femur_l (-0.003008235 -0.3577794 0.04221557)
      PathPoint P3: tibia_l (-0.005257941 -0.03933044 0.03746283)
      PathPoint P4: tibia_l (0.005633508 -0.0552879 0.03596056)
      PathPoint P5: tibia_l (0.02281571 -0.07884861 0.02366074)
    Thelen2003Muscle add_long_l: max_isometric_force=627 optimal_fiber_length=0.1383124 tendon_slack_length=0.110249
        pennation_angle_at_optimal=0.1047198
      PathPoint P1: pelvis (-0.03051738 -0.08073584 -0.01666334)
      PathPoint P2: femur_l (0.005013725 -0.2116795 -0.02346423)
    Thelen2003Muscle add_brev_l: max_isometric_force=429 optimal_fiber_length=0.133193 tendon_slack_length=0.02002903
        pennation_angle_at_optimal=0
      PathPoint P1: pelvis (-0.05668892 -0.08836519 -0.01617034)
      PathPoint P2: femur_l (0.0009024705 -0.1199283 -0.0294807)
    Thelen2003Muscle add_mag1_l: max_isometric_force=381 optimal_fiber_length=0.08753669 tendon_slack_length=0.06037013
        pennation_angle_at_optimal=0.08726646
      PathPoint P1: pelvis (-0.07069215 -0.1133778 -0.02514291)
      PathPoint P2: femur_l (-0.004512353 -0.1214324 -0.03399306)
    Thelen2003Muscle add_mag2_l: max_isometric_force=343 optimal_fiber_length=0.1222252 tendon_slack_length=0.1212151
        pennation_angle_at_optimal=0.05235988
      PathPoint P1: pelvis (-0.08025297 -0.1151162 -0.03036869)
      PathPoint P2: femur_l (0.005414823 -0.2291272 -0.02276231)
    Thelen2003Muscle add_mag3_l: max_isometric_force=488 optimal_fiber_length=0.1319552 tendon_slack_length=0.2508156
        pennation_angle_at_optimal=0.08726646
      PathPoint P1: pelvis (-0.1072744 -0.1102199 -0.04813634)
      PathPoint P2: femur_l (0.007019215 -0.3847533 0.02667302)
    Thelen2003Muscle tfl_l: max_isometric_force=233 optimal_fiber_length=0.09421785 tendon_slack_length=0.4215009
        pennation_angle_at_optimal=0.05235988
      PathPoint P1: pelvis (-0.03003451 0.02066683 -0.1223621)
      PathPoint P2: femur_l (0.0294807 -0.09977313 -0.05986388)
      PathPoint P3: femur_l (0.005414823 -0.4060115 -0.035798)
      PathPoint P4: tibia_l (0.005633508 -0.04571342 -0.02788587)
    Thelen2003Muscle pect_l: max_isometric_force=266 optimal_fiber_length=0.09978509 tendon_slack_length=0.03292908
        pennation_angle_at_optimal=0
      PathPoint P1: pelvis (-0.04162338 -0.07416881 -0.04446843)
      PathPoint P2: femur_l (-0.01223349 -0.08242564 -0.02536945)
    Thelen2003Muscle grac_l: max_isometric_force=162 optimal_fiber_length=0.3495844 tendon_slack_length=0.1251353
        pennation_angle_at_optimal=0.05235988
      PathPoint P1: pelvis (-0.0714744 -0.1146333 -0.02754874)
      ConditionalPathPoint P2: tibia_l (-0.02494705 -0.0299437 0.03543477)
          socket_coordinate=/jointset/knee_l/knee_angle_l range=(-0.4363323 0.1745329)
      PathPoint P3: tibia_l (-0.01824318 -0.04836987 0.03361327)
      PathPoint P4: tibia_l (0.005633508 -0.07847314 0.02140733)
    Thelen2003Muscle glut_max1_l: max_isometric_force=573 optimal_fiber_length=0.1389936 tendon_slack_length=0.1223535
        pennation_angle_at_optimal=0.08726646
      PathPoint P1: pelvis (-0.1154059 0.05910327 -0.06901974)
      PathPoint P2: pelvis (-0.124677 0.001158888 -0.08735928)
      PathPoint P3: femur_l (-0.04582545 -0.02486808 -0.03930761)
      PathPoint P4: femur_l (-0.02777604 -0.05675537 -0.04712902)
    Thelen2003Muscle glut_max2_l: max_isometric_force=819 optimal_fiber_length=0.1447585 tendon_slack_length=0.1250634
        pennation_angle_at_optimal=0
      PathPoint P1: pelvis (-0.1302783 0.01699702 -0.05551159)
      PathPoint P2: pelvis (-0.1328858 -0.05021847 -0.09012007)
      PathPoint P3: femur_l (-0.04271694 -0.05314549 -0.02938043)
      PathPoint P4: femur_l (-0.01564282 -0.1018789 -0.04201502)
    Thelen2003Muscle glut_max3_l: max_isometric_force=552 optimal_fiber_length=0.1421178 tendon_slack_length=0.1431047
        pennation_angle_at_optimal=0.08726646
      PathPoint P1: pelvis (-0.1502691 -0.03032423 -0.005718779)
      PathPoint P2: pelvis (-0.1476616 -0.1015958 -0.03973565)
      PathPoint P3: femur_l (-0.02998208 -0.1043858 -0.01353706)
      PathPoint P4: femur_l (-0.00601647 -0.1422895 -0.04121282)
    Thelen2003Muscle iliacus_l: max_isometric_force=1073 optimal_fiber_length=0.09767838 tendon_slack_length=0.09767838
        pennation_angle_at_optimal=0.1221731
      PathPoint P1: pelvis (-0.06509086 0.0352495 -0.08420409)
      PathPoint P2: pelvis (-0.02491609 -0.05311569 -0.0799643)
      ConditionalPathPoint P3: pelvis (-0.0278133 -0.07774205 -0.0804573)
          socket_coordinate=/jointset/hip_l/hip_flexion_l range=(-1.570796 0.7853982)
      PathPoint P4: femur_l (0.001704667 -0.05444906 -0.005715647)
      PathPoint P5: femur_l (-0.01935298 -0.06227047 -0.01293541)
    Thelen2003Muscle psoas_l: max_isometric_force=1113 optimal_fiber_length=0.09749959 tendon_slack_length=0.1559993
        pennation_angle_at_optimal=0.1396263
      PathPoint P1: pelvis (-0.06248336 0.08566112 -0.02849529)
      PathPoint P2: pelvis (-0.02298461 -0.05504717 -0.07483712)
      ConditionalPathPoint P3: pelvis (-0.0278133 -0.07774205 -0.0804573)
          socket_coordinate=/jointset/hip_l/hip_flexion_l range=(-1.570796 0.7853982)
      PathPoint P4: femur_l (0.001604392 -0.05083917 -0.003810431)
      PathPoint P5: femur_l (-0.01885161 -0.05986388 -0.01042855)
    Thelen2003Muscle quad_fem_l: max_isometric_force=381 optimal_fiber_length=0.0534126 tendon_slack_length=0.02373893
        pennation_angle_at_optimal=0
      PathPoint P1: pelvis (-0.1103841 -0.1111566 -0.05127181)
      PathPoint P2: femur_l (-0.03820459 -0.03599855 -0.03670047)
    Thelen2003Muscle gem_l: max_isometric_force=164 optimal_fiber_length=0.02370322 tendon_slack_length=0.03851773
        pennation_angle_at_optimal=0
      PathPoint P1: pelvis (-0.1094183 -0.07919066 -0.07040014)
      PathPoint P2: femur_l (-0.01423898 -0.003309059 -0.04442161)
    Thelen2003Muscle peri_l: max_isometric_force=444 optimal_fiber_length=0.02549223 tendon_slack_length=0.1127541
        pennation_angle_at_optimal=0.1745329
      PathPoint P1: pelvis (-0.1348173 0.0002897219 -0.02317091)
      PathPoint P2: pelvis (-0.1152128 -0.02665442 -0.06477996)
      PathPoint P3: femur_l (-0.01484063 -0.003609882 -0.04381996)
    Thelen2003Muscle rect_fem_l: max_isometric_force=1169 optimal_fiber_length=0.114302 tendon_slack_length=0.3108213
        pennation_angle_at_optimal=0.08726646
      PathPoint P1: pelvis (-0.02848932 -0.03003451 -0.09544445)
      ConditionalPathPoint P2: femur_l (0.03349168 -0.4041063 -0.001905216)
          socket_coordinate=/jointset/knee_l/knee_angle_l range=(-2.617994 -1.459968)
      MovingPathPoint P3: tibia_l socket_x_coordinate=/jointset/knee_l/knee_angle_l
          socket_y_coordinate=/jointset/knee_l/knee_angle_l socket_z_coordinate=/jointset/knee_l/knee_angle_l
        x_location: MultiplierFunction: scale=0.9389181
          SimmSpline: x=(-2.0944 -1.99997 -1.5708 -1.45752 -1.39626 -1.0472 -0.698132 -0.526391 -0.349066 -0.174533 0 0.00017453 0.00034907 0.0279253 0.0872665 0.174533 2.0944)
              y=(0.0155805 0.0179938 0.0275081 0.0296564 0.0307615 0.0365695 0.0422074 0.0450902 0.048391 0.0534299 0.0617576 0.0617669 0.0617762 0.0633083 0.066994 0.0733035 0.0573481)
        y_location: MultiplierFunction: scale=0.9386739
          SimmSpline: x=(-2.0944 -1.99997 -1.5708 -1.45752 -1.39626 -1.0472 -0.698132 -0.526391 -0.349066 -0.174533 0 0.00017453 0.00034907 0.0279253 0.0872665 0.174533 2.0944)
              y=(0.0234116 0.0237613 0.0251141 0.0252795 0.0253146 0.0249184 0.0242373 0.0238447 0.0234197 0.0227644 0.020984 0.0209814 0.0209788 0.0205225 0.0191754 0.0159554 -0.0673774)
        z_location: MultiplierFunction: scale=0.9389181
          SimmSpline: x=(-2.0944 0.1745) y=(-0.0014 -0.0014)
    Thelen2003Muscle vas_med_l: max_isometric_force=1294 optimal_fiber_length=0.08962709 tendon_slack_length=0.1268878
        pennation_angle_at_optimal=0.08726646
      PathPoint P1: femur_l (0.01403843 -0.2104762 -0.01885161)
      PathPoint P2: femur_l (0.03569772 -0.2776601 -0.0009024705)
      ConditionalPathPoint P3: femur_l (0.03710157 -0.4059112 0.01253431)
          socket_coordinate=/jointset/knee_l/knee_angle_l range=(-2.617994 -1.210037)
      ConditionalPathPoint P4: femur_l (0.02747521 -0.426668 0.01313596)
          socket_coordinate=/jointset/knee_l/knee_angle_l range=(-2.617994 -1.780061)
      MovingPathPoint P5: tibia_l socket_x_coordinate=/jointset/knee_l/knee_angle_l
          socket_y_coordinate=/jointset/knee_l/knee_angle_l socket_z_coordinate=/jointset/knee_l/knee_angle_l
        x_location: MultiplierFunction: scale=0.9389181
          SimmSpline: x=(-2.0944 -1.99997 -1.5708 -1.45752 -1.39626 -1.0472 -0.698132 -0.526391 -0.349066 -0.174533 0 0.00017453 0.00034907 0.0279253 0.0872665 0.174533 2.0944)
              y=(0.00981097 0.0122243 0.0217371 0.0238851 0.0249902 0.0307959 0.0364187 0.0392871 0.0425654 0.0475764 0.0559586 0.0559681 0.0559776 0.0575419 0.0613368 0.0679503 0.0629332)
        y_location: MultiplierFunction: scale=0.9386739
          SimmSpline: x=(-2.0944 -1.99997 -1.5708 -1.45752 -1.39626 -1.0472 -0.698132 -0.526391 -0.349066 -0.174533 0 0.00017453 0.00034907 0.0279253 0.0872665 0.174533 2.0944)
              y=(0.0224154 0.0227651 0.0241265 0.0242933 0.0243287 0.0239462 0.0233593 0.0230677 0.0228342 0.0226362 0.0217917 0.0217903 0.0217889 0.0215365 0.0206842 0.0183269 -0.0656205)
        z_location: MultiplierFunction: scale=0.9389181
          SimmSpline: x=(-2.0944 2.0944) y=(0.0146 0.0146)
    Thelen2003Muscle vas_int_l: max_isometric_force=1365 optimal_fiber_length=0.08785447 tendon_slack_length=0.1373357
        pennation_angle_at_optimal=0.05235988
      PathPoint P1: femur_l (0.02907961 -0.1929281 -0.0310851)
      PathPoint P2: femur_l (0.03359196 -0.2089721 -0.02857823)
      ConditionalPathPoint P3: femur_l (0.03439416 -0.4041063 -0.005515098)
          socket_coordinate=/jointset/knee_l/knee_angle_l range=(-2.617994 -1.42)
      MovingPathPoint P4: tibia_l socket_x_coordinate=/jointset/knee_l/knee_angle_l
          socket_y_coordinate=/jointset/knee_l/knee_angle_l socket_z_coordinate=/jointset/knee_l/knee_angle_l
        x_location: MultiplierFunction: scale=0.9389181
          SimmSpline: x=(-2.0944 -1.99997 -1.5708 -1.45752 -1.39626 -1.0472 -0.698132 -0.526391 -0.349066 -0.174533 0 0.00017453 0.00034907 0.0279253 0.0872665 0.174533 2.0944)
              y=(0.0082733 0.0106866 0.0202042 0.022353 0.0234583 0.0292715 0.0349465 0.037871 0.0412569 0.0465287 0.0554632 0.0554735 0.0554837 0.0571717 0.061272 0.0684368 0.0648818)
        y_location: MultiplierFunction: scale=0.9386739
          SimmSpline: x=(-2.0944 -1.99997 -1.5708 -1.45752 -1.39626 -1.0472 -0.698132 -0.526391 -0.349066 -0.174533 0 0.00017453 0.00034907 0.0279253 0.0872665 0.174533 2.0944)
              y=(0.025599 0.0259487 0.0273124 0.0274796 0.0275151 0.0271363 0.0265737 0.0263073 0.0261187 0.0260129 0.0252923 0.0252911 0.0252898 0.0250526 0.0242191 0.0218288 -0.0685706)
        z_location: MultiplierFunction: scale=0.9389181
          SimmSpline: x=(-2.0944 2.0944) y=(-0.0018 -0.0018)
    Thelen2003Muscle vas_lat_l: max_isometric_force=1871 optimal_fiber_length=0.08448231 tendon_slack_length=0.1579015
        pennation_angle_at_optimal=0.08726646
      PathPoint P1: femur_l (0.004813176 -0.1859089 -0.0349958)
      PathPoint P2: femur_l (0.02697384 -0.2598112 -0.04101227)
      ConditionalPathPoint P3: femur_l (0.0361991 -0.4041063 -0.02055627)
          socket_coordinate=/jointset/knee_l/knee_angle_l range=(-2.617994 -1.210037)
      ConditionalPathPoint P4: femur_l (0.02536945 -0.4254647 -0.01845051)
          socket_coordinate=/jointset/knee_l/knee_angle_l range=(-2.617994 -1.920037)
      MovingPathPoint P5: tibia_l socket_x_coordinate=/jointset/knee_l/knee_angle_l
          socket_y_coordinate=/jointset/knee_l/knee_angle_l socket_z_coordinate=/jointset/knee_l/knee_angle_l
        x_location: MultiplierFunction: scale=0.9389181
          SimmSpline: x=(-2.0944 -1.99997 -1.5708 -1.45752 -1.39626 -1.0472 -0.698132 -0.526391 -0.349066 -0.174533 0 0.00017453 0.00034907 0.0279253 0.0872665 0.174533 2.0944)
              y=(0.0142897 0.016703 0.0262145 0.0283623 0.0294674 0.0352709 0.0408785 0.0437291 0.0469704 0.0518742 0.0599557 0.0599647 0.0599738 0.0614577 0.0650351 0.0711867 0.0583766)
        y_location: MultiplierFunction: scale=0.9386739
          SimmSpline: x=(-2.0944 -1.99997 -1.5708 -1.45752 -1.39626 -1.0472 -0.698132 -0.526391 -0.349066 -0.174533 0 0.00017453 0.00034907 0.0279253 0.0872665 0.174533 2.0944)
              y=(0.0215318 0.0218815 0.0232362 0.0234019 0.0234371 0.0230439 0.0223842 0.0220151 0.0216359 0.0210971 0.0195864 0.0195842 0.019582 0.01919 0.018008 0.0151073 -0.0653421)
        z_location: MultiplierFunction: scale=0.9389181
          SimmSpline: x=(-2.0944 2.0944) y=(-0.0165 -0.0165)
    Thelen2003Muscle med_gas_l: max_isometric_force=1870 optimal_fiber_length=0.05709458 tendon_slack_length=0.3711148
        pennation_angle_at_optimal=0.296706
      PathPoint P1: femur_l (-0.01905216 -0.3939785 0.02356451)
      ConditionalPathPoint P2: femur_l (-0.03008235 -0.4033041 0.02587082)
          socket_coordinate=/jointset/knee_l/knee_angle_l range=(-0.7853982 0.1745329)
      PathPoint P3: calcn_l (0 0.04431122 0.005288817)
    Thelen2003Muscle lat_gas_l: max_isometric_force=820 optimal_fiber_length=0.06087263 tendon_slack_length=0.3614313
        pennation_angle_at_optimal=0.1396263
      PathPoint P1: femur_l (-0.02206039 -0.3956832 -0.02727467)
      ConditionalPathPoint P2: femur_l (-0.03008235 -0.402903 -0.02747521)
          socket_coordinate=/jointset/knee_l/knee_angle_l range=(-0.7853982 0.1745329)
      PathPoint P3: calcn_l (0 0.04431122 0.005288817)
    Thelen2003Muscle soleus_l: max_isometric_force=4259 optimal_fiber_length=0.04779569 tendon_slack_length=0.2389785
        pennation_angle_at_optimal=0.4363323
      PathPoint P1: tibia_l (-0.002253403 -0.1438987 -0.006666318)
      PathPoint P2: calcn_l (0 0.04431122 0.005288817)
    Thelen2003Muscle tib_post_l: max_isometric_force=1588 optimal_fiber_length=0.03007615 tendon_slack_length=0.3007615
        pennation_angle_at_optimal=0.2094395
      PathPoint P1: tibia_l (-0.00882583 -0.1265332 -0.001783944)
      PathPoint P2: tibia_l (-0.01352042 -0.3802568 0.02150122)
      PathPoint P3: calcn_l (0.03757927 0.04774177 0.02853965)
      PathPoint P4: midfoot_l (0.0005721473 0.001013649 0.0233426)
    Thelen2003Muscle flex_dig_l: max_isometric_force=310 optimal_fiber_length=0.03252889 tendon_slack_length=0.3826929
        pennation_angle_at_optimal=0.1221731
      PathPoint P1: tibia_l (-0.00779302 -0.1920527 0.001690053)
      PathPoint P2: tibia_l (-0.01445934 -0.3802568 0.01840279)
      PathPoint P3: calcn_l (0.03929151 0.04502592 0.02794092)
      PathPoint P4: midfoot_l (-0.01342709 -0.004032687 0.01880961)
      PathPoint P5: forefoot_l (0.04917931 -0.02518359 -0.01376607)
      PathPoint P6: toes_l (-0.001712245 -0.01114927 -0.01466898)
      PathPoint P7: toes_l (0.02568367 -0.0101487 -0.02145463)
      PathPoint P8: toes_l (0.0397421 -0.008576365 -0.02414894)
    Thelen2003Muscle flex_hal_l: max_isometric_force=322 optimal_fiber_length=0.04093934 tendon_slack_length=0.3617895
        pennation_angle_at_optimal=0.1745329
      PathPoint P1: tibia_l (-0.007417453 -0.2190865 -0.0229096)
      PathPoint P2: tibia_l (-0.01746388 -0.3828851 0.01633717)
      PathPoint P3: calcn_l (0.03370419 0.03945128 0.02404915)
      PathPoint P4: midfoot_l (0.0163119 -0.01947014 0.01811109)
      PathPoint P5: forefoot_l (0.05530735 -0.023 0.027)
      PathPoint P6: toes_l (0.01396831 -0.009148123 0.03044408)
      PathPoint P7: toes_l (0.0506464 -0.01457982 0.03006181)
      PathWrap: wrap_object=MetatarsalHead_l method=hybrid range=(5 6)
    Thelen2003Muscle tib_ant_l: max_isometric_force=905 optimal_fiber_length=0.09434574 tendon_slack_length=0.2146847
        pennation_angle_at_optimal=0.08726646
      PathPoint P1: tibia_l (0.01680663 -0.1524406 -0.01079756)
      PathPoint P2: tibia_l (0.0308904 -0.3708701 0.01661885)
      PathPoint P3: midfoot_l (0.04497376 0.009615513 0.02084099)
    Thelen2003Muscle per_brev_l: max_isometric_force=435 optimal_fiber_length=0.05484301 tendon_slack_length=0.1765945
        pennation_angle_at_optimal=0.08726646
      PathPoint P1: tibia_l (-0.006572426 -0.2483731 -0.03051484)
      PathPoint P2: tibia_l (-0.01859058 -0.3927412 -0.02657138)
      PathPoint P3: tibia_l (-0.01352042 -0.4031605 -0.02713473)
      PathPoint P4: calcn_l (0.04244565 0.03859364 -0.02325084)
      PathPoint P5: forefoot_l (-0.02268535 -0.009356485 -0.03123189)
    Thelen2003Muscle per_long_l: max_isometric_force=943 optimal_fiber_length=0.04948137 tendon_slack_length=0.3483892
        pennation_angle_at_optimal=0.1745329
      PathPoint P1: tibia_l (0.000469459 -0.1471841 -0.03398883)
      PathPoint P2: tibia_l (-0.0194356 -0.3947124 -0.02685306)
      PathPoint P3: tibia_l (-0.01521047 -0.4054133 -0.02713473)
      PathPoint P4: calcn_l (0.03947175 0.03287607 -0.02205337)
      PathPoint P5: midfoot_l (0.002770918 -0.03247213 -0.02700875)
      PathPoint P6: midfoot_l (0.01787321 -0.02342133 -0.0098603)
      PathPoint P7: forefoot_l (0.0169679 -0.005211676 0.02000093)
    Thelen2003Muscle per_tert_l: max_isometric_force=180 optimal_fiber_length=0.08792177 tendon_slack_length=0.1112934
        pennation_angle_at_optimal=0.2268928
      PathPoint P1: tibia_l (0.0009389181 -0.2632042 -0.02168901)
      PathPoint P2: tibia_l (0.02150122 -0.3819464 -0.0149288)
      PathPoint P3: forefoot_l (-0.002914804 0.0006694051 -0.03094893)
    Thelen2003Muscle ext_dig_l: max_isometric_force=512 optimal_fiber_length=0.09708468 tendon_slack_length=0.3283747
        pennation_angle_at_optimal=0.1396263
      PathPoint P1: tibia_l (0.003004538 -0.1296309 -0.02591414)
      PathPoint P2: tibia_l (0.02713473 -0.3761267 -0.00676021)
      PathPoint P3: midfoot_l (0.005858191 0.02627047 -0.007335104)
      PathPoint P4: forefoot_l (0.04539435 -0.005743826 -0.01516312)
      PathPoint P5: toes_l (0.0002703544 0.006718153 -0.01526772)
      PathPoint P6: toes_l (0.03992234 -0.0005717577 -0.02494725)
    Thelen2003Muscle ext_hal_l: max_isometric_force=162 optimal_fiber_length=0.1050929 tendon_slack_length=0.2887688
        pennation_angle_at_optimal=0.1047198
      PathPoint P1: tibia_l (0.001126702 -0.1658637 -0.02140733)
      PathPoint P2: tibia_l (0.03060873 -0.3740616 0.007980804)
      PathPoint P3: midfoot_l (0.01018386 0.02641341 0.01362059)
      PathPoint P4: forefoot_l (0.01628619 0.03056279 0.02345523)
      PathPoint P5: forefoot_l (0.05602829 0.006263085 0.02575037)
      PathPoint P6: toes_l (0.02685521 0.005860516 0.02844831)
      PathPoint P7: toes_l (0.05073651 0.00485994 0.02256075)
    Thelen2003Muscle FDB_l: max_isometric_force=600 optimal_fiber_length=0.023 tendon_slack_length=0.123
        pennation_angle_at_optimal=0.3491
      PathPoint FDB_l_P1: calcn_l (0.03236061 -0.016 0.0152083)
      PathPoint FDB_l_P3: toes_l (0.015 -0.002727308 0.01425658)
      PathWrap: wrap_object=MetatarsalHead_l method=hybrid range=(1 2)
    Thelen2003Muscle ercspn_r: max_isometric_force=2500 optimal_fiber_length=0.1152032 tendon_slack_length=0.02880079
        pennation_angle_at_optimal=0
      PathPoint P1: pelvis (-0.1352036 0.04239597 0.04298944)
      PathPoint P2: torso (-0.04906049 0.1053611 0.02149741)
    Thelen2003Muscle ercspn_l: max_isometric_force=2500 optimal_fiber_length=0.1152032 tendon_slack_length=0.02880079
        pennation_angle_at_optimal=0
      PathPoint P1: pelvis (-0.1352036 0.04239597 -0.04298944)
      PathPoint P2: torso (-0.04906049 0.1053611 -0.02149741)
    Thelen2003Muscle intobl_r: max_isometric_force=900 optimal_fiber_length=0.09683367 tendon_slack_length=0.09683367
        pennation_angle_at_optimal=0
      PathPoint P1: pelvis (-0.03862959 0.06760178 0.1140798)
      PathPoint P2: torso (0.06244062 0.1532526 0.01338013)
    Thelen2003Muscle intobl_l: max_isometric_force=900 optimal_fiber_length=0.09683367 tendon_slack_length=0.09683367
        pennation_angle_at_optimal=0
      PathPoint P1: pelvis (-0.03862959 0.06760178 -0.1140798)
      PathPoint P2: torso (0.06244062 0.1532526 -0.01338013)
    Thelen2003Muscle extobl_r: max_isometric_force=900 optimal_fiber_length=0.1143157 tendon_slack_length=0.1333683
        pennation_angle_at_optimal=0
      PathPoint P1: pelvis (-0.02897219 -0.06142105 0.009859963)
      PathPoint P2: torso (0.05798058 0.1053611 0.09812098)
    Thelen2003Muscle extobl_l: max_isometric_force=900 optimal_fiber_length=0.1143157 tendon_slack_length=0.1333683
        pennation_angle_at_optimal=0
      PathPoint P1: pelvis (-0.02897219 -0.06142105 -0.009859963)
      PathPoint P2: torso (0.05798058 0.1053611 -0.09812098)
    Ligament [values shared by the 26 below unless stated]:
      force_length_curve: SimmSpline: x=(-5 0.998 0.999 1 1.01 1.03 1.05 1.07 1.09 1.11 1.13 1.15 1.16 1.19 1.2 1.3 1.4 1.5 1.6 1.61 1.62 5)
          y=(0 0 0 0 0.558937 2.08342 3.8798 5.99658 8.49091 11.4301 14.8936 18.9747 21.2807 29.4506 32.6525 84.343 201.778 468.577 1000 1000 1000 1000)
    Ligament PlantarFascia_r: resting_length=0.146 pcsa_force=70
      PathPoint PlantarFascia_r_P1: calcn_r (0.03236061 -0.016 -0.0152083)
      PathPoint PlantarFascia_r_P3: toes_r (0.015 -0.002727308 -0.01425658)
      PathWrap: wrap_object=MetatarsalHead_r method=hybrid range=(1 2)
      force_length_curve: SimmSpline: x=(-5 0.998 0.999 1 1.01 1.03 1.05 1.07 1.09 1.11 1.13 1.15 1.16 1.19 1.2 1.21 5)
          y=(0 0 0 0 3.30315 12.454 26.7329 49.3972 85.8627 145.2 242.715 404.425 522.232 1000 1000 1000 1000)
    Ligament PlantarFascia_l: resting_length=0.146 pcsa_force=70
      PathPoint PlantarFascia_l_P1: calcn_l (0.03236061 -0.016 0.0152083)
      PathPoint PlantarFascia_l_P3: toes_l (0.015 -0.002727308 0.01425658)
      PathWrap: wrap_object=MetatarsalHead_l method=hybrid range=(1 2)
      force_length_curve: SimmSpline: x=(-5 0.998 0.999 1 1.01 1.03 1.05 1.07 1.09 1.11 1.13 1.15 1.16 1.19 1.2 1.21 5)
          y=(0 0 0 0 3.30315 12.454 26.7329 49.3972 85.8627 145.2 242.715 404.425 522.232 1000 1000 1000 1000)
    SmoothSphereHalfSpaceForce [values shared by the 10 below unless stated]: socket_half_space=/contactgeometryset/floor
        stiffness=10000000 [N/m^2] dissipation=2 [s/m] static_friction=0.8 dynamic_friction=0.8 viscous_friction=0.5
        transition_velocity=0.2 [m/s]
    SmoothSphereHalfSpaceForce SmoothSphereHalfSpaceForce_heel_r: socket_sphere=/contactgeometryset/heel_r
    SmoothSphereHalfSpaceForce SmoothSphereHalfSpaceForce_hindfoot_lat_r: socket_sphere=/contactgeometryset/hindfoot_lat_r
    SmoothSphereHalfSpaceForce SmoothSphereHalfSpaceForce_forefoot_lat_r: socket_sphere=/contactgeometryset/forefoot_lat_r
    SmoothSphereHalfSpaceForce SmoothSphereHalfSpaceForce_forefoot_med_r: socket_sphere=/contactgeometryset/forefoot_med_r
    SmoothSphereHalfSpaceForce SmoothSphereHalfSpaceForce_hallux_r: socket_sphere=/contactgeometryset/hallux_r
    SmoothSphereHalfSpaceForce SmoothSphereHalfSpaceForce_heel_l: socket_sphere=/contactgeometryset/heel_l
    SmoothSphereHalfSpaceForce SmoothSphereHalfSpaceForce_hindfoot_lat_l: socket_sphere=/contactgeometryset/hindfoot_lat_l
    SmoothSphereHalfSpaceForce SmoothSphereHalfSpaceForce_forefoot_lat_l: socket_sphere=/contactgeometryset/forefoot_lat_l
    SmoothSphereHalfSpaceForce SmoothSphereHalfSpaceForce_forefoot_med_l: socket_sphere=/contactgeometryset/forefoot_med_l
    SmoothSphereHalfSpaceForce SmoothSphereHalfSpaceForce_hallux_l: socket_sphere=/contactgeometryset/hallux_l
    Ligament LongPlantar1_r: resting_length=0.0839187 pcsa_force=55.25649
      PathPoint LongPlantar1_r_P1: calcn_r (0.03589548 -0.01009525 0.002007521)
      PathPoint LongPlantar1_r_P2: midfoot_r (0.01075295 -0.02746301 0.008329021)
      PathPoint LongPlantar1_r_P3: forefoot_r (0.01167925 0.003254473 -0.005738154)
    Ligament LongPlantar2_r: resting_length=0.07947708 pcsa_force=41.44236
      PathPoint LongPlantar2_r_P1: calcn_r (0.03589548 -0.01009525 0.002007521)
      PathPoint LongPlantar2_r_P2: midfoot_r (0.006133939 -0.02925719 0.01380518)
      PathPoint LongPlantar2_r_P3: forefoot_r (0.01020248 -0.003156263 0.0008897153)
    Ligament LongPlantar3_r: resting_length=0.07391022 pcsa_force=27.62824
      PathPoint LongPlantar3_r_P1: calcn_r (0.03589548 -0.01009525 0.002007521)
      PathPoint LongPlantar3_r_P2: midfoot_r (0.002403368 -0.02989403 0.01847163)
      PathPoint LongPlantar3_r_P3: forefoot_r (0.005828051 -0.008381537 0.009197185)
    Ligament LongPlantar4_r: resting_length=0.06631394 pcsa_force=13.81412
      PathPoint LongPlantar4_r_P1: calcn_r (0.03589548 -0.01009525 0.002007521)
      PathPoint LongPlantar4_r_P2: midfoot_r (-0.000493096 -0.02994688 0.02301719)
      PathPoint LongPlantar4_r_P3: forefoot_r (-0.003005385 -0.01785188 0.02293082)
    Ligament CalcaneoNavicularPlantar1Mus_r: resting_length=0.02035184 pcsa_force=10.60192
      PathPoint CalcaneoNavicularPlantar1Mus_r_P1: calcn_r (0.05700244 0.02975214 -0.02664983)
      PathPoint CalcaneoNavicularPlantar1Mus_r_P2: midfoot_r (-0.003795571 0.004174652 -0.02251366)
    Ligament CalcaneoNavicularPlantar2Mus_r: resting_length=0.01247982 pcsa_force=12.31771
      PathPoint CalcaneoNavicularPlantar2Mus_r_P1: calcn_r (0.06076957 0.02739884 -0.02214051)
      PathPoint CalcaneoNavicularPlantar2Mus_r_P2: midfoot_r (-0.00414355 0.000223865 -0.01382777)
    Ligament CalcaneoNavicularPlantar3Mus_r: resting_length=0.01089342 pcsa_force=12.31771
      PathPoint CalcaneoNavicularPlantar3Mus_r_P1: calcn_r (0.06282662 0.02579832 -0.01616542)
      PathPoint CalcaneoNavicularPlantar3Mus_r_P2: midfoot_r (-0.00471086 -0.001053918 -0.004545871)
    Ligament CalcaneoCuboidPlantar1Mus_r: resting_length=0.01814505 pcsa_force=15.39714
      PathPoint CalcaneoCuboidPlantar1Mus_r_P1: calcn_r (0.05880577 0.003139706 0.004295305)
      PathPoint CalcaneoCuboidPlantar1Mus_r_P2: midfoot_r (-0.001177797 -0.02483123 0.01406038)
    Ligament CalcaneoCuboidPlantar2Mus_r: resting_length=0.02368999 pcsa_force=15.39714
      PathPoint CalcaneoCuboidPlantar2Mus_r_P1: calcn_r (0.0596257 0.007034532 -0.004939869)
      PathPoint CalcaneoCuboidPlantar2Mus_r_P2: midfoot_r (0.003586828 -0.01923292 0.007414827)
    Ligament CalcaneoCuboidDorsalMus_r: resting_length=0.02627193 pcsa_force=10.60192
      PathPoint CalcaneoCuboidDorsalMus_r_P1: calcn_r (0.0632319 0.02105247 0.02000256)
      PathPoint CalcaneoCuboidDorsalMus_r_P2: midfoot_r (0.01130647 -0.001704713 0.02488336)
    Ligament CalcaneoNavicularBifurcateMus_r: resting_length=0.01750523 pcsa_force=10.60192
      PathPoint CalcaneoNavicularBifurcateMus_r_P1: calcn_r (0.06418684 0.03740483 0.01006243)
      PathPoint CalcaneoNavicularBifurcateMus_r_P2: midfoot_r (0.00185655 0.01369042 0.01055085)
    Ligament CalcaneoCuboidBifurcateMus_r: resting_length=0.01493449 pcsa_force=10.60192
      PathPoint CalcaneoCuboidBifurcateMus_r_P1: calcn_r (0.06418684 0.03740483 0.01006243)
      PathPoint CalcaneoCuboidBifurcateMus_r_P2: midfoot_r (0.0001909117 0.002712556 0.02177442)
    Ligament LongPlantar1_l: resting_length=0.0839187 pcsa_force=55.25649
      PathPoint LongPlantar1_l_P1: calcn_l (0.03589548 -0.01009525 -0.002007521)
      PathPoint LongPlantar1_l_P2: midfoot_l (0.01075295 -0.02746301 -0.008329021)
      PathPoint LongPlantar1_l_P3: forefoot_l (0.01167925 0.003254473 0.005738154)
    Ligament LongPlantar2_l: resting_length=0.07947708 pcsa_force=41.44236
      PathPoint LongPlantar2_l_P1: calcn_l (0.03589548 -0.01009525 -0.002007521)
      PathPoint LongPlantar2_l_P2: midfoot_l (0.006133939 -0.02925719 -0.01380518)
      PathPoint LongPlantar2_l_P3: forefoot_l (0.01020248 -0.003156263 -0.0008897153)
    Ligament LongPlantar3_l: resting_length=0.07391022 pcsa_force=27.62824
      PathPoint LongPlantar3_l_P1: calcn_l (0.03589548 -0.01009525 -0.002007521)
      PathPoint LongPlantar3_l_P2: midfoot_l (0.002403368 -0.02989403 -0.01847163)
      PathPoint LongPlantar3_l_P3: forefoot_l (0.005828051 -0.008381537 -0.009197185)
    Ligament LongPlantar4_l: resting_length=0.06631394 pcsa_force=13.81412
      PathPoint LongPlantar4_l_P1: calcn_l (0.03589548 -0.01009525 -0.002007521)
      PathPoint LongPlantar4_l_P2: midfoot_l (-0.000493096 -0.02994688 -0.02301719)
      PathPoint LongPlantar4_l_P3: forefoot_l (-0.003005385 -0.01785188 -0.02293082)
    Ligament CalcaneoNavicularPlantar1Mus_l: resting_length=0.02035184 pcsa_force=10.60192
      PathPoint CalcaneoNavicularPlantar1Mus_l_P1: calcn_l (0.05700244 0.02975214 0.02664983)
      PathPoint CalcaneoNavicularPlantar1Mus_l_P2: midfoot_l (-0.003795571 0.004174652 0.02251366)
    Ligament CalcaneoNavicularPlantar2Mus_l: resting_length=0.01247982 pcsa_force=12.31771
      PathPoint CalcaneoNavicularPlantar2Mus_rl_P1: calcn_l (0.06076957 0.02739884 0.02214051)
      PathPoint CalcaneoNavicularPlantar2Mus_rl_P2: midfoot_l (-0.00414355 0.000223865 0.01382777)
    Ligament CalcaneoNavicularPlantar3Mus_l: resting_length=0.01089342 pcsa_force=12.31771
      PathPoint CalcaneoNavicularPlantar3Mus_l_P1: calcn_l (0.06282662 0.02579832 0.01616542)
      PathPoint CalcaneoNavicularPlantar3Mus_l_P2: midfoot_l (-0.00471086 -0.001053918 0.004545871)
    Ligament CalcaneoCuboidPlantar1Mus_l: resting_length=0.01814505 pcsa_force=15.39714
      PathPoint CalcaneoCuboidPlantar1Mus_l_P1: calcn_l (0.05880577 0.003139706 -0.004295305)
      PathPoint CalcaneoCuboidPlantar1Mus_l_P2: midfoot_l (-0.001177797 -0.02483123 -0.01406038)
    Ligament CalcaneoCuboidPlantar2Mus_l: resting_length=0.02368999 pcsa_force=15.39714
      PathPoint CalcaneoCuboidPlantar2Mus_l_P1: calcn_l (0.0596257 0.007034532 0.004939869)
      PathPoint CalcaneoCuboidPlantar2Mus_l_P2: midfoot_l (0.003586828 -0.01923292 -0.007414827)
    Ligament CalcaneoCuboidDorsalMus_l: resting_length=0.02627193 pcsa_force=10.60192
      PathPoint CalcaneoCuboidDorsalMus_l_P1: calcn_l (0.0632319 0.02105247 -0.02000256)
      PathPoint CalcaneoCuboidDorsalMus_l_P2: midfoot_l (0.01130647 -0.001704713 -0.02488336)
    Ligament CalcaneoNavicularBifurcateMus_l: resting_length=0.01750523 pcsa_force=10.60192
      PathPoint CalcaneoNavicularBifurcateMus_l_P1: calcn_l (0.06418684 0.03740483 -0.01006243)
      PathPoint CalcaneoNavicularBifurcateMus_l_P2: midfoot_l (0.00185655 0.01369042 -0.01055085)
    Ligament CalcaneoCuboidBifurcateMus_l: resting_length=0.01493449 pcsa_force=10.60192
      PathPoint CalcaneoCuboidBifurcateMus_l_P1: calcn_l (0.06418684 0.03740483 -0.01006243)
      PathPoint CalcaneoCuboidBifurcateMus_l_P2: midfoot_l (0.0001909117 0.002712556 -0.02177442)
    ActivationCoordinateActuator [values shared by the 8 below unless stated]: min_control=-1 max_control=1
        optimal_force=150 activation_time_constant=0.035 default_activation=0
    ActivationCoordinateActuator actuator_arm_flex_r: coordinate=arm_flex_r
    ActivationCoordinateActuator actuator_arm_add_r: coordinate=arm_add_r
    ActivationCoordinateActuator actuator_arm_rot_r: coordinate=arm_rot_r
    ActivationCoordinateActuator actuator_elbow_flex_r: coordinate=elbow_flex_r
    ActivationCoordinateActuator actuator_arm_flex_l: coordinate=arm_flex_l
    ActivationCoordinateActuator actuator_arm_add_l: coordinate=arm_add_l
    ActivationCoordinateActuator actuator_arm_rot_l: coordinate=arm_rot_l
    ActivationCoordinateActuator actuator_elbow_flex_l: coordinate=elbow_flex_l
    ObjectGroup R_hip_abd: members=(glut_max1_r glut_med1_r glut_med2_r glut_med3_r glut_min1_r glut_min2_r glut_min3_r peri_r sar_r tfl_r)
    ObjectGroup R_hip_flex: members=(add_brev_r add_long_r glut_med1_r glut_min1_r grac_r iliacus_r pect_r psoas_r rect_fem_r sar_r tfl_r)
    ObjectGroup R_hip_inrot: members=(glut_med1_r glut_min1_r iliacus_r psoas_r tfl_r)
    ObjectGroup R_hip_exrot: members=(gem_r glut_med3_r glut_min3_r peri_r quad_fem_r)
    ObjectGroup R_hip_ext: members=(add_long_r add_mag1_r add_mag2_r add_mag3_r bifemlh_r glut_max1_r glut_max2_r glut_max3_r glut_med3_r glut_min3_r semimem_r semiten_r)
    ObjectGroup R_hip_add: members=(add_brev_r add_long_r add_mag1_r add_mag2_r add_mag3_r bifemlh_r grac_r pect_r semimem_r semiten_r)
    ObjectGroup R_knee_bend: members=(bifemlh_r bifemsh_r grac_r lat_gas_r med_gas_r sar_r semimem_r semiten_r)
    ObjectGroup R_knee_ext: members=(rect_fem_r vas_int_r vas_lat_r vas_med_r)
    ObjectGroup R_ankle_pf: members=(flex_dig_r flex_hal_r lat_gas_r med_gas_r per_brev_r per_long_r soleus_r tib_post_r)
    ObjectGroup R_inverter: members=(ext_hal_r flex_dig_r flex_hal_r tib_ant_r tib_post_r)
    ObjectGroup R_ankle_df: members=(ext_dig_r ext_hal_r per_tert_r tib_ant_r)
    ObjectGroup R_everter: members=(ext_dig_r per_brev_r per_long_r per_tert_r)
    ObjectGroup L_hip_abd: members=(glut_max1_l glut_med1_l glut_med2_l glut_med3_l glut_min1_l glut_min2_l glut_min3_l peri_l sar_l tfl_l)
    ObjectGroup L_hip_flex: members=(add_brev_l add_long_l glut_med1_l glut_min1_l grac_l iliacus_l pect_l psoas_l rect_fem_l sar_l tfl_l)
    ObjectGroup L_hip_inrot: members=(glut_med1_l glut_min1_l iliacus_l psoas_l tfl_l)
    ObjectGroup L_hip_exrot: members=(gem_l glut_med3_l glut_min3_l peri_l quad_fem_l)
    ObjectGroup L_hip_ext: members=(add_long_l add_mag1_l add_mag2_l add_mag3_l bifemlh_l glut_max1_l glut_max2_l glut_max3_l glut_med3_l glut_min3_l semimem_l semiten_l)
    ObjectGroup L_hip_add: members=(add_brev_l add_long_l add_mag1_l add_mag2_l add_mag3_l bifemlh_l grac_l pect_l semimem_l semiten_l)
    ObjectGroup L_knee_bend: members=(bifemlh_l bifemsh_l grac_l lat_gas_l med_gas_l sar_l semimem_l semiten_l)
    ObjectGroup L_knee_ext: members=(rect_fem_l vas_int_l vas_lat_l vas_med_l)
    ObjectGroup L_ankle_pf: members=(flex_dig_l flex_hal_l lat_gas_l med_gas_l per_brev_l per_long_l soleus_l tib_post_l)
    ObjectGroup L_inverter: members=(ext_hal_l flex_dig_l flex_hal_l tib_ant_l tib_post_l)
    ObjectGroup L_ankle_df: members=(ext_dig_l ext_hal_l per_tert_l tib_ant_l)
    ObjectGroup L_everter: members=(ext_dig_l per_brev_l per_long_l per_tert_l)
    ObjectGroup back_ext: members=(ercspn_l ercspn_r)
    ObjectGroup back_rlb: members=(ercspn_r extobl_r intobl_r)
    ObjectGroup back_introt: members=(ercspn_r extobl_l intobl_r)
    ObjectGroup back_llb: members=(ercspn_l extobl_l intobl_l)
    ObjectGroup back_extrot: members=(ercspn_l extobl_r intobl_l)
    ObjectGroup back_flex: members=(extobl_l extobl_r intobl_l intobl_r)
  MarkerSet:
    Marker RASI: pelvis (0.008762871 0.01377339 0.1252911)
    Marker LASI: pelvis (0.006143326 0.009980113 -0.1310262)
    Marker CLAV: torso (0.07389266 0.3557805 -0.01261955)
    Marker RSHO: torso (-0.01976027 0.3843508 0.1749357)
    Marker LSHO: torso (-0.01690845 0.3824098 -0.1694192)
    Marker RKNE: femur_r (0.02006501 -0.4173163 0.05513063)
    Marker RKNE_med: femur_r (-0.02716563 -0.440216 -0.0506508)
    Marker RTHI1: femur_r (0.06521318 -0.1114077 0.1120796)
    Marker RTHI2: femur_r (0.003320801 -0.1185134 0.1334152)
    Marker RTHI3: femur_r (0.04041395 -0.1622775 0.1208044)
    Marker RANK: tibia_r (-0.01253531 -0.4121093 0.04811968)
    Marker RANK_med: tibia_r (0.0003546329 -0.3929537 -0.03391232)
    Marker RTIB1: tibia_r (0.01813524 -0.1967338 0.07286868)
    Marker RTIB2: tibia_r (-0.05395098 -0.2054163 0.08296131)
    Marker RTIB3: tibia_r (-0.0114094 -0.2436728 0.07699552)
    Marker LKNE: femur_l (0.02115601 -0.4125421 -0.04943929)
    Marker LKNE_med: femur_l (0.005911145 -0.4177621 0.0440494)
    Marker LTHI1: femur_l (0.1051451 -0.1944703 -0.04354274)
    Marker LTHI2: femur_l (0.06330602 -0.1948894 -0.09932725)
    Marker LTHI3: femur_l (0.08473438 -0.2452909 -0.07051976)
    Marker LANK: tibia_l (-0.007080103 -0.4058654 -0.05203657)
    Marker LANK_med: tibia_l (-0.01267525 -0.3936136 0.03296641)
    Marker LTIB1: tibia_l (0.02623082 -0.206756 -0.05459831)
    Marker LTIB2: tibia_l (-0.03490818 -0.2091925 -0.08166404)
    Marker LTIB3: tibia_l (0.0002754598 -0.2552029 -0.06855732)
    Marker RPSI: pelvis (-0.165599 0.03446201 0.02485997)
    Marker LPSI: pelvis (-0.1655745 0.03976524 -0.02333465)
    Marker RELB: humerus_r (-0.02347941 -0.2927387 -0.01170465)
    Marker LELB: humerus_l (-0.03154078 -0.3140619 0.0163705)
    Marker RW1: radius_r (-0.005164219 -0.2116827 0.04559963)
    Marker RW2: ulna_r (-0.02915264 -0.2208974 0.04035574)
    Marker LW1: radius_l (-0.001243733 -0.2251055 -0.03822309)
    Marker LW2: ulna_l (-0.03803205 -0.2314464 -0.04128587)
    Marker hum_l2: humerus_l (-0.0260907 -0.1484488 -0.03112593)
    Marker hum_r2: humerus_r (-0.02283712 -0.1423694 0.02015541)
    Marker rad_l2: radius_l (-0.0125274 -0.09837214 0.009202281)
    Marker rad_r2: radius_r (-0.01218416 -0.1240089 -0.003323793)
    Marker LH: hand_l (-0.01930804 -0.05451052 0.01131729)
    Marker RH: hand_r (-0.02321269 -0.03239039 0.0001423973)
    Marker Foot_r1: calcn_r (-0.01242661 0.04712014 0.003372451)
    Marker Foot_r2: calcn_r (-0.01901277 0.01302153 0.00761759)
    Marker Foot_r3: calcn_r (0.04484858 0.027582 0.03535122)
    Marker Foot_r4: forefoot_r (-0.02236722 -0.002875031 0.04607593)
    Marker Foot_r5: forefoot_r (0.04647907 -0.007447853 0.06577853)
    Marker Foot_r6: toes_r (0.02264763 0.02324956 0.01591996)
    Marker Foot_r7: toes_r (0.05369102 0.01861586 -0.02435677)
    Marker Foot_r8: forefoot_r (0.08078574 0.001870196 -0.03713958)
    Marker Foot_r9: forefoot_r (0.02849789 0.02343617 -0.03137838)
    Marker Foot_r10: calcn_r (0.0535256 0.03909548 -0.03972037)
    Marker Foot_l1: calcn_l (-0.02228468 0.0403714 -0.006913784)
    Marker Foot_l2: calcn_l (-0.02534942 0.007274217 -0.01020576)
    Marker Foot_l3: calcn_l (0.04416436 0.02840796 -0.03689327)
    Marker Foot_l4: forefoot_l (-0.0206478 0.0002024851 -0.04389372)
    Marker Foot_l5: forefoot_l (0.05514101 -0.005327901 -0.05421513)
    Marker Foot_l6: toes_l (0.01423896 0.02204451 -0.002952386)
    Marker Foot_l7: toes_l (0.04250901 0.01657066 0.03596706)
    Marker Foot_l8: forefoot_l (0.07037393 0.004544138 0.0443498)
    Marker Foot_l9: forefoot_l (0.008010992 0.01371268 0.04145339)
    Marker Foot_l10: calcn_l (0.03527088 0.03606314 0.03620474)
  ContactGeometrySet:
    ContactHalfSpace floor: socket_frame=/ground location=(0 0 0) orientation=(0 0 -1.570796)
    ContactSphere heel_r: socket_frame=/bodyset/calcn_r location=(0.01 0.006922918 -0.0049972) radius=0.032
    ContactSphere hindfoot_lat_r: socket_frame=/bodyset/calcn_r location=(0.06 0.01192292 0.020001) radius=0.032
    ContactSphere forefoot_lat_r: socket_frame=/bodyset/forefoot_r location=(0.06397017 -0.01140601 0.02274865)
        radius=0.023
    ContactSphere forefoot_med_r: socket_frame=/bodyset/forefoot_r location=(0.06397017 -0.01140601 -0.008434048)
        radius=0.021
    ContactSphere hallux_r: socket_frame=/bodyset/toes_r location=(0.053154 -0.001538541 -0.0034173) radius=0.016
    ContactSphere heel_l: socket_frame=/bodyset/calcn_l location=(0.01 0.006922918 0.0049972) radius=0.032
    ContactSphere hindfoot_lat_l: socket_frame=/bodyset/calcn_l location=(0.06 0.01192292 -0.020001) radius=0.032
    ContactSphere forefoot_lat_l: socket_frame=/bodyset/forefoot_l location=(0.06397017 -0.01140601 -0.02274865)
        radius=0.023
    ContactSphere forefoot_med_l: socket_frame=/bodyset/forefoot_l location=(0.06397017 -0.01140601 0.008434048)
        radius=0.021
    ContactSphere hallux_l: socket_frame=/bodyset/toes_l location=(0.053154 -0.001538541 0.0034173) radius=0.016
