# OpenSim document version 40000
Model DetailedFootModel_scaled_default:
  gravity: 0 -9.80665 0
  length_units: meters
  force_units: N
  credits:
    Delp S.L., Loan J.P., Hoy M.G., Zajac F.E., Topp E.L., Rosen J.M., Thelen D.G., Anderson F.C., Seth A. Notes: 3D, 23 DOF gait model created by D.G. Thelen, Univ. of Wisconsin-Madison, and Ajay Seth, Frank C. Anderson, and Scott L. Delp, Stanford University. Lower extremity joint defintions based on Delp et al. (1990). Low back joint and anthropometry based on Anderson and Pandy (1999, 2001). Planar knee model of Yamaguchi and Zajac (1989). Seth replaced tibia translation constraints with a CustomJoint for the knee and removed the patella to eliminate all kinematic constraints; insertions of the quadrucepts are handled with moving points in the tibia frame as defined by Delp 1990. License: Creative Commons (CCBY 3.0). You are free to distribute, remix, tweak, and build upon this work, even commercially, as long as you credit us for the original creation. http://creativecommons.org/licenses/by/3.0/ More Information: http://simtk-confluence.stanford.edu:8080/display/OpenSim/Gait+2392+and+2354+Models
  publications:
    Delp, S.L., Loan, J.P., Hoy, M.G., Zajac, F.E., Topp E.L., Rosen, J.M.: An interactive graphics-based model of the lower extremity to study orthopaedic surgical procedures, IEEE Transactions on Biomedical Engineering, vol. 37, pp. 757-767, 1990. Yamaguchi G.T., Zajac F.E.: A planar model of the knee joint to characterize the knee extensor mechanism." J . Biomecl7. vol. 21. pp. 1-10. 1989. Anderson F.C., Pandy M.G.: A dynamic optimization solution for vertical jumping in three dimensions. Computer Methods in Biomechanics and Biomedical Engineering 2:201-231, 1999. Anderson F.C., Pandy M.G.: Dynamic optimization of human walking. Journal of Biomechanical Engineering 123:381-390, 2001.
  Ground: meshes=treadmill.vtp
  BodySet:
    Body pelvis: mass=11.84628 [kg] mass_center=(-0.0707 0 0) inertia=(0.1034047 0.08761235 0.05824059 0 0 0)
        meshes=(sacrum.vtp pelvis.vtp l_pelvis.vtp)
    Body femur_r: mass=9.356114 mass_center=(0 -0.17 0) inertia=(0.1346876 0.03530647 0.1420306 0 0 0) meshes=femur.vtp
    Body tibia_r: mass=3.729309 mass_center=(0 -0.1867 0) inertia=(0.05069647 0.00513 0.05140059 0 0 0)
        meshes=(tibia.vtp fibula.vtp)
    Body femur_l: mass=9.356114 mass_center=(0 -0.17 0) inertia=(0.1346876 0.03530647 0.1420306 0 0 0)
        meshes=l_femur.vtp
    Body tibia_l: mass=3.729309 mass_center=(0 -0.1867 0) inertia=(0.05069647 0.00513 0.05140059 0 0 0)
        meshes=(l_tibia.vtp l_fibula.vtp)
    Body torso: mass=34.43799 mass_center=(-0.03 0.32 0) inertia=(1.483173 0.7599441 1.43982 0 0 0)
        meshes=(hat_spine.vtp hat_jaw.vtp hat_skull.vtp hat_ribs.vtp)
    Body humerus_r: mass=2.044456 mass_center=(0 -0.164502 0) inertia=(0.01201627 0.004145241 0.01348788 0 0 0)
        meshes=humerus_rv.vtp
    Body humerus_l: mass=2.044456 mass_center=(0 -0.164502 0) inertia=(0.01201627 0.004145241 0.01348788 0 0 0)
        meshes=humerus_lv.vtp
    Body ulna_r: mass=0.6110735 mass_center=(0 -0.120525 0) inertia=(0.002979423 0.0006216353 0.0032319 0 0 0)
        meshes=ulna_rv.vtp
    Body ulna_l: mass=0.6110735 mass_center=(0 -0.120525 0) inertia=(0.002979423 0.0006216353 0.0032319 0 0 0)
        meshes=ulna_lv.vtp
    Body radius_r: mass=0.6110735 mass_center=(0 -0.120525 0) inertia=(0.002979423 0.0006216353 0.0032319 0 0 0)
        meshes=radius_rv.vtp
    Body radius_l: mass=0.6110735 mass_center=(0 -0.120525 0) inertia=(0.002979423 0.0006216353 0.0032319 0 0 0)
        meshes=radius_lv.vtp
    Body hand_r: mass=0.4601912 mass_center=(0 -0.068095 0) inertia=(0.000897247 0.0005502176 0.001347882 0 0 0)
        meshes=(pisiform_rvs.vtp lunate_rvs.vtp scaphoid_rvs.vtp triquetrum_rvs.vtp hamate_rvs.vtp capitate_rvs.vtp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)
    Body hand_l: mass=0.4601912 mass_center=(0 -0.068095 0) inertia=(0.000897247 0.0005502176 0.001347882 0 0 0)
        meshes=(pisiform_lvs.vtp lunate_lvs.vtp scaphoid_lvs.vtp triquetrum_lvs.vtp hamate_lvs.vtp capitate_lvs.vtp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)
    Body talus_r: mass=0.05963147 mass_center=(0.01382227 -0.00464006 -0.006294771)
        inertia=(0.00058612 0.0007528677 0.00058612 0 0 0) meshes=model_r_talus.stl
    Body calcn_r: mass=0.2126925 mass_center=(-0.01825354 -0.009254555 0.001706938)
        inertia=(0.00058612 0.0007528677 0.00058612 0 0 0) meshes=model_r_calcaneus.stl
    Body midfoot_r: mass=0.1026244 mass_center=(0.01351801 -0.00394011 -0.002291719)
        inertia=(0.00058612 0.0007528677 0.00058612 0 0 0) meshes=model_r_midfoot.stl
    Body forefoot_r: mass=0.1732709 mass_center=(0.03012049 -0.005038718 -0.0004181357)
        inertia=(0.00058612 0.0007528677 0.00058612 0 0 0) meshes=model_r_forefoot.stl
    Body toes_r: mass=0.09525126 mass_center=(0.02393737 -0.00413495 -0.00341324)
        inertia=(0.00058612 0.0007528677 0.00058612 0 0 0) meshes=model_r_toes.stl
    Body talus_l: mass=0.05963147 mass_center=(0.01382227 -0.00464006 0.006294771)
        inertia=(0.00058612 0.0007528677 0.00058612 0 0 0) meshes=model_l_talus.stl
    Body calcn_l: mass=0.2126925 mass_center=(-0.01825354 -0.009254555 -0.001706938)
        inertia=(0.00058612 0.0007528677 0.00058612 0 0 0) meshes=model_l_calcaneus.stl
    Body midfoot_l: mass=0.1026244 mass_center=(0.01351801 -0.00394011 0.002291719)
        inertia=(0.00058612 0.0007528677 0.00058612 0 0 0) meshes=model_l_midfoot.stl
    Body forefoot_l: mass=0.1732709 mass_center=(0.03012049 -0.005038718 0.0004181357)
        inertia=(0.00058612 0.0007528677 0.00058612 0 0 0) meshes=model_l_forefoot.stl
    Body toes_l: mass=0.09525126 mass_center=(0.02393737 -0.00413495 0.00341324)
        inertia=(0.00058612 0.0007528677 0.00058612 0 0 0) meshes=model_l_toes.stl
  JointSet:
    CustomJoint ground_pelvis: socket_parent_frame=ground_offset socket_child_frame=pelvis_offset
      Coordinate pelvis_tilt: default_value=0 range=(-1.570796 1.570796) clamped=true
      Coordinate pelvis_list: default_value=0 range=(-1.570796 1.570796) clamped=true
      Coordinate pelvis_rotation: default_value=0 range=(-1.570796 1.570796) clamped=true
      Coordinate pelvis_tx: default_value=0 range=(-5 5) clamped=true
      Coordinate pelvis_ty: default_value=0 range=(-1 2) clamped=true
      Coordinate pelvis_tz: default_value=0 range=(-3 3) clamped=true
      PhysicalOffsetFrame ground_offset: socket_parent=/ground translation=(0 0 0) [meters]
      PhysicalOffsetFrame pelvis_offset: socket_parent=/bodyset/pelvis translation=(0 0 0)
      SpatialTransform:
        TransformAxis rotation1: coordinates=pelvis_tilt axis=(0 0 1) LinearFunction(coefficients=1 0)
        TransformAxis rotation2: coordinates=pelvis_list axis=(1 0 0) LinearFunction(coefficients=1 0)
        TransformAxis rotation3: coordinates=pelvis_rotation axis=(0 1 0) LinearFunction(coefficients=1 0)
        TransformAxis translation1: coordinates=pelvis_tx axis=(1 0 0) LinearFunction(coefficients=1 0)
        TransformAxis translation2: coordinates=pelvis_ty axis=(0 1 0) LinearFunction(coefficients=1 0)
        TransformAxis translation3: coordinates=pelvis_tz axis=(0 0 1) LinearFunction(coefficients=1 0)
    CustomJoint hip_r: socket_parent_frame=pelvis_offset socket_child_frame=femur_r_offset
      Coordinate hip_flexion_r: default_value=0 range=(-2.094395 2.094395) clamped=true
      Coordinate hip_adduction_r: default_value=0 range=(-2.094395 2.094395) clamped=true
      Coordinate hip_rotation_r: default_value=0 range=(-2.094395 2.094395) clamped=true
      PhysicalOffsetFrame pelvis_offset: socket_parent=/bodyset/pelvis translation=(-0.0707 -0.0661 0.0835)
      PhysicalOffsetFrame femur_r_offset: socket_parent=/bodyset/femur_r translation=(0 0 0)
      SpatialTransform: axes_held_at_zero=(translation1 translation2 translation3)
        TransformAxis rotation1: coordinates=hip_flexion_r axis=(0 0 1) LinearFunction(coefficients=1 0)
        TransformAxis rotation2: coordinates=hip_adduction_r axis=(1 0 0) LinearFunction(coefficients=1 0)
        TransformAxis rotation3: coordinates=hip_rotation_r axis=(0 1 0) LinearFunction(coefficients=1 0)
    CustomJoint knee_r: socket_parent_frame=femur_r_offset socket_child_frame=tibia_r_offset
      Coordinate knee_angle_r: default_value=0 range=(-2.094395 0.1745329) clamped=true
      PhysicalOffsetFrame femur_r_offset: socket_parent=/bodyset/femur_r translation=(0 0 0)
      PhysicalOffsetFrame tibia_r_offset: socket_parent=/bodyset/tibia_r translation=(0 0 0)
      SpatialTransform: axes_held_at_zero=(rotation2 rotation3 translation3)
        TransformAxis rotation1: coordinates=knee_angle_r axis=(0 0 1) LinearFunction(coefficients=1 0)
        TransformAxis translation1: coordinates=knee_angle_r axis=(1 0 0)
          MultiplierFunction: scale=1
            SimmSpline: x=(-2.0944 -1.74533 -1.39626 -1.0472 -0.698132 -0.349066 -0.174533 0.197344 0.337395 0.490178 1.52146 2.0944)
                y=(-0.0032 0.00179 0.00411 0.0041 0.00212 -0.001 -0.0031 -0.005227 -0.005435 -0.005574 -0.005435 -0.00525)
        TransformAxis translation2: coordinates=knee_angle_r axis=(0 1 0)
          MultiplierFunction: scale=1
            SimmSpline: x=(-2.0944 -1.22173 -0.523599 -0.349066 -0.174533 0.159149 2.0944)
                y=(-0.4226 -0.4082 -0.399 -0.3976 -0.3966 -0.395264 -0.396)
    CustomJoint hip_l: socket_parent_frame=pelvis_offset socket_child_frame=femur_l_offset
      Coordinate hip_flexion_l: default_value=0 range=(-2.094395 2.094395) clamped=true
      Coordinate hip_adduction_l: default_value=0 range=(-2.094395 2.094395) clamped=true
      Coordinate hip_rotation_l: default_value=0 range=(-2.094395 2.094395) clamped=true
      PhysicalOffsetFrame pelvis_offset: socket_parent=/bodyset/pelvis translation=(-0.0707 -0.0661 -0.0835)
      PhysicalOffsetFrame femur_l_offset: socket_parent=/bodyset/femur_l translation=(0 0 0)
      SpatialTransform: axes_held_at_zero=(translation1 translation2 translation3)
        TransformAxis rotation1: coordinates=hip_flexion_l axis=(0 0 1) LinearFunction(coefficients=1 0)
        TransformAxis rotation2: coordinates=hip_adduction_l axis=(-1 0 0) LinearFunction(coefficients=1 0)
        TransformAxis rotation3: coordinates=hip_rotation_l axis=(0 -1 0) LinearFunction(coefficients=1 0)
    CustomJoint knee_l: socket_parent_frame=femur_l_offset socket_child_frame=tibia_l_offset
      Coordinate knee_angle_l: default_value=0 range=(-2.094395 0.1745329) clamped=true
      PhysicalOffsetFrame femur_l_offset: socket_parent=/bodyset/femur_l translation=(0 0 0)
      PhysicalOffsetFrame tibia_l_offset: socket_parent=/bodyset/tibia_l translation=(0 0 0)
      SpatialTransform: axes_held_at_zero=(rotation2 rotation3 translation3)
        TransformAxis rotation1: coordinates=knee_angle_l axis=(0 0 1) LinearFunction(coefficients=1 0)
        TransformAxis translation1: coordinates=knee_angle_l axis=(1 0 0)
          MultiplierFunction: scale=1
            SimmSpline: x=(-2.0944 -1.74533 -1.39626 -1.0472 -0.698132 -0.349066 -0.174533 0.197344 0.337395 0.490178 1.52146 2.0944)
                y=(-0.0032 0.00179 0.00411 0.0041 0.00212 -0.001 -0.0031 -0.005227 -0.005435 -0.005574 -0.005435 -0.00525)
        TransformAxis translation2: coordinates=knee_angle_l axis=(0 1 0)
          MultiplierFunction: scale=1
            SimmSpline: x=(-2.0944 -1.22173 -0.523599 -0.349066 -0.174533 0.159149 2.0944)
                y=(-0.4226 -0.4082 -0.399 -0.3976 -0.3966 -0.395264 -0.396)
    CustomJoint back: socket_parent_frame=pelvis_offset socket_child_frame=torso_offset
      Coordinate lumbar_extension: default_value=0 range=(-1.570796 1.570796) clamped=true
      Coordinate lumbar_bending: default_value=0 range=(-1.570796 1.570796) clamped=true
      Coordinate lumbar_rotation: default_value=0 range=(-1.570796 1.570796) clamped=true
      PhysicalOffsetFrame pelvis_offset: socket_parent=/bodyset/pelvis translation=(-0.1007 0.0815 0)
      PhysicalOffsetFrame torso_offset: socket_parent=/bodyset/torso translation=(0 0 0)
      SpatialTransform: axes_held_at_zero=(translation1 translation2 translation3)
        TransformAxis rotation1: coordinates=lumbar_extension axis=(0 0 1) LinearFunction(coefficients=1 0)
        TransformAxis rotation2: coordinates=lumbar_bending axis=(1 0 0) LinearFunction(coefficients=1 0)
        TransformAxis rotation3: coordinates=lumbar_rotation axis=(0 1 0) LinearFunction(coefficients=1 0)
    CustomJoint acromial_r: socket_parent_frame=torso_offset socket_child_frame=humerus_r_offset
      Coordinate arm_flex_r: default_value=0 range=(-1.570796 1.570796) clamped=true
      Coordinate arm_add_r: default_value=0 range=(-2.094395 1.570796) clamped=true
      Coordinate arm_rot_r: default_value=0 range=(-1.570796 1.570796) clamped=true
      PhysicalOffsetFrame torso_offset: socket_parent=/bodyset/torso translation=(0.003155 0.3715 0.17)
      PhysicalOffsetFrame humerus_r_offset: socket_parent=/bodyset/humerus_r translation=(0 0 0)
      SpatialTransform: axes_held_at_zero=(translation1 translation2 translation3)
        TransformAxis rotation1: coordinates=arm_flex_r axis=(0 0 1) LinearFunction(coefficients=1 0)
        TransformAxis rotation2: coordinates=arm_add_r axis=(1 0 0) LinearFunction(coefficients=1 0)
        TransformAxis rotation3: coordinates=arm_rot_r axis=(0 1 0) LinearFunction(coefficients=1 0)
    CustomJoint acromial_l: socket_parent_frame=torso_offset socket_child_frame=humerus_l_offset
      Coordinate arm_flex_l: default_value=0 range=(-1.570796 1.570796) clamped=true
      Coordinate arm_add_l: default_value=0 range=(-2.094395 1.570796) clamped=true
      Coordinate arm_rot_l: default_value=0 range=(-1.570796 1.570796) clamped=true
      PhysicalOffsetFrame torso_offset: socket_parent=/bodyset/torso translation=(0.003155 0.3715 -0.17)
      PhysicalOffsetFrame humerus_l_offset: socket_parent=/bodyset/humerus_l translation=(0 0 0)
      SpatialTransform: axes_held_at_zero=(translation1 translation2 translation3)
        TransformAxis rotation1: coordinates=arm_flex_l axis=(0 0 1) LinearFunction(coefficients=1 0)
        TransformAxis rotation2: coordinates=arm_add_l axis=(-1 0 0) LinearFunction(coefficients=1 0)
        TransformAxis rotation3: coordinates=arm_rot_l axis=(0 -1 0) LinearFunction(coefficients=1 0)
    CustomJoint elbow_r: socket_parent_frame=humerus_r_offset socket_child_frame=ulna_r_offset
      Coordinate elbow_flex_r: default_value=0 range=(0 2.618) clamped=true
      PhysicalOffsetFrame humerus_r_offset: socket_parent=/bodyset/humerus_r translation=(0.013144 -0.286273 -0.009595)
      PhysicalOffsetFrame ulna_r_offset: socket_parent=/bodyset/ulna_r translation=(0 0 0)
      SpatialTransform: axes_held_at_zero=(rotation2 rotation3 translation1 translation2 translation3)
        TransformAxis rotation1: coordinates=elbow_flex_r axis=(0.226047 0.022269 0.9738618)
            LinearFunction(coefficients=1 0)
    CustomJoint elbow_l: socket_parent_frame=humerus_l_offset socket_child_frame=ulna_l_offset
      Coordinate elbow_flex_l: default_value=0 range=(0 2.618) clamped=true
      PhysicalOffsetFrame humerus_l_offset: socket_parent=/bodyset/humerus_l translation=(0.013144 -0.286273 0.009595)
      PhysicalOffsetFrame ulna_l_offset: socket_parent=/bodyset/ulna_l translation=(0 0 0)
      SpatialTransform: axes_held_at_zero=(rotation2 rotation3 translation1 translation2 translation3)
        TransformAxis rotation1: coordinates=elbow_flex_l axis=(-0.226047 -0.022269 0.9738618)
            LinearFunction(coefficients=1 0)
    CustomJoint radioulnar_r: socket_parent_frame=ulna_r_offset socket_child_frame=radius_r_offset
      Coordinate pro_sup_r: default_value=0 range=(0 1.570796) clamped=true
      PhysicalOffsetFrame ulna_r_offset: socket_parent=/bodyset/ulna_r translation=(-0.006727 -0.013007 0.026083)
      PhysicalOffsetFrame radius_r_offset: socket_parent=/bodyset/radius_r translation=(0 0 0)
      SpatialTransform: axes_held_at_zero=(rotation2 rotation3 translation1 translation2 translation3)
        TransformAxis rotation1: coordinates=pro_sup_r axis=(0.05639803 0.9984065 0.001952)
            LinearFunction(coefficients=1 0)
    CustomJoint radioulnar_l: socket_parent_frame=ulna_l_offset socket_child_frame=radius_l_offset
      Coordinate pro_sup_l: default_value=0 range=(0 1.570796) clamped=true
      PhysicalOffsetFrame ulna_l_offset: socket_parent=/bodyset/ulna_l translation=(-0.006727 -0.013007 -0.026083)
      PhysicalOffsetFrame radius_l_offset: socket_parent=/bodyset/radius_l translation=(0 0 0)
      SpatialTransform: axes_held_at_zero=(rotation2 rotation3 translation1 translation2 translation3)
        TransformAxis rotation1: coordinates=pro_sup_l axis=(-0.05639803 -0.9984065 0.001952)
            LinearFunction(coefficients=1 0)
    CustomJoint radius_hand_r: socket_parent_frame=radius_r_offset socket_child_frame=hand_r_offset
      Coordinate wrist_flex_r: default_value=0 range=(-1.22173 1.22173) clamped=true locked=true
      Coordinate wrist_dev_r: default_value=0 range=(-0.4363323 0.6108652) clamped=true locked=true
      PhysicalOffsetFrame radius_r_offset: socket_parent=/bodyset/radius_r translation=(-0.008797 -0.235841 0.01361)
      PhysicalOffsetFrame hand_r_offset: socket_parent=/bodyset/hand_r translation=(0 0 0)
      SpatialTransform: axes_held_at_zero=(rotation3 translation1 translation2 translation3)
        TransformAxis rotation1: coordinates=wrist_flex_r axis=(0 0 1) LinearFunction(coefficients=1 0)
        TransformAxis rotation2: coordinates=wrist_dev_r axis=(1 0 0) LinearFunction(coefficients=1 0)
    CustomJoint radius_hand_l: socket_parent_frame=radius_l_offset socket_child_frame=hand_l_offset
      Coordinate wrist_flex_l: default_value=0 range=(-1.22173 1.22173) clamped=true locked=true
      Coordinate wrist_dev_l: default_value=0 range=(-0.4363323 0.6108652) clamped=true locked=true
      PhysicalOffsetFrame radius_l_offset: socket_parent=/bodyset/radius_l translation=(-0.008797 -0.235841 -0.01361)
      PhysicalOffsetFrame hand_l_offset: socket_parent=/bodyset/hand_l translation=(0 0 0)
      SpatialTransform: axes_held_at_zero=(rotation3 translation1 translation2 translation3)
        TransformAxis rotation1: coordinates=wrist_flex_l axis=(0 0 1) LinearFunction(coefficients=1 0)
        TransformAxis rotation2: coordinates=wrist_dev_l axis=(-1 0 0) LinearFunction(coefficients=1 0)
    CustomJoint Ankle_r: socket_parent_frame=tibia_r_offset socket_child_frame=talus_r_offset
      Coordinate ankle_pfdf_r: default_value=0 range=(-1.570796 1.570796) clamped=true
      PhysicalOffsetFrame tibia_r_offset: socket_parent=/bodyset/tibia_r translation=(0 -0.415 0)
      PhysicalOffsetFrame talus_r_offset: socket_parent=/bodyset/talus_r translation=(0 0 0)
      SpatialTransform: axes_held_at_zero=(rotation2 rotation3 translation1 translation2 translation3)
        TransformAxis rotation1: coordinates=ankle_pfdf_r axis=(-0.1939352 -0.2076954 0.9587762)
            LinearFunction(coefficients=1 0)
    CustomJoint Subtalar_r: socket_parent_frame=talus_r_offset socket_child_frame=calcn_r_offset
      Coordinate subtalar_inev_r: default_value=0 range=(-1.570796 1.570796) clamped=true
      PhysicalOffsetFrame talus_r_offset: socket_parent=/bodyset/talus_r
          translation=(0.0102647 -0.02301201 0.001360617)
      PhysicalOffsetFrame calcn_r_offset: socket_parent=/bodyset/calcn_r translation=(0 0 0)
      SpatialTransform: axes_held_at_zero=(rotation2 rotation3 translation1 translation2 translation3)
        TransformAxis rotation1: coordinates=subtalar_inev_r axis=(-0.632764 -0.5888661 0.5028383)
            LinearFunction(coefficients=1 0)
    CustomJoint midtarsal_r: socket_parent_frame=calcn_r_offset socket_child_frame=midfoot_r_offset
      Coordinate mtj_angle_r: default_value=0 range=(-1.570796 1.570796) clamped=true
      PhysicalOffsetFrame calcn_r_offset: socket_parent=/bodyset/calcn_r
          translation=(0.0219747 0.004096376 -0.0009479607)
      PhysicalOffsetFrame midfoot_r_offset: socket_parent=/bodyset/midfoot_r translation=(0 0 0)
      SpatialTransform: axes_held_at_zero=(rotation2 rotation3 translation1 translation2 translation3)
        TransformAxis rotation1: coordinates=mtj_angle_r axis=(0.020132 -0.30093 0.95344)
            LinearFunction(coefficients=1 0)
    CustomJoint Tarsometatarsal_r: socket_parent_frame=midfoot_r_offset socket_child_frame=forefoot_r_offset
      Coordinate tarsometatarsal_1r_r: default_value=0 range=(-1.570796 1.570796) clamped=true
      Coordinate tarsometatarsal_5r_r: default_value=0 range=(-1.570796 1.570796) clamped=true
      PhysicalOffsetFrame midfoot_r_offset: socket_parent=/bodyset/midfoot_r
          translation=(0.02228641 -0.009597949 0.00462027)
      PhysicalOffsetFrame forefoot_r_offset: socket_parent=/bodyset/forefoot_r translation=(0 0 0)
      SpatialTransform: axes_held_at_zero=(rotation3 translation1 translation2 translation3)
        TransformAxis rotation1: coordinates=tarsometatarsal_1r_r axis=(-0.7099002 0.08849488 -0.6987205)
            LinearFunction(coefficients=1 0)
        TransformAxis rotation2: coordinates=tarsometatarsal_5r_r axis=(-0.7560945 -0.3167572 0.5727006)
            LinearFunction(coefficients=1 0)
    CustomJoint Metatarsophalangeal_r: socket_parent_frame=forefoot_r_offset socket_child_frame=toes_r_offset
      Coordinate metatarsophalangeal_pfdf_r: default_value=0 range=(-1.570796 1.570796) clamped=true
      Coordinate metatarsophalangeal_abad_r: default_value=0 range=(-1.570796 1.570796) clamped=true
      PhysicalOffsetFrame forefoot_r_offset: socket_parent=/bodyset/forefoot_r
          translation=(0.06000507 -0.01024931 0.002898407)
      PhysicalOffsetFrame toes_r_offset: socket_parent=/bodyset/toes_r translation=(0 0 0)
      SpatialTransform: axes_held_at_zero=(rotation3 translation1 translation2 translation3)
        TransformAxis rotation1: coordinates=metatarsophalangeal_pfdf_r axis=(-0.2829966 0.04242228 0.9581823)
            LinearFunction(coefficients=1 0)
        TransformAxis rotation2: coordinates=metatarsophalangeal_abad_r axis=(0.1961543 0.9804655 0.01452481)
            LinearFunction(coefficients=1 0)
    CustomJoint Ankle_l: socket_parent_frame=tibia_l_offset socket_child_frame=talus_l_offset
      Coordinate ankle_pfdf_l: default_value=0 range=(-1.570796 1.570796) clamped=true
      PhysicalOffsetFrame tibia_l_offset: socket_parent=/bodyset/tibia_l translation=(0 -0.415 0)
      PhysicalOffsetFrame talus_l_offset: socket_parent=/bodyset/talus_l translation=(0 0 0)
      SpatialTransform: axes_held_at_zero=(rotation2 rotation3 translation1 translation2 translation3)
        TransformAxis rotation1: coordinates=ankle_pfdf_l axis=(0.1939352 0.2076954 0.9587762)
            LinearFunction(coefficients=1 0)
    CustomJoint Subtalar_l: socket_parent_frame=talus_l_offset socket_child_frame=calcn_l_offset
      Coordinate subtalar_inev_l: default_value=0 range=(-1.570796 1.570796) clamped=true
      PhysicalOffsetFrame talus_l_offset: socket_parent=/bodyset/talus_l
          translation=(0.0102647 -0.02301201 -0.001360617)
      PhysicalOffsetFrame calcn_l_offset: socket_parent=/bodyset/calcn_l translation=(0 0 0)
      SpatialTransform: axes_held_at_zero=(rotation2 rotation3 translation1 translation2 translation3)
        TransformAxis rotation1: coordinates=subtalar_inev_l axis=(0.632764 0.5888661 0.5028383)
            LinearFunction(coefficients=1 0)
    CustomJoint midtarsal_l: socket_parent_frame=calcn_l_offset socket_child_frame=midfoot_l_offset
      Coordinate mtj_angle_l: default_value=0 range=(-1.570796 1.570796) clamped=true
      PhysicalOffsetFrame calcn_l_offset: socket_parent=/bodyset/calcn_l
          translation=(0.0219747 0.004096376 0.0009479607)
      PhysicalOffsetFrame midfoot_l_offset: socket_parent=/bodyset/midfoot_l translation=(0 0 0)
      SpatialTransform: axes_held_at_zero=(rotation2 rotation3 translation1 translation2 translation3)
        TransformAxis rotation1: coordinates=mtj_angle_l axis=(-0.020132 0.30093 0.95344)
            LinearFunction(coefficients=1 0)
    CustomJoint Tarsometatarsal_l: socket_parent_frame=midfoot_l_offset socket_child_frame=forefoot_l_offset
      Coordinate tarsometatarsal_1r_l: default_value=0 range=(-1.570796 1.570796) clamped=true
      Coordinate tarsometatarsal_5r_l: default_value=0 range=(-1.570796 1.570796) clamped=true
      PhysicalOffsetFrame midfoot_l_offset: socket_parent=/bodyset/midfoot_l
          translation=(0.02228641 -0.009597949 -0.00462027)
      PhysicalOffsetFrame forefoot_l_offset: socket_parent=/bodyset/forefoot_l translation=(0 0 0)
      SpatialTransform: axes_held_at_zero=(rotation3 translation1 translation2 translation3)
        TransformAxis rotation1: coordinates=tarsometatarsal_1r_l axis=(0.7099002 -0.08849488 -0.6987205)
            LinearFunction(coefficients=1 0)
        TransformAxis rotation2: coordinates=tarsometatarsal_5r_l axis=(0.7560945 0.3167572 0.5727006)
            LinearFunction(coefficients=1 0)
    CustomJoint Metatarsophalangeal_l: socket_parent_frame=forefoot_l_offset socket_child_frame=toes_l_offset
      Coordinate metatarsophalangeal_pfdf_l: default_value=0 range=(-1.570796 1.570796) clamped=true
      Coordinate metatarsophalangeal_abad_l: default_value=0 range=(-1.570796 1.570796) clamped=true
      PhysicalOffsetFrame forefoot_l_offset: socket_parent=/bodyset/forefoot_l
          translation=(0.06000507 -0.01024931 -0.002898407)
      PhysicalOffsetFrame toes_l_offset: socket_parent=/bodyset/toes_l translation=(0 0 0)
      SpatialTransform: axes_held_at_zero=(rotation3 translation1 translation2 translation3)
        TransformAxis rotation1: coordinates=metatarsophalangeal_pfdf_l axis=(0.2829966 -0.04242228 0.9581823)
            LinearFunction(coefficients=1 0)
        TransformAxis rotation2: coordinates=metatarsophalangeal_abad_l axis=(-0.1961543 -0.9804655 0.01452481)
            LinearFunction(coefficients=1 0)
  ForceSet:
    Thelen2003Muscle [values shared by the 92 below unless stated]: optimal_force=1 max_contraction_velocity=10
        FmaxTendonStrain=0.033 FmaxMuscleStrain=0.6 KshapeActive=0.5 KshapePassive=4 Af=0.3 Flen=1.8
        activation_time_constant=0.01 [seconds] deactivation_time_constant=0.04 [seconds]
    Thelen2003Muscle glut_med1_r: max_isometric_force=819 optimal_fiber_length=0.04810614
        tendon_slack_length=0.07013606 pennation_angle_at_optimal=0.1396263 [radians]
      PathPoint P1: pelvis (-0.035779 0.0266589 0.09951)
      PathPoint P2: femur_r (-0.0208446 -0.0111872 0.0530677)
    Thelen2003Muscle glut_med2_r: max_isometric_force=573 optimal_fiber_length=0.0756235 tendon_slack_length=0.04743249
        pennation_angle_at_optimal=0
      PathPoint P1: pelvis (-0.0749781 0.0390237 0.0630477)
      PathPoint P2: femur_r (-0.0246693 -0.00554581 0.0503904)
    Thelen2003Muscle glut_med3_r: max_isometric_force=653 optimal_fiber_length=0.05775252 tendon_slack_length=0.0473821
        pennation_angle_at_optimal=0.3316126
      PathPoint P1: pelvis (-0.107249 0.00920783 0.0533354)
      PathPoint P2: femur_r (-0.0295458 -0.00449402 0.0495298)
    Thelen2003Muscle glut_min1_r: max_isometric_force=270 optimal_fiber_length=0.06239785
        tendon_slack_length=0.01468185 pennation_angle_at_optimal=0.1745329
      PathPoint P1: pelvis (-0.0409529 -0.00701549 0.0869169)
      PathPoint P2: femur_r (-0.00688445 -0.00994421 0.0535457)
    Thelen2003Muscle glut_min2_r: max_isometric_force=285 optimal_fiber_length=0.05151584
        tendon_slack_length=0.02391807 pennation_angle_at_optimal=0
      PathPoint P1: pelvis (-0.0555101 -0.00570009 0.0815669)
      PathPoint P2: femur_r (-0.00917927 -0.00994421 0.0535457)
    Thelen2003Muscle glut_min3_r: max_isometric_force=323 optimal_fiber_length=0.03479573
        tendon_slack_length=0.04669953 pennation_angle_at_optimal=0.01745329
      PathPoint P1: pelvis (-0.0731365 -0.0055247 0.0704554)
      PathPoint P2: femur_r (-0.0129083 -0.00793624 0.0525896)
    Thelen2003Muscle semimem_r: max_isometric_force=1288 optimal_fiber_length=0.07724307 tendon_slack_length=0.3466283
        pennation_angle_at_optimal=0.2617994
      PathPoint P1: pelvis (-0.104531 -0.085475 0.0588582)
      ConditionalPathPoint P2: tibia_r (-0.0342748 -0.0346589 -0.0186246)
          socket_coordinate=/jointset/knee_r/knee_angle_r range=(-0.558505 0.174533) [radians]
      PathPoint P3: tibia_r (-0.0265925 -0.0469899 -0.0192746)
    Thelen2003Muscle semiten_r: max_isometric_force=410 optimal_fiber_length=0.1950483 tendon_slack_length=0.2479345
        pennation_angle_at_optimal=0.08726646
      PathPoint P1: pelvis (-0.110801 -0.0963578 0.0497056)
      ConditionalPathPoint P2: tibia_r (-0.0413957 -0.0281585 -0.0224263)
          socket_coordinate=/jointset/knee_r/knee_angle_r range=(-0.331613 0.174533)
      PathPoint P3: tibia_r (-0.0327186 -0.0520228 -0.0225347)
      PathPoint P4: tibia_r (-0.0111295 -0.0734741 -0.0241302)
      PathPoint P5: tibia_r (0.00265925 -0.0941572 -0.0190087)
    Thelen2003Muscle bifemlh_r: max_isometric_force=896 optimal_fiber_length=0.1053079 tendon_slack_length=0.3149576
        pennation_angle_at_optimal=0
      PathPoint P1: pelvis (-0.110459 -0.0899474 0.0571545)
      PathPoint P2: tibia_r (-0.0296457 -0.0354567 0.0289858)
      PathPoint P3: tibia_r (-0.0230468 -0.0554503 0.0337823)
    Thelen2003Muscle bifemsh_r: max_isometric_force=804 optimal_fiber_length=0.1667007 tendon_slack_length=0.08575934
        pennation_angle_at_optimal=0.4014257
      PathPoint P1: femur_r (0.00478087 -0.201848 0.0223745)
      PathPoint P2: tibia_r (-0.0296457 -0.0354567 0.0289858)
      PathPoint P3: tibia_r (-0.0230468 -0.0554503 0.0337823)
    Thelen2003Muscle sar_r: max_isometric_force=156 optimal_fiber_length=0.4937141 tendon_slack_length=0.09494501
        pennation_angle_at_optimal=0
      PathPoint P1: pelvis (-0.0134171 -0.00114002 0.102226)
      PathPoint P2: femur_r (-0.00286852 -0.341163 -0.0402549)
      PathPoint P3: tibia_r (-0.00551548 -0.0412676 -0.0392978)
      PathPoint P4: tibia_r (0.00590944 -0.058011 -0.037722)
      PathPoint P5: tibia_r (0.0239333 -0.0827322 -0.0248197)
    Thelen2003Muscle add_long_r: max_isometric_force=627 optimal_fiber_length=0.1302049 tendon_slack_length=0.1037865
        pennation_angle_at_optimal=0.1047198
      PathPoint P1: pelvis (-0.0277112 -0.0733119 0.01391)
      PathPoint P2: femur_r (0.00478087 -0.201848 0.0223745)
    Thelen2003Muscle add_brev_r: max_isometric_force=429 optimal_fiber_length=0.1224453 tendon_slack_length=0.01841282
        pennation_angle_at_optimal=0
      PathPoint P1: pelvis (-0.0514762 -0.0802397 0.0134985)
      PathPoint P2: femur_r (0.000860557 -0.114358 0.0281115)
    Thelen2003Muscle add_mag1_r: max_isometric_force=381 optimal_fiber_length=0.08063035 tendon_slack_length=0.05560714
        pennation_angle_at_optimal=0.08726646
      PathPoint P1: pelvis (-0.0641917 -0.102952 0.0209885)
      PathPoint P2: femur_r (-0.00430278 -0.115793 0.0324143)
    Thelen2003Muscle add_mag2_r: max_isometric_force=343 optimal_fiber_length=0.1164421 tendon_slack_length=0.1154798
        pennation_angle_at_optimal=0.05235988
      PathPoint P1: pelvis (-0.0728734 -0.104531 0.0253508)
      PathPoint P2: femur_r (0.00516334 -0.218486 0.0217051)
    Thelen2003Muscle add_mag3_r: max_isometric_force=488 optimal_fiber_length=0.1265201 tendon_slack_length=0.2404847
        pennation_angle_at_optimal=0.08726646
      PathPoint P1: pelvis (-0.0974101 -0.100085 0.0401826)
      PathPoint P2: femur_r (0.00669322 -0.366884 -0.0254342)
    Thelen2003Muscle tfl_r: max_isometric_force=233 optimal_fiber_length=0.0899266 tendon_slack_length=0.4023032
        pennation_angle_at_optimal=0.05235988
      PathPoint P1: pelvis (-0.0272727 0.0187664 0.102144)
      PathPoint P2: femur_r (0.0281115 -0.0951393 0.0570836)
      PathPoint P3: femur_r (0.00516334 -0.387155 0.0341354)
      PathPoint P4: tibia_r (0.00590944 -0.047965 0.0292518)
    Thelen2003Muscle pect_r: max_isometric_force=266 optimal_fiber_length=0.09244548 tendon_slack_length=0.03050701
        pennation_angle_at_optimal=0
      PathPoint P1: pelvis (-0.037796 -0.0673487 0.0371208)
      PathPoint P2: femur_r (-0.0116653 -0.0785975 0.0241912)
    Thelen2003Muscle grac_r: max_isometric_force=162 optimal_fiber_length=0.3419118 tendon_slack_length=0.1223889
        pennation_angle_at_optimal=0.05235988
      PathPoint P1: pelvis (-0.0649021 -0.104092 0.0229968)
      ConditionalPathPoint P2: tibia_r (-0.026169 -0.0314185 -0.0371704)
          socket_coordinate=/jointset/knee_r/knee_angle_r range=(-0.436332 0.174533)
      PathPoint P3: tibia_r (-0.0191368 -0.0507523 -0.0352597)
      PathPoint P4: tibia_r (0.00590944 -0.0823383 -0.0224559)
    Thelen2003Muscle glut_max1_r: max_isometric_force=573 optimal_fiber_length=0.1283077 tendon_slack_length=0.1129469
        pennation_angle_at_optimal=0.08726646
      PathPoint P1: pelvis (-0.104794 0.0536685 0.0576154)
      PathPoint P2: pelvis (-0.113212 0.00105232 0.0729246)
      PathPoint P3: femur_r (-0.0436972 -0.0237131 0.037482)
      PathPoint P4: femur_r (-0.026486 -0.0541194 0.0449402)
    Thelen2003Muscle glut_max2_r: max_isometric_force=819 optimal_fiber_length=0.1340568 tendon_slack_length=0.1158178
        pennation_angle_at_optimal=0
      PathPoint P1: pelvis (-0.118299 0.0154341 0.0463392)
      PathPoint P2: pelvis (-0.120666 -0.0456007 0.0752293)
      PathPoint P3: femur_r (-0.040733 -0.0506772 0.0280159)
      PathPoint P4: femur_r (-0.0149163 -0.0971473 0.0400637)
    Thelen2003Muscle glut_max3_r: max_isometric_force=552 optimal_fiber_length=0.1306459 tendon_slack_length=0.1315531
        pennation_angle_at_optimal=0.08726646
      PathPoint P1: pelvis (-0.136451 -0.0275358 0.00477385)
      PathPoint P2: pelvis (-0.134084 -0.0922537 0.03317)
      PathPoint P3: femur_r (-0.0285896 -0.0995377 0.0129083)
      PathPoint P4: femur_r (-0.00573704 -0.135681 0.0392988)
    Thelen2003Muscle iliacus_r: max_isometric_force=1073 optimal_fiber_length=0.09006289 tendon_slack_length=0.09006289
        pennation_angle_at_optimal=0.1221731
      PathPoint P1: pelvis (-0.0591055 0.0320082 0.0702908)
      PathPoint P2: pelvis (-0.022625 -0.0482315 0.0667516)
      ConditionalPathPoint P3: pelvis (-0.0252558 -0.0705934 0.0671631) socket_coordinate=/jointset/hip_r/hip_flexion_r
          range=(-1.5708 0.785398)
      PathPoint P4: femur_r (0.0016255 -0.0519202 0.00545019)
      PathPoint P5: femur_r (-0.0184542 -0.0593784 0.0123346)
    Thelen2003Muscle psoas_r: max_isometric_force=1113 optimal_fiber_length=0.08912632 tendon_slack_length=0.1426021
        pennation_angle_at_optimal=0.1396263
      PathPoint P1: pelvis (-0.0567378 0.0777843 0.0237869)
      PathPoint P2: pelvis (-0.0208711 -0.0499854 0.0624716)
      ConditionalPathPoint P3: pelvis (-0.0252558 -0.0705934 0.0671631) socket_coordinate=/jointset/hip_r/hip_flexion_r
          range=(-1.5708 0.785398)
      PathPoint P4: femur_r (0.00152988 -0.048478 0.00363346)
      PathPoint P5: femur_r (-0.0179761 -0.0570836 0.00994421)
    Thelen2003Muscle quad_fem_r: max_isometric_force=381 optimal_fiber_length=0.04778474 tendon_slack_length=0.02123766
        pennation_angle_at_optimal=0
      PathPoint P1: pelvis (-0.100234 -0.100935 0.0428)
      PathPoint P2: femur_r (-0.0364302 -0.0343266 0.034996)
    Thelen2003Muscle gem_r: max_isometric_force=164 optimal_fiber_length=0.02179374 tendon_slack_length=0.03541483
        pennation_angle_at_optimal=0
      PathPoint P1: pelvis (-0.0993569 -0.0719088 0.0587677)
      PathPoint P2: femur_r (-0.0135777 -0.00315537 0.0423585)
    Thelen2003Muscle peri_r: max_isometric_force=444 optimal_fiber_length=0.0227705 tendon_slack_length=0.1007157
        pennation_angle_at_optimal=0.1745329
      PathPoint P1: pelvis (-0.12242 0.000263081 0.0193423)
      PathPoint P2: pelvis (-0.104619 -0.0242034 0.0540762)
      PathPoint P3: femur_r (-0.0141514 -0.00344223 0.0417848)
    Thelen2003Muscle rect_fem_r: max_isometric_force=1169 optimal_fiber_length=0.1081177 tendon_slack_length=0.2940043
        pennation_angle_at_optimal=0.08726646
      PathPoint P1: pelvis (-0.0258696 -0.0272727 0.0796739)
      ConditionalPathPoint P2: femur_r (0.0319362 -0.385338 0.00181673) socket_coordinate=/jointset/knee_r/knee_angle_r
          range=(-2.61799 -1.45997)
      MovingPathPoint P3: tibia_r socket_x_coordinate=/jointset/knee_r/knee_angle_r
          socket_y_coordinate=/jointset/knee_r/knee_angle_r socket_z_coordinate=/jointset/knee_r/knee_angle_r
        x_location: MultiplierFunction: scale=0.9849075
          SimmSpline: x=(-2.0944 -1.99997 -1.5708 -1.45752 -1.39626 -1.0472 -0.698132 -0.526391 -0.349066 -0.174533 0 0.00017453 0.00034907 0.0279253 0.0872665 0.174533 2.0944)
              y=(0.0155805 0.0179938 0.0275081 0.0296564 0.0307615 0.0365695 0.0422074 0.0450902 0.048391 0.0534299 0.0617576 0.0617669 0.0617762 0.0633083 0.066994 0.0733035 0.0573481)
        y_location: MultiplierFunction: scale=0.9849075
          SimmSpline: x=(-2.0944 -1.99997 -1.5708 -1.45752 -1.39626 -1.0472 -0.698132 -0.526391 -0.349066 -0.174533 0 0.00017453 0.00034907 0.0279253 0.0872665 0.174533 2.0944)
              y=(0.0234116 0.0237613 0.0251141 0.0252795 0.0253146 0.0249184 0.0242373 0.0238447 0.0234197 0.0227644 0.020984 0.0209814 0.0209788 0.0205225 0.0191754 0.0159554 -0.0673774)
        z_location: MultiplierFunction: scale=0.9849075
          SimmSpline: x=(-2.0944 0.1745) y=(0.0014 0.0014)
    Thelen2003Muscle vas_med_r: max_isometric_force=1294 optimal_fiber_length=0.0849584 tendon_slack_length=0.1202782
        pennation_angle_at_optimal=0.08726646
      PathPoint P1: femur_r (0.0133864 -0.200701 0.0179761)
      PathPoint P2: femur_r (0.0340398 -0.264765 0.000860557)
      ConditionalPathPoint P3: femur_r (0.0353784 -0.387059 -0.0119522) socket_coordinate=/jointset/knee_r/knee_angle_r
          range=(-2.61799 -1.21004)
      ConditionalPathPoint P4: femur_r (0.0261992 -0.406852 -0.0125259) socket_coordinate=/jointset/knee_r/knee_angle_r
          range=(-2.61799 -1.78006)
      MovingPathPoint P5: tibia_r socket_x_coordinate=/jointset/knee_r/knee_angle_r
          socket_y_coordinate=/jointset/knee_r/knee_angle_r socket_z_coordinate=/jointset/knee_r/knee_angle_r
        x_location: MultiplierFunction: scale=0.9849075
          SimmSpline: x=(-2.0944 -1.99997 -1.5708 -1.45752 -1.39626 -1.0472 -0.698132 -0.526391 -0.349066 -0.174533 0 0.00017453 0.00034907 0.0279253 0.0872665 0.174533 2.0944)
              y=(0.00981097 0.0122243 0.0217371 0.0238851 0.0249902 0.0307959 0.0364187 0.0392871 0.0425654 0.0475764 0.0559586 0.0559681 0.0559776 0.0575419 0.0613368 0.0679503 0.0629332)
        y_location: MultiplierFunction: scale=0.9849075
          SimmSpline: x=(-2.0944 -1.99997 -1.5708 -1.45752 -1.39626 -1.0472 -0.698132 -0.526391 -0.349066 -0.174533 0 0.00017453 0.00034907 0.0279253 0.0872665 0.174533 2.0944)
              y=(0.0224154 0.0227651 0.0241265 0.0242933 0.0243287 0.0239462 0.0233593 0.0230677 0.0228342 0.0226362 0.0217917 0.0217903 0.0217889 0.0215365 0.0206842 0.0183269 -0.0656205)
        z_location: MultiplierFunction: scale=0.9849075
          SimmSpline: x=(-2.0944 2.0944) y=(-0.0146 -0.0146)
    Thelen2003Muscle vas_int_r: max_isometric_force=1365 optimal_fiber_length=0.08292706 tendon_slack_length=0.1296331
        pennation_angle_at_optimal=0.05235988
      PathPoint P1: femur_r (0.027729 -0.183968 0.0296414)
      PathPoint P2: femur_r (0.0320318 -0.199267 0.027251)
      ConditionalPathPoint P3: femur_r (0.0327968 -0.385338 0.00525896) socket_coordinate=/jointset/knee_r/knee_angle_r
          range=(-2.61799 -1.42)
      MovingPathPoint P4: tibia_r socket_x_coordinate=/jointset/knee_r/knee_angle_r
          socket_y_coordinate=/jointset/knee_r/knee_angle_r socket_z_coordinate=/jointset/knee_r/knee_angle_r
        x_location: MultiplierFunction: scale=0.9849075
          SimmSpline: x=(-2.0944 -1.99997 -1.5708 -1.45752 -1.39626 -1.0472 -0.698132 -0.526391 -0.349066 -0.174533 0 0.00017453 0.00034907 0.0279253 0.0872665 0.174533 2.0944)
              y=(0.0082733 0.0106866 0.0202042 0.022353 0.0234583 0.0292715 0.0349465 0.037871 0.0412569 0.0465287 0.0554632 0.0554735 0.0554837 0.0571717 0.061272 0.0684368 0.0648818)
        y_location: MultiplierFunction: scale=0.9849075
          SimmSpline: x=(-2.0944 -1.99997 -1.5708 -1.45752 -1.39626 -1.0472 -0.698132 -0.526391 -0.349066 -0.174533 0 0.00017453 0.00034907 0.0279253 0.0872665 0.174533 2.0944)
              y=(0.025599 0.0259487 0.0273124 0.0274796 0.0275151 0.0271363 0.0265737 0.0263073 0.0261187 0.0260129 0.0252923 0.0252911 0.0252898 0.0250526 0.0242191 0.0218288 -0.0685706)
        z_location: MultiplierFunction: scale=0.9849075
          SimmSpline: x=(-2.0944 2.0944) y=(0.0018 0.0018)
    Thelen2003Muscle vas_lat_r: max_isometric_force=1871 optimal_fiber_length=0.08022827 tendon_slack_length=0.1499505
        pennation_angle_at_optimal=0.08726646
      PathPoint P1: femur_r (0.00458964 -0.177275 0.0333705)
      PathPoint P2: femur_r (0.0257211 -0.247745 0.0391075)
      ConditionalPathPoint P3: femur_r (0.0345179 -0.385338 0.0196016) socket_coordinate=/jointset/knee_r/knee_angle_r
          range=(-2.61799 -1.21004)
      ConditionalPathPoint P4: femur_r (0.0241912 -0.405705 0.0175936) socket_coordinate=/jointset/knee_r/knee_angle_r
          range=(-2.61799 -1.92004)
      MovingPathPoint P5: tibia_r socket_x_coordinate=/jointset/knee_r/knee_angle_r
          socket_y_coordinate=/jointset/knee_r/knee_angle_r socket_z_coordinate=/jointset/knee_r/knee_angle_r
        x_location: MultiplierFunction: scale=0.9849075
          SimmSpline: x=(-2.0944 -1.99997 -1.5708 -1.45752 -1.39626 -1.0472 -0.698132 -0.526391 -0.349066 -0.174533 0 0.00017453 0.00034907 0.0279253 0.0872665 0.174533 2.0944)
              y=(0.0142897 0.016703 0.0262145 0.0283623 0.0294674 0.0352709 0.0408785 0.0437291 0.0469704 0.0518742 0.0599557 0.0599647 0.0599738 0.0614577 0.0650351 0.0711867 0.0583766)
        y_location: MultiplierFunction: scale=0.9849075
          SimmSpline: x=(-2.0944 -1.99997 -1.5708 -1.45752 -1.39626 -1.0472 -0.698132 -0.526391 -0.349066 -0.174533 0 0.00017453 0.00034907 0.0279253 0.0872665 0.174533 2.0944)
              y=(0.0215318 0.0218815 0.0232362 0.0234019 0.0234371 0.0230439 0.0223842 0.0220151 0.0216359 0.0210971 0.0195864 0.0195842 0.019582 0.01919 0.018008 0.0151073 -0.0653421)
        z_location: MultiplierFunction: scale=0.9849075
          SimmSpline: x=(-2.0944 2.0944) y=(0.0165 0.0165)
    Thelen2003Muscle med_gas_r: max_isometric_force=1558 optimal_fiber_length=0.05792253 tendon_slack_length=0.3764964
        pennation_angle_at_optimal=0.296706
      PathPoint P1: femur_r (-0.0181673 -0.375681 -0.0224701)
      ConditionalPathPoint P2: femur_r (-0.0286852 -0.384573 -0.0246693)
          socket_coordinate=/jointset/knee_r/knee_angle_r range=(-0.785398 0.174533)
      PathPoint P3: calcn_r (-0.04861024 0.008730369 0.002021014)
    Thelen2003Muscle lat_gas_r: max_isometric_force=683 optimal_fiber_length=0.06179622 tendon_slack_length=0.366915
        pennation_angle_at_optimal=0.1396263
      PathPoint P1: femur_r (-0.0210358 -0.377306 0.0260079)
      ConditionalPathPoint P2: femur_r (-0.0286852 -0.384191 0.0261992) socket_coordinate=/jointset/knee_r/knee_angle_r
          range=(-0.785398 0.174533)
      PathPoint P3: calcn_r (-0.04861024 0.008730369 0.002021014)
    Thelen2003Muscle soleus_r: max_isometric_force=3549 optimal_fiber_length=0.04773699 tendon_slack_length=0.2386849
        pennation_angle_at_optimal=0.4363323
      PathPoint P1: tibia_r (-0.00236378 -0.150986 0.00699284)
      PathPoint P2: calcn_r (-0.04832056 0.008624877 0.00201773)
    Thelen2003Muscle tib_post_r: max_isometric_force=1588 optimal_fiber_length=0.03017567 tendon_slack_length=0.3017567
        pennation_angle_at_optimal=0.2094395
      PathPoint P1: tibia_r (-0.00925813 -0.132766 0.00187132)
      PathPoint P2: tibia_r (-0.0141827 -0.398986 -0.0225544)
      PathPoint P3: calcn_r (-0.01526957 0.005976418 -0.02148217)
      PathPoint P4: midfoot_r (0.0005542391 0.0006236983 -0.02056483)
    Thelen2003Muscle flex_dig_r: max_isometric_force=310 optimal_fiber_length=0.03399827 tendon_slack_length=0.3999796
        pennation_angle_at_optimal=0.1221731
      PathPoint P1: tibia_r (-0.00817473 -0.201512 -0.00177283)
      PathPoint P2: tibia_r (-0.0151676 -0.398986 -0.0193042)
      PathPoint P3: calcn_r (-0.01857119 0.005392523 -0.01572026)
      PathPoint P4: midfoot_r (-0.008556424 0.0002774373 -0.02361353)
      PathPoint P5: forefoot_r (0.06618343 -0.01544992 0.01063912)
      PathPoint P6: toes_r (0.01111051 -0.006120563 0.005687164)
      PathPoint P7: toes_r (0.03480791 -0.003323237 0.01134011)
      PathPoint P8: toes_r (0.05265292 -0.00983818 0.01169712)
    Thelen2003Muscle flex_hal_r: max_isometric_force=322 optimal_fiber_length=0.04287888 tendon_slack_length=0.3789297
        pennation_angle_at_optimal=0.1745329
      PathPoint P1: tibia_r (-0.00778077 -0.229877 0.0240317)
      PathPoint P2: tibia_r (-0.0183193 -0.401744 -0.0171374)
      PathPoint P3: calcn_r (-0.0141926 0.002183924 -0.01477422)
      PathPoint P4: midfoot_r (0.02547087 -0.01194816 -0.02078977)
      PathPoint P5: forefoot_r (0.06406254 -0.01908379 -0.02525014)
      PathPoint P6: toes_r (0.0142174 -0.007638127 -0.03184017)
      PathPoint P7: toes_r (0.04905487 -0.01283968 -0.02795507)
    Thelen2003Muscle tib_ant_r: max_isometric_force=905 optimal_fiber_length=0.09656928 tendon_slack_length=0.2197444
        pennation_angle_at_optimal=0.08726646
      PathPoint P1: tibia_r (0.0176298 -0.159949 0.0113264)
      PathPoint P2: tibia_r (0.0324035 -0.389137 -0.0174329)
      PathPoint P3: midfoot_r (0.04356608 0.005916425 -0.01836091)
    Thelen2003Muscle per_brev_r: max_isometric_force=435 optimal_fiber_length=0.04798658 tendon_slack_length=0.1545168
        pennation_angle_at_optimal=0.08726646
      PathPoint P1: tibia_r (-0.00689435 -0.260607 0.0320095)
      PathPoint P2: tibia_r (-0.0195012 -0.412085 0.0278729)
      PathPoint P3: tibia_r (-0.0141827 -0.423018 0.0284638)
      PathPoint P4: calcn_r (-0.008725627 -7.708988e-5 0.02472064)
      PathPoint P5: forefoot_r (-0.0219753 -0.005757045 0.0275153)
    Thelen2003Muscle per_long_r: max_isometric_force=943 optimal_fiber_length=0.04805716 tendon_slack_length=0.3383617
        pennation_angle_at_optimal=0.1745329
      PathPoint P1: tibia_r (0.000492454 -0.154433 0.0356537)
      PathPoint P2: tibia_r (-0.0203876 -0.414154 0.0281684)
      PathPoint P3: tibia_r (-0.0159555 -0.425382 0.0284638)
      PathPoint P4: calcn_r (-0.008956188 0.0002156008 0.0262652)
      PathPoint P5: midfoot_r (0.002684188 -0.0199801 0.02379471)
      PathPoint P6: midfoot_r (0.01731378 -0.01441115 0.008686924)
      PathPoint P7: forefoot_r (0.01643681 -0.003206744 -0.01762082)
    Thelen2003Muscle per_tert_r: max_isometric_force=180 optimal_fiber_length=0.07570012 tendon_slack_length=0.09582294
        pennation_angle_at_optimal=0.2268928
      PathPoint P1: tibia_r (0.000984907 -0.276168 0.0227514)
      PathPoint P2: tibia_r (0.0225544 -0.400759 0.01566)
      PathPoint P3: forefoot_r (-0.00282357 0.000411885 0.02726601)
    Thelen2003Muscle ext_dig_r: max_isometric_force=512 optimal_fiber_length=0.1019429 tendon_slack_length=0.3448068
        pennation_angle_at_optimal=0.1396263
      PathPoint P1: tibia_r (0.0031517 -0.136016 0.0271834)
      PathPoint P2: tibia_r (0.0284638 -0.394652 0.00709133)
      PathPoint P3: midfoot_r (0.02434024 0.007237148 0.01507666)
      PathPoint P4: forefoot_r (0.05997789 -0.003388962 0.01138377)
      PathPoint P5: toes_r (0.02821279 0.001455061 0.009311731)
      PathPoint P6: toes_r (0.05599413 -0.003963522 0.01204565)
    Thelen2003Muscle ext_hal_r: max_isometric_force=162 optimal_fiber_length=0.1112423 tendon_slack_length=0.3056657
        pennation_angle_at_optimal=0.1047198
      PathPoint P1: tibia_r (0.00118189 -0.174033 0.0224559)
      PathPoint P2: tibia_r (0.032108 -0.392486 -0.00837171)
      PathPoint P3: midfoot_r (0.02911356 0.01658566 -0.001903805)
      PathPoint P4: forefoot_r (0.03022793 0.01588236 -0.01731231)
      PathPoint P5: forefoot_r (0.05823437 0.001948276 -0.02647033)
      PathPoint P6: toes_r (0.03273751 0 -0.0293047)
      PathPoint P7: toes_r (0.05456251 -0.005092715 -0.02425217)
    Thelen2003Muscle glut_med1_l: max_isometric_force=819 optimal_fiber_length=0.04810614
        tendon_slack_length=0.07013606 pennation_angle_at_optimal=0.1396263
      PathPoint P1: pelvis (-0.035779 0.0266589 -0.09951)
      PathPoint P2: femur_l (-0.0208446 -0.0111872 -0.0530677)
    Thelen2003Muscle glut_med2_l: max_isometric_force=573 optimal_fiber_length=0.0756235 tendon_slack_length=0.04743249
        pennation_angle_at_optimal=0
      PathPoint P1: pelvis (-0.0749781 0.0390237 -0.0630477)
      PathPoint P2: femur_l (-0.0246693 -0.00554581 -0.0503904)
    Thelen2003Muscle glut_med3_l: max_isometric_force=653 optimal_fiber_length=0.05775252 tendon_slack_length=0.0473821
        pennation_angle_at_optimal=0.3316126
      PathPoint P1: pelvis (-0.107249 0.00920783 -0.0533354)
      PathPoint P2: femur_l (-0.0295458 -0.00449402 -0.0495298)
    Thelen2003Muscle glut_min1_l: max_isometric_force=270 optimal_fiber_length=0.06239785
        tendon_slack_length=0.01468185 pennation_angle_at_optimal=0.1745329
      PathPoint P1: pelvis (-0.0409529 -0.00701549 -0.0869169)
      PathPoint P2: femur_l (-0.00688445 -0.00994421 -0.0535457)
    Thelen2003Muscle glut_min2_l: max_isometric_force=285 optimal_fiber_length=0.05151584
        tendon_slack_length=0.02391807 pennation_angle_at_optimal=0
      PathPoint P1: pelvis (-0.0555101 -0.00570009 -0.0815669)
      PathPoint P2: femur_l (-0.00917927 -0.00994421 -0.0535457)
    Thelen2003Muscle glut_min3_l: max_isometric_force=323 optimal_fiber_length=0.03479573
        tendon_slack_length=0.04669953 pennation_angle_at_optimal=0.01745329
      PathPoint P1: pelvis (-0.0731365 -0.0055247 -0.0704554)
      PathPoint P2: femur_l (-0.0129083 -0.00793624 -0.0525896)
    Thelen2003Muscle semimem_l: max_isometric_force=1288 optimal_fiber_length=0.07724307 tendon_slack_length=0.3466283
        pennation_angle_at_optimal=0.2617994
      PathPoint P1: pelvis (-0.104531 -0.085475 -0.0588582)
      ConditionalPathPoint P2: tibia_l (-0.0342748 -0.0346589 0.0186246)
          socket_coordinate=/jointset/knee_l/knee_angle_l range=(-0.558505 0.174533)
      PathPoint P3: tibia_l (-0.0265925 -0.0469899 0.0192746)
    Thelen2003Muscle semiten_l: max_isometric_force=410 optimal_fiber_length=0.1950483 tendon_slack_length=0.2479345
        pennation_angle_at_optimal=0.08726646
      PathPoint P1: pelvis (-0.110801 -0.0963578 -0.0497056)
      ConditionalPathPoint P2: tibia_l (-0.0413957 -0.0281585 0.0224263)
          socket_coordinate=/jointset/knee_l/knee_angle_l range=(-0.331613 0.174533)
      PathPoint P3: tibia_l (-0.0327186 -0.0520228 0.0225347)
      PathPoint P4: tibia_l (-0.0111295 -0.0734741 0.0241302)
      PathPoint P5: tibia_l (0.00265925 -0.0941572 0.0190087)
    Thelen2003Muscle bifemlh_l: max_isometric_force=896 optimal_fiber_length=0.1053079 tendon_slack_length=0.3149576
        pennation_angle_at_optimal=0
      PathPoint P1: pelvis (-0.110459 -0.0899474 -0.0571545)
      PathPoint P2: tibia_l (-0.0296457 -0.0354567 -0.0289858)
      PathPoint P3: tibia_l (-0.0230468 -0.0554503 -0.0337823)
    Thelen2003Muscle bifemsh_l: max_isometric_force=804 optimal_fiber_length=0.1667007 tendon_slack_length=0.08575934
        pennation_angle_at_optimal=0.4014257
      PathPoint P1: femur_l (0.00478087 -0.201848 -0.0223745)
      PathPoint P2: tibia_l (-0.0296457 -0.0354567 -0.0289858)
      PathPoint P3: tibia_l (-0.0230468 -0.0554503 -0.0337823)
    Thelen2003Muscle sar_l: max_isometric_force=156 optimal_fiber_length=0.4937141 tendon_slack_length=0.09494501
        pennation_angle_at_optimal=0
      PathPoint P1: pelvis (-0.0134171 -0.00114002 -0.102226)
      PathPoint P2: femur_l (-0.00286852 -0.341163 0.0402549)
      PathPoint P3: tibia_l (-0.00551548 -0.0412676 0.0392978)
      PathPoint P4: tibia_l (0.00590944 -0.058011 0.037722)
      PathPoint P5: tibia_l (0.0239333 -0.0827322 0.0248197)
    Thelen2003Muscle add_long_l: max_isometric_force=627 optimal_fiber_length=0.1302049 tendon_slack_length=0.1037865
        pennation_angle_at_optimal=0.1047198
      PathPoint P1: pelvis (-0.0277112 -0.0733119 -0.01391)
      PathPoint P2: femur_l (0.00478087 -0.201848 -0.0223745)
    Thelen2003Muscle add_brev_l: max_isometric_force=429 optimal_fiber_length=0.1224453 tendon_slack_length=0.01841282
        pennation_angle_at_optimal=0
      PathPoint P1: pelvis (-0.0514762 -0.0802397 -0.0134985)
      PathPoint P2: femur_l (0.000860557 -0.114358 -0.0281115)
    Thelen2003Muscle add_mag1_l: max_isometric_force=381 optimal_fiber_length=0.08063035 tendon_slack_length=0.05560714
        pennation_angle_at_optimal=0.08726646
      PathPoint P1: pelvis (-0.0641917 -0.102952 -0.0209885)
      PathPoint P2: femur_l (-0.00430278 -0.115793 -0.0324143)
    Thelen2003Muscle add_mag2_l: max_isometric_force=343 optimal_fiber_length=0.1164421 tendon_slack_length=0.1154798
        pennation_angle_at_optimal=0.05235988
      PathPoint P1: pelvis (-0.0728734 -0.104531 -0.0253508)
      PathPoint P2: femur_l (0.00516334 -0.218486 -0.0217051)
    Thelen2003Muscle add_mag3_l: max_isometric_force=488 optimal_fiber_length=0.1265201 tendon_slack_length=0.2404847
        pennation_angle_at_optimal=0.08726646
      PathPoint P1: pelvis (-0.0974101 -0.100085 -0.0401826)
      PathPoint P2: femur_l (0.00669322 -0.366884 0.0254342)
    Thelen2003Muscle tfl_l: max_isometric_force=233 optimal_fiber_length=0.0899266 tendon_slack_length=0.4023032
        pennation_angle_at_optimal=0.05235988
      PathPoint P1: pelvis (-0.0272727 0.0187664 -0.102144)
      PathPoint P2: femur_l (0.0281115 -0.0951393 -0.0570836)
      PathPoint P3: femur_l (0.00516334 -0.387155 -0.0341354)
      PathPoint P4: tibia_l (0.00590944 -0.047965 -0.0292518)
    Thelen2003Muscle pect_l: max_isometric_force=266 optimal_fiber_length=0.09244548 tendon_slack_length=0.03050701
        pennation_angle_at_optimal=0
      PathPoint P1: pelvis (-0.037796 -0.0673487 -0.0371208)
      PathPoint P2: femur_l (-0.0116653 -0.0785975 -0.0241912)
    Thelen2003Muscle grac_l: max_isometric_force=162 optimal_fiber_length=0.3419118 tendon_slack_length=0.1223889
        pennation_angle_at_optimal=0.05235988
      PathPoint P1: pelvis (-0.0649021 -0.104092 -0.0229968)
      ConditionalPathPoint P2: tibia_l (-0.026169 -0.0314185 0.0371704) socket_coordinate=/jointset/knee_l/knee_angle_l
          range=(-0.436332 0.174533)
      PathPoint P3: tibia_l (-0.0191368 -0.0507523 0.0352597)
      PathPoint P4: tibia_l (0.00590944 -0.0823383 0.0224559)
    Thelen2003Muscle glut_max1_l: max_isometric_force=573 optimal_fiber_length=0.1283077 tendon_slack_length=0.1129469
        pennation_angle_at_optimal=0.08726646
      PathPoint P1: pelvis (-0.104794 0.0536685 -0.0576154)
      PathPoint P2: pelvis (-0.113212 0.00105232 -0.0729246)
      PathPoint P3: femur_l (-0.0436972 -0.0237131 -0.037482)
      PathPoint P4: femur_l (-0.026486 -0.0541194 -0.0449402)
    Thelen2003Muscle glut_max2_l: max_isometric_force=819 optimal_fiber_length=0.1340568 tendon_slack_length=0.1158178
        pennation_angle_at_optimal=0
      PathPoint P1: pelvis (-0.118299 0.0154341 -0.0463392)
      PathPoint P2: pelvis (-0.120666 -0.0456007 -0.0752293)
      PathPoint P3: femur_l (-0.040733 -0.0506772 -0.0280159)
      PathPoint P4: femur_l (-0.0149163 -0.0971473 -0.0400637)
    Thelen2003Muscle glut_max3_l: max_isometric_force=552 optimal_fiber_length=0.1306459 tendon_slack_length=0.1315531
        pennation_angle_at_optimal=0.08726646
      PathPoint P1: pelvis (-0.136451 -0.0275358 -0.00477385)
      PathPoint P2: pelvis (-0.134084 -0.0922537 -0.03317)
      PathPoint P3: femur_l (-0.0285896 -0.0995377 -0.0129083)
      PathPoint P4: femur_l (-0.00573704 -0.135681 -0.0392988)
    Thelen2003Muscle iliacus_l: max_isometric_force=1073 optimal_fiber_length=0.09006289 tendon_slack_length=0.09006289
        pennation_angle_at_optimal=0.1221731
      PathPoint P1: pelvis (-0.0591055 0.0320082 -0.0702908)
      PathPoint P2: pelvis (-0.022625 -0.0482315 -0.0667516)
      ConditionalPathPoint P3: pelvis (-0.0252558 -0.0705934 -0.0671631)
          socket_coordinate=/jointset/hip_l/hip_flexion_l range=(-1.5708 0.785398)
      PathPoint P4: femur_l (0.0016255 -0.0519202 -0.00545019)
      PathPoint P5: femur_l (-0.0184542 -0.0593784 -0.0123346)
    Thelen2003Muscle psoas_l: max_isometric_force=1113 optimal_fiber_length=0.08912632 tendon_slack_length=0.1426021
        pennation_angle_at_optimal=0.1396263
      PathPoint P1: pelvis (-0.0567378 0.0777843 -0.0237869)
      PathPoint P2: pelvis (-0.0208711 -0.0499854 -0.0624716)
      ConditionalPathPoint P3: pelvis (-0.0252558 -0.0705934 -0.0671631)
          socket_coordinate=/jointset/hip_l/hip_flexion_l range=(-1.5708 0.785398)
      PathPoint P4: femur_l (0.00152988 -0.048478 -0.00363346)
      PathPoint P5: femur_l (-0.0179761 -0.0570836 -0.00994421)
    Thelen2003Muscle quad_fem_l: max_isometric_force=381 optimal_fiber_length=0.04778474 tendon_slack_length=0.02123766
        pennation_angle_at_optimal=0
      PathPoint P1: pelvis (-0.100234 -0.100935 -0.0428)
      PathPoint P2: femur_l (-0.0364302 -0.0343266 -0.034996)
    Thelen2003Muscle gem_l: max_isometric_force=164 optimal_fiber_length=0.02179374 tendon_slack_length=0.03541483
        pennation_angle_at_optimal=0
      PathPoint P1: pelvis (-0.0993569 -0.0719088 -0.0587677)
      PathPoint P2: femur_l (-0.0135777 -0.00315537 -0.0423585)
    Thelen2003Muscle peri_l: max_isometric_force=444 optimal_fiber_length=0.0227705 tendon_slack_length=0.1007157
        pennation_angle_at_optimal=0.1745329
      PathPoint P1: pelvis (-0.12242 0.000263081 -0.0193423)
      PathPoint P2: pelvis (-0.104619 -0.0242034 -0.0540762)
      PathPoint P3: femur_l (-0.0141514 -0.00344223 -0.0417848)
    Thelen2003Muscle rect_fem_l: max_isometric_force=1169 optimal_fiber_length=0.1081177 tendon_slack_length=0.2940043
        pennation_angle_at_optimal=0.08726646
      PathPoint P1: pelvis (-0.0258696 -0.0272727 -0.0796739)
      ConditionalPathPoint P2: femur_l (0.0319362 -0.385338 -0.00181673)
          socket_coordinate=/jointset/knee_l/knee_angle_l range=(-2.61799 -1.45997)
      MovingPathPoint P3: tibia_l socket_x_coordinate=/jointset/knee_l/knee_angle_l
          socket_y_coordinate=/jointset/knee_l/knee_angle_l socket_z_coordinate=/jointset/knee_l/knee_angle_l
        x_location: MultiplierFunction: scale=0.9849075
          SimmSpline: x=(-2.0944 -1.99997 -1.5708 -1.45752 -1.39626 -1.0472 -0.698132 -0.526391 -0.349066 -0.174533 0 0.00017453 0.00034907 0.0279253 0.0872665 0.174533 2.0944)
              y=(0.0155805 0.0179938 0.0275081 0.0296564 0.0307615 0.0365695 0.0422074 0.0450902 0.048391 0.0534299 0.0617576 0.0617669 0.0617762 0.0633083 0.066994 0.0733035 0.0573481)
        y_location: MultiplierFunction: scale=0.9849075
          SimmSpline: x=(-2.0944 -1.99997 -1.5708 -1.45752 -1.39626 -1.0472 -0.698132 -0.526391 -0.349066 -0.174533 0 0.00017453 0.00034907 0.0279253 0.0872665 0.174533 2.0944)
              y=(0.0234116 0.0237613 0.0251141 0.0252795 0.0253146 0.0249184 0.0242373 0.0238447 0.0234197 0.0227644 0.020984 0.0209814 0.0209788 0.0205225 0.0191754 0.0159554 -0.0673774)
        z_location: MultiplierFunction: scale=0.9849075
          SimmSpline: x=(-2.0944 0.1745) y=(-0.0014 -0.0014)
    Thelen2003Muscle vas_med_l: max_isometric_force=1294 optimal_fiber_length=0.0849584 tendon_slack_length=0.1202782
        pennation_angle_at_optimal=0.08726646
      PathPoint P1: femur_l (0.0133864 -0.200701 -0.0179761)
      PathPoint P2: femur_l (0.0340398 -0.264765 -0.000860557)
      ConditionalPathPoint P3: femur_l (0.0353784 -0.387059 0.0119522) socket_coordinate=/jointset/knee_l/knee_angle_l
          range=(-2.61799 -1.21004)
      ConditionalPathPoint P4: femur_l (0.0261992 -0.406852 0.0125259) socket_coordinate=/jointset/knee_l/knee_angle_l
          range=(-2.61799 -1.78006)
      MovingPathPoint P5: tibia_l socket_x_coordinate=/jointset/knee_l/knee_angle_l
          socket_y_coordinate=/jointset/knee_l/knee_angle_l socket_z_coordinate=/jointset/knee_l/knee_angle_l
        x_location: MultiplierFunction: scale=0.9849075
          SimmSpline: x=(-2.0944 -1.99997 -1.5708 -1.45752 -1.39626 -1.0472 -0.698132 -0.526391 -0.349066 -0.174533 0 0.00017453 0.00034907 0.0279253 0.0872665 0.174533 2.0944)
              y=(0.00981097 0.0122243 0.0217371 0.0238851 0.0249902 0.0307959 0.0364187 0.0392871 0.0425654 0.0475764 0.0559586 0.0559681 0.0559776 0.0575419 0.0613368 0.0679503 0.0629332)
        y_location: MultiplierFunction: scale=0.9849075
          SimmSpline: x=(-2.0944 -1.99997 -1.5708 -1.45752 -1.39626 -1.0472 -0.698132 -0.526391 -0.349066 -0.174533 0 0.00017453 0.00034907 0.0279253 0.0872665 0.174533 2.0944)
              y=(0.0224154 0.0227651 0.0241265 0.0242933 0.0243287 0.0239462 0.0233593 0.0230677 0.0228342 0.0226362 0.0217917 0.0217903 0.0217889 0.0215365 0.0206842 0.0183269 -0.0656205)
        z_location: MultiplierFunction: scale=0.9849075
          SimmSpline: x=(-2.0944 2.0944) y=(0.0146 0.0146)
    Thelen2003Muscle vas_int_l: max_isometric_force=1365 optimal_fiber_length=0.08303012 tendon_slack_length=0.1297942
        pennation_angle_at_optimal=0.05235988
      PathPoint P1: femur_l (0.027729 -0.183968 -0.0296414)
      PathPoint P2: femur_l (0.0320318 -0.199267 -0.027251)
      ConditionalPathPoint P3: femur_l (0.0327968 -0.385338 -0.00525896)
          socket_coordinate=/jointset/knee_l/knee_angle_l range=(-2.61799 -1.42)
      MovingPathPoint P4: tibia_l socket_x_coordinate=/jointset/knee_l/knee_angle_l
          socket_y_coordinate=/jointset/knee_l/knee_angle_l socket_z_coordinate=/jointset/knee_l/knee_angle_l
        x_location: MultiplierFunction: scale=0.9849075
          SimmSpline: x=(-2.0944 -1.99997 -1.5708 -1.45752 -1.39626 -1.0472 -0.698132 -0.526391 -0.349066 -0.174533 0 0.00017453 0.00034907 0.0279253 0.0872665 0.174533 2.0944)
              y=(0.0155805 0.0179938 0.0275081 0.0296564 0.0307615 0.0365695 0.0422074 0.0450902 0.048391 0.0534299 0.0617576 0.0617669 0.0617762 0.0633083 0.066994 0.0733035 0.0573481)
        y_location: MultiplierFunction: scale=0.9849075
          SimmSpline: x=(-2.0944 -1.99997 -1.5708 -1.45752 -1.39626 -1.0472 -0.698132 -0.526391 -0.349066 -0.174533 0 0.00017453 0.00034907 0.0279253 0.0872665 0.174533 2.0944)
              y=(0.0234116 0.0237613 0.0251141 0.0252795 0.0253146 0.0249184 0.0242373 0.0238447 0.0234197 0.0227644 0.020984 0.0209814 0.0209788 0.0205225 0.0191754 0.0159554 -0.0673774)
        z_location: MultiplierFunction: scale=0.9849075
          SimmSpline: x=(-2.0944 0.1745) y=(-0.0014 -0.0014)
    Thelen2003Muscle vas_lat_l: max_isometric_force=1871 optimal_fiber_length=0.08022827 tendon_slack_length=0.1499505
        pennation_angle_at_optimal=0.08726646
      PathPoint P1: femur_l (0.00458964 -0.177275 -0.0333705)
      PathPoint P2: femur_l (0.0257211 -0.247745 -0.0391075)
      ConditionalPathPoint P3: femur_l (0.0345179 -0.385338 -0.0196016) socket_coordinate=/jointset/knee_l/knee_angle_l
          range=(-2.61799 -1.21004)
      ConditionalPathPoint P4: femur_l (0.0241912 -0.405705 -0.0175936) socket_coordinate=/jointset/knee_l/knee_angle_l
          range=(-2.61799 -1.92004)
      MovingPathPoint P5: tibia_l socket_x_coordinate=/jointset/knee_l/knee_angle_l
          socket_y_coordinate=/jointset/knee_l/knee_angle_l socket_z_coordinate=/jointset/knee_l/knee_angle_l
        x_location: MultiplierFunction: scale=0.9849075
          SimmSpline: x=(-2.0944 -1.99997 -1.5708 -1.45752 -1.39626 -1.0472 -0.698132 -0.526391 -0.349066 -0.174533 0 0.00017453 0.00034907 0.0279253 0.0872665 0.174533 2.0944)
              y=(0.0142897 0.016703 0.0262145 0.0283623 0.0294674 0.0352709 0.0408785 0.0437291 0.0469704 0.0518742 0.0599557 0.0599647 0.0599738 0.0614577 0.0650351 0.0711867 0.0583766)
        y_location: MultiplierFunction: scale=0.9849075
          SimmSpline: x=(-2.0944 -1.99997 -1.5708 -1.45752 -1.39626 -1.0472 -0.698132 -0.526391 -0.349066 -0.174533 0 0.00017453 0.00034907 0.0279253 0.0872665 0.174533 2.0944)
              y=(0.0215318 0.0218815 0.0232362 0.0234019 0.0234371 0.0230439 0.0223842 0.0220151 0.0216359 0.0210971 0.0195864 0.0195842 0.019582 0.01919 0.018008 0.0151073 -0.0653421)
        z_location: MultiplierFunction: scale=0.9849075
          SimmSpline: x=(-2.0944 2.0944) y=(-0.0165 -0.0165)
    Thelen2003Muscle med_gas_l: max_isometric_force=1558 optimal_fiber_length=0.05792253 tendon_slack_length=0.3764964
        pennation_angle_at_optimal=0.296706
      PathPoint P1: femur_l (-0.0181673 -0.375681 0.0224701)
      ConditionalPathPoint P2: femur_l (-0.0286852 -0.384573 0.0246693) socket_coordinate=/jointset/knee_l/knee_angle_l
          range=(-0.785398 0.174533)
      PathPoint P3: calcn_l (-0.04861024 0.008730369 -0.002021014)
    Thelen2003Muscle lat_gas_l: max_isometric_force=683 optimal_fiber_length=0.06179622 tendon_slack_length=0.366915
        pennation_angle_at_optimal=0.1396263
      PathPoint P1: femur_l (-0.0210358 -0.377306 -0.0260079)
      ConditionalPathPoint P2: femur_l (-0.0286852 -0.384191 -0.0261992)
          socket_coordinate=/jointset/knee_l/knee_angle_l range=(-0.785398 0.174533)
      PathPoint P3: calcn_l (-0.04861024 0.008730369 -0.002021014)
    Thelen2003Muscle soleus_l: max_isometric_force=3549 optimal_fiber_length=0.04774333 tendon_slack_length=0.2387166
        pennation_angle_at_optimal=0.4363323
      PathPoint P1: tibia_l (-0.00236378 -0.150986 -0.00699284)
      PathPoint P2: calcn_l (-0.04861024 0.008730369 -0.002021014)
    Thelen2003Muscle tib_post_l: max_isometric_force=1588 optimal_fiber_length=0.03017567 tendon_slack_length=0.3017567
        pennation_angle_at_optimal=0.2094395
      PathPoint P1: tibia_l (-0.00925813 -0.132766 -0.00187132)
      PathPoint P2: tibia_l (-0.0141827 -0.398986 0.0225544)
      PathPoint P3: calcn_l (-0.01526957 0.005976418 0.02148217)
      PathPoint P4: midfoot_l (0.0005542391 0.0006236983 0.02056483)
    Thelen2003Muscle flex_dig_l: max_isometric_force=310 optimal_fiber_length=0.03399827 tendon_slack_length=0.3999796
        pennation_angle_at_optimal=0.1221731
      PathPoint P1: tibia_l (-0.00817473 -0.201512 0.00177283)
      PathPoint P2: tibia_l (-0.0151676 -0.398986 0.0193042)
      PathPoint P3: calcn_l (-0.01857119 0.005392523 0.01572026)
      PathPoint P4: midfoot_l (-0.008556424 0.0002774373 0.02361353)
      PathPoint P5: forefoot_l (0.06618343 -0.01544992 -0.01063912)
      PathPoint P6: toes_l (0.01111051 -0.006120563 -0.005687164)
      PathPoint P7: toes_l (0.03480791 -0.003323237 -0.01134011)
      PathPoint P8: toes_l (0.05265292 -0.00983818 -0.01169712)
    Thelen2003Muscle flex_hal_l: max_isometric_force=322 optimal_fiber_length=0.04287888 tendon_slack_length=0.3789297
        pennation_angle_at_optimal=0.1745329
      PathPoint P1: tibia_l (-0.00778077 -0.229877 -0.0240317)
      PathPoint P2: tibia_l (-0.0183193 -0.401744 0.0171374)
      PathPoint P3: calcn_l (-0.0141926 0.002183924 0.01477422)
      PathPoint P4: midfoot_l (0.02547087 -0.01194816 0.02078977)
      PathPoint P5: forefoot_l (0.06406254 -0.01908379 0.02525014)
      PathPoint P6: toes_l (0.0142174 -0.007638127 0.03184017)
      PathPoint P7: toes_l (0.04905487 -0.01283968 0.02795507)
    Thelen2003Muscle tib_ant_l: max_isometric_force=905 optimal_fiber_length=0.09656928 tendon_slack_length=0.2197444
        pennation_angle_at_optimal=0.08726646
      PathPoint P1: tibia_l (0.0176298 -0.159949 -0.0113264)
      PathPoint P2: tibia_l (0.0324035 -0.389137 0.0174329)
      PathPoint P3: midfoot_l (0.04356608 0.005916425 0.01836091)
    Thelen2003Muscle per_brev_l: max_isometric_force=435 optimal_fiber_length=0.04798658 tendon_slack_length=0.1545168
        pennation_angle_at_optimal=0.08726646
      PathPoint P1: tibia_l (-0.00689435 -0.260607 -0.0320095)
      PathPoint P2: tibia_l (-0.0195012 -0.412085 -0.0278729)
      PathPoint P3: tibia_l (-0.0141827 -0.423018 -0.0284638)
      PathPoint P4: calcn_l (-0.008725627 -7.708988e-5 -0.02472064)
      PathPoint P5: forefoot_l (-0.0219753 -0.005757045 -0.0275153)
    Thelen2003Muscle per_long_l: max_isometric_force=943 optimal_fiber_length=0.04805716 tendon_slack_length=0.3383617
        pennation_angle_at_optimal=0.1745329
      PathPoint P1: tibia_l (0.000492454 -0.154433 -0.0356537)
      PathPoint P2: tibia_l (-0.0203876 -0.414154 -0.0281684)
      PathPoint P3: tibia_l (-0.0159555 -0.425382 -0.0284638)
      PathPoint P4: calcn_l (-0.008956188 0.0002156008 -0.0262652)
      PathPoint P5: midfoot_l (0.002684188 -0.0199801 -0.02379471)
      PathPoint P6: midfoot_l (0.01731378 -0.01441115 -0.008686924)
      PathPoint P7: forefoot_l (0.01643681 -0.003206744 0.01762082)
    Thelen2003Muscle per_tert_l: max_isometric_force=180 optimal_fiber_length=0.07570012 tendon_slack_length=0.09582294
        pennation_angle_at_optimal=0.2268928
      PathPoint P1: tibia_l (0.000984907 -0.276168 -0.0227514)
      PathPoint P2: tibia_l (0.0225544 -0.400759 -0.01566)
      PathPoint P3: forefoot_l (-0.00282357 0.000411885 -0.02726601)
    Thelen2003Muscle ext_dig_l: max_isometric_force=512 optimal_fiber_length=0.1019341 tendon_slack_length=0.344777
        pennation_angle_at_optimal=0.1396263
      PathPoint P1: tibia_l (0.0031517 -0.136016 -0.0271834)
      PathPoint P2: tibia_l (0.0284638 -0.394652 -0.00709133)
      PathPoint P3: midfoot_l (0.02434024 0.007237148 -0.01507666)
      PathPoint P4: forefoot_l (0.05952274 -0.003637654 -0.01111558)
      PathPoint P5: toes_l (0.02777728 0.001455061 -0.009094563)
      PathPoint P6: toes_l (0.05599413 -0.003963522 -0.01204565)
    Thelen2003Muscle ext_hal_l: max_isometric_force=162 optimal_fiber_length=0.111245 tendon_slack_length=0.3056731
        pennation_angle_at_optimal=0.1047198
      PathPoint P1: tibia_l (0.00118189 -0.174033 -0.0224559)
      PathPoint P2: tibia_l (0.032108 -0.392486 0.00837171)
      PathPoint P3: midfoot_l (0.02911356 0.01658566 0.001903805)
      PathPoint P4: forefoot_l (0.03022793 0.01588236 0.01731231)
      PathPoint P5: forefoot_l (0.05853069 0.002182592 0.02627318)
      PathPoint P6: toes_l (0.03273751 0 0.0293047)
      PathPoint P7: toes_l (0.05456251 -0.005092715 0.02425217)
    Thelen2003Muscle ercspn_r: max_isometric_force=2500 optimal_fiber_length=0.1115227 tendon_slack_length=0.02788068
        pennation_angle_at_optimal=0
      PathPoint P1: pelvis (-0.122771 0.0384975 0.0358862)
      PathPoint P2: torso (-0.0522044 0.104409 0.022875)
    Thelen2003Muscle ercspn_l: max_isometric_force=2500 optimal_fiber_length=0.1115227 tendon_slack_length=0.02788068
        pennation_angle_at_optimal=0
      PathPoint P1: pelvis (-0.122771 0.0384975 -0.0358862)
      PathPoint P2: torso (-0.0522044 0.104409 -0.022875)
    Thelen2003Muscle intobl_r: max_isometric_force=900 optimal_fiber_length=0.09119049 tendon_slack_length=0.09119049
        pennation_angle_at_optimal=0
      PathPoint P1: pelvis (-0.0350775 0.0613855 0.09523)
      PathPoint P2: torso (0.066442 0.151867 0.0142376)
    Thelen2003Muscle intobl_l: max_isometric_force=900 optimal_fiber_length=0.09119049 tendon_slack_length=0.09119049
        pennation_angle_at_optimal=0
      PathPoint P1: pelvis (-0.0350775 0.0613855 -0.09523)
      PathPoint P2: torso (0.066442 0.151867 -0.0142376)
    Thelen2003Muscle extobl_r: max_isometric_force=900 optimal_fiber_length=0.1098265 tendon_slack_length=0.1281309
        pennation_angle_at_optimal=0
      PathPoint P1: pelvis (-0.0263081 -0.0557732 0.00823077)
      PathPoint P2: torso (0.0616961 0.104409 0.104409)
    Thelen2003Muscle extobl_l: max_isometric_force=900 optimal_fiber_length=0.1098265 tendon_slack_length=0.1281309
        pennation_angle_at_optimal=0
      PathPoint P1: pelvis (-0.0263081 -0.0557732 -0.00823077)
      PathPoint P2: torso (0.0616961 0.104409 -0.104409)
    PathActuator Abd_hallucis_r: min_control=0 max_control=1 optimal_force=301.7562
      PathPoint Abd_hallucis_r_P1: calcn_r (-0.02321675 -0.01813298 -0.01207505)
      PathPoint Abd_hallucis_r_P2: midfoot_r (0.00158761 -0.007142009 -0.02165961)
      PathPoint Abd_hallucis_r_P3: forefoot_r (0.05217 -0.006307706 -0.0407295)
      PathPoint Abd_hallucis_r_P4: toes_r (0.009381171 0.0010409 -0.04211278)
    PathActuator Ext_Hall_Brev_r: min_control=0 max_control=1 optimal_force=60.53192
      PathPoint Ext_Hall_Brev_r_P1: calcn_r (-0.0129702 0.01312931 0.0181197)
      PathPoint Ext_Hall_Brev_r_P2: midfoot_r (0.02737877 0.0128367 0.005874815)
      PathPoint Ext_Hall_Brev_r_P3: forefoot_r (0.03024777 0.01179022 -0.02236565)
      PathPoint Ext_Hall_Brev_r_P4: toes_r (0.004074847 0.01258803 -0.03378135)
    PathActuator Abd_Digi_Min1_r: min_control=0 max_control=1 optimal_force=57.06865
      PathPoint Abd_Digi_Min1_r_P1: calcn_r (-0.01084217 -0.01845156 0.00413741)
      PathPoint Abd_Digi_Min1_r_P2: forefoot_r (-0.02149009 -0.009765136 0.02185615)
      PathPoint Abd_Digi_Min1_r_P3: forefoot_r (-0.01046459 -0.01127993 0.03302357)
      PathPoint Abd_Digi_Min1_r_P4: toes_r (-0.01258827 -0.004629787 0.0368541)
    PathActuator Abd_Digi_Min2_r: min_control=0 max_control=1 optimal_force=57.06865
      PathPoint Abd_Digi_Min2_r_P1: calcn_r (-0.01682232 -0.01811566 0.0107816)
      PathPoint Abd_Digi_Min2_r_P2: forefoot_r (-0.02149009 -0.009765136 0.02185615)
      PathPoint Abd_Digi_Min2_r_P3: forefoot_r (-0.01046459 -0.01127993 0.03302357)
      PathPoint Abd_Digi_Min2_r_P4: toes_r (-0.01258827 -0.004629787 0.0368541)
    PathActuator Abd_Digi_Min3_r: min_control=0 max_control=1 optimal_force=57.06865
      PathPoint Abd_Digi_Min3_r_P1: calcn_r (-0.02139674 -0.01536261 0.01870934)
      PathPoint Abd_Digi_Min3_r_P2: forefoot_r (-0.02149009 -0.009765136 0.02185615)
      PathPoint Abd_Digi_Min3_r_P3: forefoot_r (-0.01046459 -0.01127993 0.03302357)
      PathPoint Abd_Digi_Min3_r_P4: toes_r (-0.01258827 -0.004629787 0.0368541)
    PathActuator Lumbrical2_r: min_control=0 max_control=1 optimal_force=18.06923
      PathPoint Lumbrical2_r_P1: midfoot_r (0.02483517 -0.0120621 -0.001818508)
      PathPoint Lumbrical2_r_P2: forefoot_r (0.05848704 -0.01298613 -0.009361529)
      PathPoint Lumbrical2_r_P3: toes_r (0.01237785 -0.0003397859 -0.01070147)
    PathActuator Lumbrical3_r: min_control=0 max_control=1 optimal_force=18.06923
      PathPoint Lumbrical3_r_P1: midfoot_r (0.02780793 -0.01195995 0.001524683)
      PathPoint Lumbrical3_r_P2: forefoot_r (0.05595882 -0.01352916 0.002820497)
      PathPoint Lumbrical3_r_P3: toes_r (0.009319912 -0.0009595985 0.002811635)
    PathActuator Lumbrical4_r: min_control=0 max_control=1 optimal_force=13.55192
      PathPoint Lumbrical4_r_P1: midfoot_r (0.02818858 -0.01189134 0.004910438)
      PathPoint Lumbrical4_r_P2: forefoot_r (0.04785648 -0.01450704 0.01534728)
      PathPoint Lumbrical4_r_P3: toes_r (0.0007344709 -0.001767383 0.01622844)
    PathActuator Lumbrical5_r: min_control=0 max_control=1 optimal_force=8.131154
      PathPoint Lumbrical5_r_P1: midfoot_r (0.02659932 -0.01184842 0.008318352)
      PathPoint Lumbrical5_r_P2: forefoot_r (0.04022081 -0.01499303 0.02676055)
      PathPoint Lumbrical5_r_P3: toes_r (-0.01211427 -0.002821793 0.02659594)
    PathActuator QPM1_r: min_control=0 max_control=1 optimal_force=29.51308
      PathPoint QPM1_r_P1: calcn_r (-0.03415822 -0.005683426 -0.01267267)
      PathPoint QPM1_r_P2: midfoot_r (-0.001958675 -0.012418 -0.001854119)
    PathActuator QPM2_r: min_control=0 max_control=1 optimal_force=29.51308
      PathPoint QPM2_r_P1: calcn_r (-0.03338908 -0.01253797 -0.01349896)
      PathPoint QPM2_r_P2: midfoot_r (0.01054981 -0.01216075 0.00301606)
    PathActuator QPM3_r: min_control=0 max_control=1 optimal_force=29.51308
      PathPoint QPM3_r_P1: calcn_r (-0.02364204 -0.01496036 -0.01049583)
      PathPoint QPM3_r_P2: midfoot_r (0.02304086 -0.01190997 0.007553348)
    PathActuator QPL1_r: min_control=0 max_control=1 optimal_force=15.05769
      PathPoint QPL1_r_P1: calcn_r (-0.01839759 -0.01696325 -0.008099416)
      PathPoint QPL1_r_P2: midfoot_r (-0.001958675 -0.012418 -0.001854119)
    PathActuator QPL2_r: min_control=0 max_control=1 optimal_force=15.05769
      PathPoint QPL2_r_P1: calcn_r (-0.01453397 -0.01778885 -0.002661867)
      PathPoint QPL2_r_P2: midfoot_r (0.01054981 -0.01216075 0.00301606)
    PathActuator QPL3_r: min_control=0 max_control=1 optimal_force=15.05769
      PathPoint QPL3_r_P1: calcn_r (-0.01341285 -0.01886356 0.002549236)
      PathPoint QPL3_r_P2: midfoot_r (0.02304086 -0.01190997 0.007553348)
    PathActuator Fle_Digit_Brev2_r: min_control=0 max_control=1 optimal_force=80.40808
      PathPoint Fle_Digit_Brev2_r_P1: calcn_r (-0.02033852 -0.02379571 -0.004354012)
      PathPoint Fle_Digit_Brev2_r_P2: midfoot_r (0.0001589376 -0.01081052 0.002126865)
      PathPoint Fle_Digit_Brev2_r_P3: forefoot_r (0.05778795 -0.01333542 -0.006539951)
      PathPoint Fle_Digit_Brev2_r_P4: toes_r (0.008455662 -0.002176925 -0.008256125)
      PathPoint Fle_Digit_Brev2_r_P5: toes_r (0.03108833 -0.0002049694 -0.005928776)
    PathActuator Fle_Digit_Brev3_r: min_control=0 max_control=1 optimal_force=67.30788
      PathPoint Fle_Digit_Brev3_r_P1: calcn_r (-0.02033852 -0.02379571 -0.004354012)
      PathPoint Fle_Digit_Brev3_r_P2: midfoot_r (-0.0006159929 -0.0128802 0.006449207)
      PathPoint Fle_Digit_Brev3_r_P3: forefoot_r (0.05459842 -0.01383203 0.005781959)
      PathPoint Fle_Digit_Brev3_r_P4: toes_r (0.008777322 -0.001850845 0.005085205)
      PathPoint Fle_Digit_Brev3_r_P5: toes_r (0.0283111 0.0005399835 0.0076065)
    PathActuator Fle_Digit_Brev4_r: min_control=0 max_control=1 optimal_force=56.91808
      PathPoint Fle_Digit_Brev4_r_P1: calcn_r (-0.02033852 -0.02379571 -0.004354012)
      PathPoint Fle_Digit_Brev4_r_P2: midfoot_r (-0.001430421 -0.01534624 0.01031616)
      PathPoint Fle_Digit_Brev4_r_P3: forefoot_r (0.04724687 -0.01494879 0.01809808)
      PathPoint Fle_Digit_Brev4_r_P4: toes_r (0.0003442756 -0.002615538 0.01862637)
      PathPoint Fle_Digit_Brev4_r_P5: toes_r (0.01551569 -0.0006373948 0.02121964)
    PathActuator Fle_Digit_Brev5_r: min_control=0 max_control=1 optimal_force=15.81058
      PathPoint Fle_Digit_Brev5_r_P1: calcn_r (-0.02033852 -0.02379571 -0.004354012)
      PathPoint Fle_Digit_Brev5_r_P2: midfoot_r (-0.002649189 -0.01692913 0.01555766)
      PathPoint Fle_Digit_Brev5_r_P3: forefoot_r (0.03663129 -0.01567603 0.02927671)
      PathPoint Fle_Digit_Brev5_r_P4: toes_r (0.004233882 -0.002273272 0.03101579)
    PathActuator Ext_Digit_Brev2_r: min_control=0 max_control=1 optimal_force=35.68673
      PathPoint Ext_Digit_Brev2_r_P1: calcn_r (-0.008840476 0.01032148 0.02236757)
      PathPoint Ext_Digit_Brev2_r_P2: forefoot_r (0.02246716 0.01146967 0.01146289)
      PathPoint Ext_Digit_Brev2_r_P3: forefoot_r (0.06004624 0.0006589144 -0.003989684)
      PathPoint Ext_Digit_Brev2_r_P4: forefoot_r (0.06349807 -0.0005927338 -0.004285297)
    PathActuator Ext_Digit_Brev3_r: min_control=0 max_control=1 optimal_force=23.03827
      PathPoint Ext_Digit_Brev3_r_P1: calcn_r (-0.008840476 0.01032148 0.02236757)
      PathPoint Ext_Digit_Brev3_r_P2: forefoot_r (0.01953864 0.008291449 0.01626977)
      PathPoint Ext_Digit_Brev3_r_P3: forefoot_r (0.05661228 -0.000729546 0.008920998)
      PathPoint Ext_Digit_Brev3_r_P4: forefoot_r (0.06009723 -0.001974213 0.008973807)
    PathActuator Ext_Digit_Brev4_r: min_control=0 max_control=1 optimal_force=19.87615
      PathPoint Ext_Digit_Brev4_r_P1: calcn_r (-0.008840476 0.01032148 0.02236757)
      PathPoint Ext_Digit_Brev4_r_P2: forefoot_r (0.04919475 -0.001309533 0.0210913)
      PathPoint Ext_Digit_Brev4_r_P3: forefoot_r (0.05270481 -0.002548969 0.02140547)
    PathActuator Add_hallucis_ob1_r: min_control=0 max_control=1 optimal_force=74.385
      PathPoint Add_hallucis_ob1_r_P1: forefoot_r (0.01523961 0.002887017 -0.005011337)
      PathPoint Add_hallucis_ob1_r_P2: forefoot_r (0.04942729 -0.0103289 -0.01342489)
      PathPoint Add_hallucis_ob1_r_P3: toes_r (0.008497456 0.003780919 -0.02108029)
    PathActuator Add_hallucis_ob2_r: min_control=0 max_control=1 optimal_force=74.385
      PathPoint Add_hallucis_ob2_r_P1: forefoot_r (0.0145293 -2.768691e-5 0.002853156)
      PathPoint Add_hallucis_ob2_r_P2: forefoot_r (0.04942729 -0.0103289 -0.01342489)
      PathPoint Add_hallucis_ob2_r_P3: toes_r (0.008497456 0.003780919 -0.02108029)
    PathActuator Add_hallucis_ob3_r: min_control=0 max_control=1 optimal_force=74.385
      PathPoint Add_hallucis_ob3_r_P1: forefoot_r (0.01113571 -0.004475958 0.01183263)
      PathPoint Add_hallucis_ob3_r_P2: forefoot_r (0.04942729 -0.0103289 -0.01342489)
      PathPoint Add_hallucis_ob3_r_P3: toes_r (0.008497456 0.003780919 -0.02108029)
    PathActuator Add_hallucis_Trv1_r: min_control=0 max_control=1 optimal_force=9.335769
      PathPoint Add_hallucis_Trv1_r_P1: forefoot_r (0.05665851 -0.009279509 0.001288972)
      PathPoint Add_hallucis_Trv1_r_P2: forefoot_r (0.04968204 -0.009393658 -0.01347491)
      PathPoint Add_hallucis_Trv1_r_P3: toes_r (0.008703147 0.00412531 -0.02096539)
    PathActuator Add_hallucis_Trv2_r: min_control=0 max_control=1 optimal_force=9.335769
      PathPoint Add_hallucis_Trv2_r_P1: forefoot_r (0.04854685 -0.01064232 0.01484273)
      PathPoint Add_hallucis_Trv2_r_P2: forefoot_r (0.04968204 -0.009393658 -0.01347491)
      PathPoint Add_hallucis_Trv2_r_P3: toes_r (0.008703147 0.00412531 -0.02096539)
    PathActuator Flex_DigitiMinimi_Brevis_r: min_control=0 max_control=1 optimal_force=90.34615
      PathPoint Flex_DigitiMinimi_Brevis_r_P1: forefoot_r (-0.008541176 -0.008939461 0.01655574)
      PathPoint Flex_DigitiMinimi_Brevis_r_P2: forefoot_r (0.03136134 -0.01450245 0.02948619)
      PathPoint Flex_DigitiMinimi_Brevis_r_P3: toes_r (-0.01269957 -0.005907615 0.03087665)
    PathActuator Flex_hall_Brevis_Medialis_r: min_control=0 max_control=1 optimal_force=81.31154
      PathPoint Flex_hall_Brevis_Medialis_r_P1: midfoot_r (0.01156904 -0.005408842 -0.0112335)
      PathPoint Flex_hall_Brevis_Medialis_r_P2: forefoot_r (0.0518329 -0.01461296 -0.03377731)
      PathPoint Flex_hall_Brevis_Medialis_r_P3: forefoot_r (0.05867504 -0.01453505 -0.03445788)
      PathPoint Flex_hall_Brevis_Medialis_r_P4: toes_r (0.004867809 -0.001596377 -0.03756883)
    PathActuator Flex_hall_Brevis_Lateralis_r: min_control=0 max_control=1 optimal_force=95.76692
      PathPoint Flex_hall_Brevis_Lateralis_r_P1: midfoot_r (0.007796745 -0.00469512 -0.002542799)
      PathPoint Flex_hall_Brevis_Lateralis_r_P2: forefoot_r (0.05047558 -0.01289796 -0.01476735)
      PathPoint Flex_hall_Brevis_Lateralis_r_P3: forefoot_r (0.05715155 -0.01285496 -0.01718984)
      PathPoint Flex_hall_Brevis_Lateralis_r_P4: toes_r (0.005407909 -0.0001027957 -0.02570406)
    PathActuator Abd_hallucis_l: min_control=0 max_control=1 optimal_force=301.7562
      PathPoint Abd_hallucis_l_P1: calcn_l (-0.02321675 -0.01813298 0.01207505)
      PathPoint Abd_hallucis_l_P2: midfoot_l (0.00158761 -0.007142009 0.02165961)
      PathPoint Abd_hallucis_l_P3: forefoot_l (0.05217 -0.006307706 0.0407295)
      PathPoint Abd_hallucis_l_P4: toes_l (0.009381171 0.0010409 0.04211278)
    PathActuator Ext_Hall_Brev_l: min_control=0 max_control=1 optimal_force=60.53192
      PathPoint Ext_Hall_Brev_l_P1: calcn_l (-0.0129702 0.01312931 -0.0181197)
      PathPoint Ext_Hall_Brev_l_P2: midfoot_l (0.02737877 0.0128367 -0.005874815)
      PathPoint Ext_Hall_Brev_l_P3: forefoot_l (0.03024777 0.01179022 0.02236565)
      PathPoint Ext_Hall_Brev_l_P4: toes_l (0.004074847 0.01258803 0.03378135)
    PathActuator Abd_Digi_Min1_l: min_control=0 max_control=1 optimal_force=57.06865
      PathPoint Abd_Digi_Min1_l_P1: calcn_l (-0.01084217 -0.01845156 -0.00413741)
      PathPoint Abd_Digi_Min1_l_P2: forefoot_l (-0.02149009 -0.009765136 -0.02185615)
      PathPoint Abd_Digi_Min1_l_P3: forefoot_l (-0.01046459 -0.01127993 -0.03302357)
      PathPoint Abd_Digi_Min1_l_P4: toes_l (-0.01258827 -0.004629787 -0.0368541)
    PathActuator Abd_Digi_Min2_l: min_control=0 max_control=1 optimal_force=57.06865
      PathPoint Abd_Digi_Min2_l_P1: calcn_l (-0.01682232 -0.01811566 -0.0107816)
      PathPoint Abd_Digi_Min2_l_P2: forefoot_l (-0.02149009 -0.009765136 -0.02185615)
      PathPoint Abd_Digi_Min2_l_P3: forefoot_l (-0.01046459 -0.01127993 -0.03302357)
      PathPoint Abd_Digi_Min2_l_P4: toes_l (-0.01258827 -0.004629787 -0.0368541)
    PathActuator Abd_Digi_Min3_l: min_control=0 max_control=1 optimal_force=57.06865
      PathPoint Abd_Digi_Min3_l_P1: calcn_l (-0.02139674 -0.01536261 -0.01870934)
      PathPoint Abd_Digi_Min3_l_P2: forefoot_l (-0.02149009 -0.009765136 -0.02185615)
      PathPoint Abd_Digi_Min3_l_P3: forefoot_l (-0.01046459 -0.01127993 -0.03302357)
      PathPoint Abd_Digi_Min3_l_P4: toes_l (-0.01258827 -0.004629787 -0.0368541)
    PathActuator Lumbrical2_l: min_control=0 max_control=1 optimal_force=18.06923
      PathPoint Lumbrical2_l_P1: midfoot_l (0.02483517 -0.0120621 0.001818508)
      PathPoint Lumbrical2_l_P2: forefoot_l (0.05848704 -0.01298613 0.009361529)
      PathPoint Lumbrical2_l_P3: toes_l (0.01237785 -0.0003397859 0.01070147)
    PathActuator Lumbrical3_l: min_control=0 max_control=1 optimal_force=18.06923
      PathPoint Lumbrical3_l_P1: midfoot_l (0.02780793 -0.01195995 -0.001524683)
      PathPoint Lumbrical3_l_P2: forefoot_l (0.05595882 -0.01352916 -0.002820497)
      PathPoint Lumbrical3_l_P3: toes_l (0.009319912 -0.0009595985 -0.002811635)
    PathActuator Lumbrical4_l: min_control=0 max_control=1 optimal_force=13.55192
      PathPoint Lumbrical4_l_P1: midfoot_l (0.02818858 -0.01189134 -0.004910438)
      PathPoint Lumbrical4_l_P2: forefoot_l (0.04785648 -0.01450704 -0.01534728)
      PathPoint Lumbrical4_l_P3: toes_l (0.0007344709 -0.001767383 -0.01622844)
    PathActuator Lumbrical5_l: min_control=0 max_control=1 optimal_force=8.131154
      PathPoint Lumbrical5_l_P1: midfoot_l (0.02659932 -0.01184842 -0.008318352)
      PathPoint Lumbrical5_l_P2: forefoot_l (0.04022081 -0.01499303 -0.02676055)
      PathPoint Lumbrical5_l_P3: toes_l (-0.01211427 -0.002821793 -0.02659594)
    PathActuator QPM1_l: min_control=0 max_control=1 optimal_force=29.51308
      PathPoint QPM1_l_P1: calcn_l (-0.03415822 -0.005683426 0.01267267)
      PathPoint QPM1_l_P2: midfoot_l (-0.001958675 -0.012418 0.001854119)
    PathActuator QPM2_l: min_control=0 max_control=1 optimal_force=29.51308
      PathPoint QPM2_l_P1: calcn_l (-0.03338908 -0.01253797 0.01349896)
      PathPoint QPM2_l_P2: midfoot_l (0.01054981 -0.01216075 -0.00301606)
    PathActuator QPM3_l: min_control=0 max_control=1 optimal_force=29.51308
      PathPoint QPM3_l_P1: calcn_l (-0.02364204 -0.01496036 0.01049583)
      PathPoint QPM3_l_P2: midfoot_l (0.02304086 -0.01190997 -0.007553348)
    PathActuator QPL1_l: min_control=0 max_control=1 optimal_force=15.05769
      PathPoint QPL1_l_P1: calcn_l (-0.01839759 -0.01696325 0.008099416)
      PathPoint QPL1_l_P2: midfoot_l (-0.001958675 -0.012418 0.001854119)
    PathActuator QPL2_l: min_control=0 max_control=1 optimal_force=15.05769
      PathPoint QPL2_l_P1: calcn_l (-0.01453397 -0.01778885 0.002661867)
      PathPoint QPL2_l_P2: midfoot_l (0.01054981 -0.01216075 -0.00301606)
    PathActuator QPL3_l: min_control=0 max_control=1 optimal_force=15.05769
      PathPoint QPL3_l_P1: calcn_l (-0.01341285 -0.01886356 -0.002549236)
      PathPoint QPL3_l_P2: midfoot_l (0.02304086 -0.01190997 -0.007553348)
    PathActuator Fle_Digit_Brev2_l: min_control=0 max_control=1 optimal_force=80.40808
      PathPoint Fle_Digit_Brev2_l_P1: calcn_l (-0.02033852 -0.02379571 0.004354012)
      PathPoint Fle_Digit_Brev2_l_P2: midfoot_l (0.0001589376 -0.01081052 -0.002126865)
      PathPoint Fle_Digit_Brev2_l_P3: forefoot_l (0.05778795 -0.01333542 0.006539951)
      PathPoint Fle_Digit_Brev2_l_P4: toes_l (0.008455662 -0.002176925 0.008256125)
      PathPoint Fle_Digit_Brev2_l_P5: toes_l (0.03108833 -0.0002049694 0.005928776)
    PathActuator Fle_Digit_Brev3_l: min_control=0 max_control=1 optimal_force=67.30788
      PathPoint Fle_Digit_Brev3_l_P1: calcn_l (-0.02033852 -0.02379571 0.004354012)
      PathPoint Fle_Digit_Brev3_l_P2: midfoot_l (-0.0006159929 -0.0128802 -0.006449207)
      PathPoint Fle_Digit_Brev3_l_P3: forefoot_l (0.05459842 -0.01383203 -0.005781959)
      PathPoint Fle_Digit_Brev3_l_P4: toes_l (0.008777322 -0.001850845 -0.005085205)
      PathPoint Fle_Digit_Brev3_l_P5: toes_l (0.0283111 0.0005399835 -0.0076065)
    PathActuator Fle_Digit_Brev4_l: min_control=0 max_control=1 optimal_force=56.91808
      PathPoint Fle_Digit_Brev4_l_P1: calcn_l (-0.02033852 -0.02379571 0.004354012)
      PathPoint Fle_Digit_Brev4_l_P2: midfoot_l (-0.001430421 -0.01534624 -0.01031616)
      PathPoint Fle_Digit_Brev4_l_P3: forefoot_l (0.04724687 -0.01494879 -0.01809808)
      PathPoint Fle_Digit_Brev4_l_P4: toes_l (0.0003442756 -0.002615538 -0.01862637)
      PathPoint Fle_Digit_Brev4_l_P5: toes_l (0.01551569 -0.0006373948 -0.02121964)
    PathActuator Fle_Digit_Brev5_l: min_control=0 max_control=1 optimal_force=15.81058
      PathPoint Fle_Digit_Brev5_l_P1: calcn_l (-0.02033852 -0.02379571 0.004354012)
      PathPoint Fle_Digit_Brev5_l_P2: midfoot_l (-0.002649189 -0.01692913 -0.01555766)
      PathPoint Fle_Digit_Brev5_l_P3: forefoot_l (0.03663129 -0.01567603 -0.02927671)
      PathPoint Fle_Digit_Brev5_l_P4: toes_l (0.004233882 -0.002273272 -0.03101579)
    PathActuator Ext_Digit_Brev2_l: min_control=0 max_control=1 optimal_force=35.68673
      PathPoint Ext_Digit_Brev2_l_P1: calcn_l (-0.008840476 0.01032148 -0.02236757)
      PathPoint Ext_Digit_Brev2_l_P2: forefoot_l (0.02246716 0.01146967 -0.01146289)
      PathPoint Ext_Digit_Brev2_l_P3: forefoot_l (0.06004624 0.0006589144 0.003989684)
      PathPoint Ext_Digit_Brev2_l_P4: forefoot_l (0.06349807 -0.0005927338 0.004285297)
    PathActuator Ext_Digit_Brev3_l: min_control=0 max_control=1 optimal_force=23.03827
      PathPoint Ext_Digit_Brev3_l_P1: calcn_l (-0.008840476 0.01032148 -0.02236757)
      PathPoint Ext_Digit_Brev3_l_P2: forefoot_l (0.01953864 0.008291449 -0.01626977)
      PathPoint Ext_Digit_Brev3_l_P3: forefoot_l (0.05661228 -0.000729546 -0.008920998)
      PathPoint Ext_Digit_Brev3_l_P4: forefoot_l (0.06009723 -0.001974213 -0.008973807)
    PathActuator Ext_Digit_Brev4_l: min_control=0 max_control=1 optimal_force=19.87615
      PathPoint Ext_Digit_Brev4_l_P1: calcn_l (-0.008840476 0.01032148 -0.02236757)
      PathPoint Ext_Digit_Brev4_l_P2: forefoot_l (0.04919475 -0.001309533 -0.0210913)
      PathPoint Ext_Digit_Brev4_l_P3: forefoot_l (0.05270481 -0.002548969 -0.02140547)
    PathActuator Add_hallucis_ob1_l: min_control=0 max_control=1 optimal_force=74.385
      PathPoint Add_hallucis_ob1_l_P1: forefoot_l (0.01523961 0.002887017 0.005011337)
      PathPoint Add_hallucis_ob1_l_P2: forefoot_l (0.04942729 -0.0103289 0.01342489)
      PathPoint Add_hallucis_ob1_l_P3: toes_l (0.008497456 0.003780919 0.02108029)
    PathActuator Add_hallucis_ob2_l: min_control=0 max_control=1 optimal_force=74.385
      PathPoint Add_hallucis_ob2_l_P1: forefoot_l (0.0145293 -2.768691e-5 -0.002853156)
      PathPoint Add_hallucis_ob2_l_P2: forefoot_l (0.04942729 -0.0103289 0.01342489)
      PathPoint Add_hallucis_ob2_l_P3: toes_l (0.008497456 0.003780919 0.02108029)
    PathActuator Add_hallucis_ob3_l: min_control=0 max_control=1 optimal_force=74.385
      PathPoint Add_hallucis_ob3_l_P1: forefoot_l (0.01113571 -0.004475958 -0.01183263)
      PathPoint Add_hallucis_ob3_l_P2: forefoot_l (0.04942729 -0.0103289 0.01342489)
      PathPoint Add_hallucis_ob3_l_P3: toes_l (0.008497456 0.003780919 0.02108029)
    PathActuator Add_hallucis_Trv1_l: min_control=0 max_control=1 optimal_force=9.335769
      PathPoint Add_hallucis_Trv1_l_P1: forefoot_l (0.05665851 -0.009279509 -0.001288972)
      PathPoint Add_hallucis_Trv1_l_P2: forefoot_l (0.04968204 -0.009393658 0.01347491)
      PathPoint Add_hallucis_Trv1_l_P3: toes_l (0.008703147 0.00412531 0.02096539)
    PathActuator Add_hallucis_Trv2_l: min_control=0 max_control=1 optimal_force=9.335769
      PathPoint Add_hallucis_Trv2_l_P1: forefoot_l (0.04854685 -0.01064232 -0.01484273)
      PathPoint Add_hallucis_Trv2_l_P2: forefoot_l (0.04968204 -0.009393658 0.01347491)
      PathPoint Add_hallucis_Trv2_l_P3: toes_l (0.008703147 0.00412531 0.02096539)
    PathActuator Flex_DigitiMinimi_Brevis_l: min_control=0 max_control=1 optimal_force=90.34615
      PathPoint Flex_DigitiMinimi_Brevis_l_P1: forefoot_l (-0.008541176 -0.008939461 -0.01655574)
      PathPoint Flex_DigitiMinimi_Brevis_l_P2: forefoot_l (0.03136134 -0.01450245 -0.02948619)
      PathPoint Flex_DigitiMinimi_Brevis_l_P3: toes_l (-0.01269957 -0.005907615 -0.03087665)
    PathActuator Flex_hall_Brevis_Medialis_l: min_control=0 max_control=1 optimal_force=81.31154
      PathPoint Flex_hall_Brevis_Medialis_l_P1: midfoot_l (0.01156904 -0.005408842 0.0112335)
      PathPoint Flex_hall_Brevis_Medialis_l_P2: forefoot_l (0.0518329 -0.01461296 0.03377731)
      PathPoint Flex_hall_Brevis_Medialis_l_P3: forefoot_l (0.05867504 -0.01453505 0.03445788)
      PathPoint Flex_hall_Brevis_Medialis_l_P4: toes_l (0.004867809 -0.001596377 0.03756883)
    PathActuator Flex_hall_Brevis_Lateralis_l: min_control=0 max_control=1 optimal_force=95.76692
      PathPoint Flex_hall_Brevis_Lateralis_l_P1: midfoot_l (0.007796745 -0.00469512 0.002542799)
      PathPoint Flex_hall_Brevis_Lateralis_l_P2: forefoot_l (0.05047558 -0.01289796 0.01476735)
      PathPoint Flex_hall_Brevis_Lateralis_l_P3: forefoot_l (0.05715155 -0.01285496 0.01718984)
      PathPoint Flex_hall_Brevis_Lateralis_l_P4: toes_l (0.005407909 -0.0001027957 0.02570406)
    Ligament MtTransverProfund_r: resting_length=0.06575614 pcsa_force=6274.039
      PathPoint MtTransverProfund_r_P1: forefoot_r (0.05261423 -0.0118645 -0.02669477)
      PathPoint MtTransverProfund_r_P2: forefoot_r (0.0587291 -0.01109397 -0.005563831)
      PathPoint MtTransverProfund_r_P3: forefoot_r (0.05451231 -0.01197748 0.006268367)
      PathPoint MtTransverProfund_r_P4: forefoot_r (0.04554244 -0.01311665 0.01910081)
      PathPoint MtTransverProfund_r_P5: forefoot_r (0.03683902 -0.01466178 0.03245263)
      force_length_curve: SimmSpline: x=(-5 0.998 0.999 1 1.015 1.03 1.045 1.06 1.075 1.09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)
          y=(0 0 0 0 0.015 0.03 0.045 0.06 0.075 0.09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)
    Ligament TibioTalarPost_r: resting_length=0.01780257 pcsa_force=39.1422
      PathPoint TibioTalarPost_r_P1: tibia_r (-0.00223578 -0.409222 -0.0203256)
      PathPoint TibioTalarPost_r_P2: talus_r (-0.01431512 -0.007104447 -0.01560152)
      force_length_curve: SimmSpline: x=(-5 0.998 0.999 1 1.015 1.03 1.045 1.06 1.075 1.09 1.105 1.12 1.121 1.121 5)
          y=(0 0 0 0 0.0262525 0.0475607 0.0715761 0.111051 0.18384 0.312897 0.526278 0.85714 0.85714 0.85714 0.85714)
    Ligament TibioTalarAnt_r: resting_length=0.02384649 pcsa_force=19.56111
      PathPoint TibioTalarAnt_r_P1: tibia_r (0.011459 -0.410674 -0.0225584)
      PathPoint TibioTalarAnt_r_P2: talus_r (0.0312163 -0.006466766 -0.01648743)
      force_length_curve: SimmSpline: x=(-5 0.998 0.999 1 1.015 1.03 1.045 1.06 1.075 1.09 1.105 1.12 1.121 1.121 5)
          y=(0 0 0 0 0.0339791 0.0748974 0.126898 0.196886 0.294528 0.432254 0.625255 0.891483 0.891483 0.891483 0.891483)
    Ligament TibioCalcaneal_r: resting_length=0.02372104 pcsa_force=18.97472
      PathPoint TibioCalcaneal_r_P1: tibia_r (0.00167908 -0.409674 -0.0215768)
      PathPoint TibioCalcaneal_r_P2: calcn_r (-0.002619814 0.005167702 -0.0205234)
      force_length_curve: SimmSpline: x=(-5 0.998 0.999 1 1.015 1.03 1.045 1.06 1.075 1.076 1.076 5)
          y=(0 0 0 0 0.02594 0.0461918 0.104918 0.275722 0.66165 0.66165 0.66165 0.66165)
    Ligament TibioNavicular_r: resting_length=0.03831356 pcsa_force=450
      PathPoint TibioNavicular_r_P1: tibia_r (0.00342368 -0.409868 -0.0220181)
      PathPoint TibioNavicular_r_P2: midfoot_r (0.005003878 0.006991694 -0.023159)
      force_length_curve: SimmSpline: x=(-5 0.998 0.999 1 1.015 1.03 1.045 1.06 1.075 1.09 1.105 1.12 1.121 1.121 5)
          y=(0 0 0 0 0.12 0.24 0.36 0.48 0.6 0.72 0.84 0.96 0.96 0.96 0.96)
    Ligament TaloFibularPost_r: resting_length=0.02816297 pcsa_force=4.530965
      PathPoint TaloFibularPost_r_P1: tibia_r (-0.00118659 -0.411202 0.0225417)
      PathPoint TaloFibularPost_r_P2: talus_r (-0.01830751 -0.009585144 0.004017796)
      force_length_curve: SimmSpline: x=(-5 0.998 0.999 1 1.015 1.03 1.045 1.06 1.075 1.076 1.076 5)
          y=(0 0 0 0 0.0172143 0.0329115 0.0910622 0.26495 0.657174 0.657174 0.657174 0.657174)
    Ligament TaloFibularAnt_r: resting_length=0.02952559 pcsa_force=47.52764
      PathPoint TaloFibularAnt_r_P1: tibia_r (0.0074568 -0.412098 0.0214746)
      PathPoint TaloFibularAnt_r_P2: talus_r (0.03081522 -0.003935461 0.006294317)
      force_length_curve: SimmSpline: x=(-5 0.998 0.999 1 1.015 1.03 1.045 1.06 1.075 1.09 1.105 1.12 1.135 1.15 1.165 1.166 1.166 5)
          y=(0 0 0 0 0.0279035 0.0604477 0.0984197 0.143131 0.196418 0.260642 0.338688 0.433967 0.550413 0.692486 0.865171 0.865171 0.865171 0.865171)
    Ligament CalcaneoFibular_r: resting_length=0.02785541 pcsa_force=10.12472
      PathPoint CalcaneoFibular_r_P1: tibia_r (0.00268358 -0.41337 0.0223599)
      PathPoint CalcaneoFibular_r_P2: calcn_r (-0.02071778 -0.0003146221 0.01865244)
      force_length_curve: SimmSpline: x=(-5 0.998 0.999 1 1.015 1.03 1.045 1.06 1.075 1.076 1.076 5)
          y=(0 0 0 0 0.0174526 0.0458267 0.121604 0.305588 0.682904 0.682904 0.682904 0.682904)
    Ligament PlantarFascia1Ph_r: resting_length=0.1411871 pcsa_force=62.74039
      PathPoint PlantarFascia1Ph_r_P1: calcn_r (-0.02731647 -0.02664494 -0.002349742)
      PathPoint PlantarFascia1Ph_r_P2: forefoot_r (0.0573456 -0.01491634 -0.02484453)
      PathPoint PlantarFascia1Ph_r_P3: toes_r (0.006027789 -0.001278068 -0.03017202)
      force_length_curve: SimmSpline: x=(-5 0.998 0.999 1 1.015 1.03 1.031 1.031 5)
          y=(0 0 0 0 0.312271 0.767168 0.767168 0.767168 0.767168)
    Ligament PlantarFascia2Ph_r: resting_length=0.1426199 pcsa_force=62.74039
      PathPoint PlantarFascia2Ph_r_P1: calcn_r (-0.02731647 -0.02664494 -0.002349742)
      PathPoint PlantarFascia2Ph_r_P2: forefoot_r (0.06125178 -0.01188334 -0.006306584)
      PathPoint PlantarFascia2Ph_r_P3: toes_r (0.008755745 -0.00167965 -0.008155044)
      force_length_curve: SimmSpline: x=(-5 0.998 0.999 1 1.015 1.03 1.031 1.031 5)
          y=(0 0 0 0 0.312271 0.767168 0.767168 0.767168 0.767168)
    Ligament PlantarFascia3Ph_r: resting_length=0.142003 pcsa_force=50.19231
      PathPoint PlantarFascia3Ph_r_P1: calcn_r (-0.02731647 -0.02664494 -0.002349742)
      PathPoint PlantarFascia3Ph_r_P2: forefoot_r (0.05716048 -0.01278592 0.005764174)
      PathPoint PlantarFascia3Ph_r_P3: toes_r (0.007530956 -0.002395126 0.005266085)
      force_length_curve: SimmSpline: x=(-5 0.998 0.999 1 1.015 1.03 1.031 1.031 5)
          y=(0 0 0 0 0.312271 0.767168 0.767168 0.767168 0.767168)
    Ligament PlantarFascia4Ph_r: resting_length=0.134901 pcsa_force=37.64423
      PathPoint PlantarFascia4Ph_r_P1: calcn_r (-0.02731647 -0.02664494 -0.002349742)
      PathPoint PlantarFascia4Ph_r_P2: forefoot_r (0.04692753 -0.01396437 0.0189274)
      PathPoint PlantarFascia4Ph_r_P3: toes_r (-0.001162747 -0.002507013 0.01756544)
      force_length_curve: SimmSpline: x=(-5 0.998 0.999 1 1.015 1.03 1.031 1.031 5)
          y=(0 0 0 0 0.312271 0.767168 0.767168 0.767168 0.767168)
    Ligament PlantarFascia5Ph_r: resting_length=0.1271533 pcsa_force=37.64423
      PathPoint PlantarFascia5Ph_r_P1: calcn_r (-0.02731647 -0.02664494 -0.002349742)
      PathPoint PlantarFascia5Ph_r_P2: forefoot_r (0.03853056 -0.0155509 0.0296987)
      PathPoint PlantarFascia5Ph_r_P3: toes_r (-0.01189205 -0.004148402 0.02741051)
      force_length_curve: SimmSpline: x=(-5 0.998 0.999 1 1.015 1.03 1.031 1.031 5)
          y=(0 0 0 0 0.312271 0.767168 0.767168 0.767168 0.767168)
    Ligament LongPlantar1_r: resting_length=0.07792285 pcsa_force=5383.125
      PathPoint LongPlantar1_r_P1: calcn_r (-0.0180222 -0.02011739 0.007407026)
      PathPoint LongPlantar1_r_P2: midfoot_r (0.01041638 -0.01689799 0.007337867)
      PathPoint LongPlantar1_r_P3: forefoot_r (0.01131369 0.002002477 -0.005055314)
      force_length_curve: SimmSpline: x=(-5 0.998 0.999 1 1.015 1.03 1.045 1.06 1.075 1.09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)
          y=(0 0 0 0 0.015 0.03 0.045 0.06 0.075 0.09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)
    Ligament LongPlantar2_r: resting_length=0.07507771 pcsa_force=4037.344
      PathPoint LongPlantar2_r_P1: calcn_r (-0.0180222 -0.02011739 0.007407026)
      PathPoint LongPlantar2_r_P2: midfoot_r (0.005941947 -0.01800195 0.01216236)
      PathPoint LongPlantar2_r_P3: forefoot_r (0.009883146 -0.001942049 0.0007838392)
      force_length_curve: SimmSpline: x=(-5 0.998 0.999 1 1.015 1.03 1.045 1.06 1.075 1.09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)
          y=(0 0 0 0 0.015 0.03 0.045 0.06 0.075 0.09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)
    Ligament LongPlantar3_r: resting_length=0.07043913 pcsa_force=2691.563
      PathPoint LongPlantar3_r_P1: calcn_r (-0.0180222 -0.02011739 0.007407026)
      PathPoint LongPlantar3_r_P2: midfoot_r (0.002328143 -0.0183938 0.01627351)
      PathPoint LongPlantar3_r_P3: forefoot_r (0.005645633 -0.00515716 0.00810272)
      force_length_curve: SimmSpline: x=(-5 0.998 0.999 1 1.015 1.03 1.045 1.06 1.075 1.09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)
          y=(0 0 0 0 0.015 0.03 0.045 0.06 0.075 0.09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)
    Ligament LongPlantar4_r: resting_length=0.06301056 pcsa_force=1345.781
      PathPoint LongPlantar4_r_P1: calcn_r (-0.0180222 -0.02011739 0.007407026)
      PathPoint LongPlantar4_r_P2: midfoot_r (-0.0004776621 -0.01842632 0.02027815)
      PathPoint LongPlantar4_r_P3: forefoot_r (-0.002911317 -0.01098426 0.02020206)
      force_length_curve: SimmSpline: x=(-5 0.998 0.999 1 1.015 1.03 1.045 1.06 1.075 1.09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)
          y=(0 0 0 0 0.015 0.03 0.045 0.06 0.075 0.09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)
    Ligament CalcaneoNavicularPlantar1Mus_r: resting_length=0.01937549 pcsa_force=1032.846
      PathPoint CalcaneoNavicularPlantar1Mus_r_P1: calcn_r (0.002424113 0.00440071 -0.0178401)
      PathPoint CalcaneoNavicularPlantar1Mus_r_P2: midfoot_r (-0.003676769 0.002568664 -0.01983453)
      force_length_curve: SimmSpline: x=(-5 0.998 0.999 1 1.015 1.03 1.045 1.06 1.075 1.09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)
          y=(0 0 0 0 0.015 0.03 0.045 0.06 0.075 0.09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)
    Ligament CalcaneoNavicularPlantar2Mus_r: resting_length=0.01198355 pcsa_force=1200
      PathPoint CalcaneoNavicularPlantar2Mus_r_P1: calcn_r (0.006073333 0.002952727 -0.01386739)
      PathPoint CalcaneoNavicularPlantar2Mus_r_P2: midfoot_r (-0.004013856 0.0001377441 -0.01218227)
      force_length_curve: SimmSpline: x=(-5 0.998 0.999 1 1.015 1.03 1.045 1.06 1.075 1.09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)
          y=(0 0 0 0 0.015 0.03 0.045 0.06 0.075 0.09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)
    Ligament CalcaneoNavicularPlantar3Mus_r: resting_length=0.01025638 pcsa_force=1200
      PathPoint CalcaneoNavicularPlantar3Mus_r_P1: calcn_r (0.008065996 0.001967927 -0.008603335)
      PathPoint CalcaneoNavicularPlantar3Mus_r_P2: midfoot_r (-0.00456341 -0.0006484758 -0.004004912)
      force_length_curve: SimmSpline: x=(-5 0.998 0.999 1 1.015 1.03 1.045 1.06 1.075 1.09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)
          y=(0 0 0 0 0.015 0.03 0.045 0.06 0.075 0.09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)
    Ligament CalcaneoCuboidPlantar1Mus_r: resting_length=0.01752207 pcsa_force=1500
      PathPoint CalcaneoCuboidPlantar1Mus_r_P1: calcn_r (0.004170996 -0.01197392 0.009422563)
      PathPoint CalcaneoCuboidPlantar1Mus_r_P2: midfoot_r (-0.001140932 -0.01527865 0.0123872)
      force_length_curve: SimmSpline: x=(-5 0.998 0.999 1 1.015 1.03 1.045 1.06 1.075 1.09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)
          y=(0 0 0 0 0.015 0.03 0.045 0.06 0.075 0.09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)
    Ligament CalcaneoCuboidPlantar2Mus_r: resting_length=0.02272146 pcsa_force=1500
      PathPoint CalcaneoCuboidPlantar2Mus_r_P1: calcn_r (0.004965268 -0.009577433 0.001286375)
      PathPoint CalcaneoCuboidPlantar2Mus_r_P2: midfoot_r (0.003474561 -0.01183401 0.006532463)
      force_length_curve: SimmSpline: x=(-5 0.998 0.999 1 1.015 1.03 1.045 1.06 1.075 1.09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)
          y=(0 0 0 0 0.015 0.03 0.045 0.06 0.075 0.09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)
    Ligament CalcaneoCuboidDorsalMus_r: resting_length=0.0249564 pcsa_force=1032.846
      PathPoint CalcaneoCuboidDorsalMus_r_P1: calcn_r (0.008458588 -0.0009521922 0.02326066)
      PathPoint CalcaneoCuboidDorsalMus_r_P2: midfoot_r (0.01095258 -0.00104891 0.02192224)
      force_length_curve: SimmSpline: x=(-5 0.998 0.999 1 1.015 1.03 1.045 1.06 1.075 1.09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)
          y=(0 0 0 0 0.015 0.03 0.045 0.06 0.075 0.09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)
    Ligament TaloNavicularDorsal1Mus_r: resting_length=0.01126758 pcsa_force=500
      PathPoint TaloNavicularDorsal1Mus_r_P1: talus_r (0.02897686 -0.0002111883 0.0003469252)
      PathPoint TaloNavicularDorsal1Mus_r_P2: midfoot_r (0.007526055 0.01602175 -0.001035103)
      force_length_curve: SimmSpline: x=(-5 0.998 0.999 1 1.015 1.03 1.045 1.06 1.075 1.09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)
          y=(0 0 0 0 0.015 0.03 0.045 0.06 0.075 0.09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)
    Ligament TaloNavicularDorsal2Mus_r: resting_length=0.01126758 pcsa_force=500
      PathPoint TaloNavicularDorsal2Mus_r_P1: talus_r (0.02819553 -0.0003751978 -0.007838472)
      PathPoint TaloNavicularDorsal2Mus_r_P2: midfoot_r (0.006744194 0.01585762 -0.009226434)
      force_length_curve: SimmSpline: x=(-5 0.998 0.999 1 1.015 1.03 1.045 1.06 1.075 1.09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)
          y=(0 0 0 0 0.015 0.03 0.045 0.06 0.075 0.09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)
    Ligament CalcaneoNavicularBifurcateMus_r: resting_length=0.0161836 pcsa_force=1032.846
      PathPoint CalcaneoNavicularBifurcateMus_r_P1: calcn_r (0.009383641 0.009109412 0.0145034)
      PathPoint CalcaneoNavicularBifurcateMus_r_P2: midfoot_r (0.00179844 0.008423714 0.0092953)
      force_length_curve: SimmSpline: x=(-5 0.998 0.999 1 1.015 1.03 1.045 1.06 1.075 1.09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)
          y=(0 0 0 0 0.015 0.03 0.045 0.06 0.075 0.09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)
    Ligament CalcaneoCuboidBifurcateMus_r: resting_length=0.01377347 pcsa_force=1032.846
      PathPoint CalcaneoCuboidBifurcateMus_r_P1: calcn_r (0.009383641 0.009109412 0.0145034)
      PathPoint CalcaneoCuboidBifurcateMus_r_P2: midfoot_r (0.0001849362 0.001669036 0.01918326)
      force_length_curve: SimmSpline: x=(-5 0.998 0.999 1 1.015 1.03 1.045 1.06 1.075 1.09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)
          y=(0 0 0 0 0.015 0.03 0.045 0.06 0.075 0.09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)
    Ligament TarsoMetatarsalDorsal1Mus_r: resting_length=0.01215387 pcsa_force=500
      PathPoint TarsoMetatarsalDorsal1Mus_r_P1: midfoot_r (0.03869553 0.007313866 -0.009614711)
      PathPoint TarsoMetatarsalDorsal1Mus_r_P2: forefoot_r (0.02750238 0.01332545 -0.01673339)
      force_length_curve: SimmSpline: x=(-5 0.998 0.999 1 1.015 1.03 1.045 1.06 1.075 1.09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)
          y=(0 0 0 0 0.015 0.03 0.045 0.06 0.075 0.09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)
    Ligament TarsoMetatarsalDorsal3Mus_r: resting_length=0.009189313 pcsa_force=500
      PathPoint TarsoMetatarsalDorsal3Mus_r_P1: midfoot_r (0.02906099 0.00943862 0.001598945)
      PathPoint TarsoMetatarsalDorsal3Mus_r_P2: forefoot_r (0.01504001 0.01618072 -0.0003925496)
      force_length_curve: SimmSpline: x=(-5 0.998 0.999 1 1.015 1.03 1.045 1.06 1.075 1.09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)
          y=(0 0 0 0 0.015 0.03 0.045 0.06 0.075 0.09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)
    Ligament TarsoMetatarsalDorsal5Mus_r: resting_length=0.006511638 pcsa_force=200
      PathPoint TarsoMetatarsalDorsal5Mus_r_P1: midfoot_r (0.02767678 0.002373853 0.01651916)
      PathPoint TarsoMetatarsalDorsal5Mus_r_P2: forefoot_r (0.0113613 0.009895364 0.01323532)
      force_length_curve: SimmSpline: x=(-5 0.998 0.999 1 1.015 1.03 1.045 1.06 1.075 1.09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)
          y=(0 0 0 0 0.015 0.03 0.045 0.06 0.075 0.09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)
    Ligament TarsoMetatarsalDorsal7Mus_r: resting_length=0.008292945 pcsa_force=500
      PathPoint TarsoMetatarsalDorsal7Mus_r_P1: midfoot_r (0.01655189 -0.004569489 0.02512767)
      PathPoint TarsoMetatarsalDorsal7Mus_r_P2: forefoot_r (0.00229486 0.003244096 0.02104644)
      force_length_curve: SimmSpline: x=(-5 0.998 0.999 1 1.015 1.03 1.045 1.06 1.075 1.09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)
          y=(0 0 0 0 0.015 0.03 0.045 0.06 0.075 0.09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)
    Ligament TarsoMetatarsalDorsal8Mus_r: resting_length=0.006678972 pcsa_force=500
      PathPoint TarsoMetatarsalDorsal8Mus_r_P1: midfoot_r (0.01004793 -0.009450479 0.03001923)
      PathPoint TarsoMetatarsalDorsal8Mus_r_P2: forefoot_r (-0.007033911 -0.002991068 0.0281407)
      force_length_curve: SimmSpline: x=(-5 0.998 0.999 1 1.015 1.03 1.045 1.06 1.075 1.09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)
          y=(0 0 0 0 0.015 0.03 0.045 0.06 0.075 0.09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)
    Ligament TarsoMetatarsalPlantar1Mus_r: resting_length=0.008928642 pcsa_force=1032
      PathPoint TarsoMetatarsalPlantar1Mus_r_P1: midfoot_r (0.02888678 -0.01360148 -0.01101382)
      PathPoint TarsoMetatarsalPlantar1Mus_r_P2: forefoot_r (0.01538822 -0.004798814 -0.01552129)
      force_length_curve: SimmSpline: x=(-5 0.998 0.999 1 1.015 1.03 1.045 1.06 1.075 1.09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)
          y=(0 0 0 0 0.015 0.03 0.045 0.06 0.075 0.09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)
    Ligament TarsoMetatarsalPlantar2Mus_r: resting_length=0.007250729 pcsa_force=20913.46
      PathPoint TarsoMetatarsalPlantar2Mus_r_P1: midfoot_r (0.02326297 -0.006399979 -0.001594499)
      PathPoint TarsoMetatarsalPlantar2Mus_r_P2: forefoot_r (0.007877249 0.001667071 -0.005023574)
      force_length_curve: SimmSpline: x=(-5 0.998 0.999 1 1.015 1.03 1.045 1.06 1.075 1.09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)
          y=(0 0 0 0 0.015 0.03 0.045 0.06 0.075 0.09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)
    Ligament TarsoMetatarsalPlantar3Mus_r: resting_length=0.006903152 pcsa_force=20913.46
      PathPoint TarsoMetatarsalPlantar3Mus_r_P1: midfoot_r (0.02294254 -0.01092271 0.003354277)
      PathPoint TarsoMetatarsalPlantar3Mus_r_P2: forefoot_r (0.007086242 -0.001986283 0.0009150424)
      force_length_curve: SimmSpline: x=(-5 0.998 0.999 1 1.015 1.03 1.045 1.06 1.075 1.09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)
          y=(0 0 0 0 0.015 0.03 0.045 0.06 0.075 0.09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)
    Ligament TarsoMetatarsalPlantar4Mus_r: resting_length=0.007610401 pcsa_force=500
      PathPoint TarsoMetatarsalPlantar4Mus_r_P1: midfoot_r (0.01802368 -0.01460016 0.01260355)
      PathPoint TarsoMetatarsalPlantar4Mus_r_P2: forefoot_r (0.003236311 -0.004979955 0.009085377)
      force_length_curve: SimmSpline: x=(-5 0.998 0.999 1 1.015 1.03 1.045 1.06 1.075 1.09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)
          y=(0 0 0 0 0.015 0.03 0.045 0.06 0.075 0.09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)
    Ligament TarsoMetatarsalPlantar5Mus_r: resting_length=0.008535562 pcsa_force=500
      PathPoint TarsoMetatarsalPlantar5Mus_r_P1: midfoot_r (0.008783672 -0.01712433 0.02075076)
      PathPoint TarsoMetatarsalPlantar5Mus_r_P2: forefoot_r (-0.006011717 -0.01030074 0.01915123)
      force_length_curve: SimmSpline: x=(-5 0.998 0.999 1 1.015 1.03 1.045 1.06 1.075 1.09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)
          y=(0 0 0 0 0.015 0.03 0.045 0.06 0.075 0.09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)
    Ligament MtTransverProfund_l: resting_length=0.06575614 pcsa_force=6274.039
      PathPoint MtTransverProfund_l_P1: forefoot_l (0.05261423 -0.0118645 0.02669477)
      PathPoint MtTransverProfund_l_P2: forefoot_l (0.0587291 -0.01109397 0.005563831)
      PathPoint MtTransverProfund_l_P3: forefoot_l (0.05451231 -0.01197748 -0.006268367)
      PathPoint MtTransverProfund_l_P4: forefoot_l (0.04554244 -0.01311665 -0.01910081)
      PathPoint MtTransverProfund_l_P5: forefoot_l (0.03683902 -0.01466178 -0.03245263)
      force_length_curve: SimmSpline: x=(-5 0.998 0.999 1 1.015 1.03 1.045 1.06 1.075 1.09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)
          y=(0 0 0 0 0.015 0.03 0.045 0.06 0.075 0.09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)
    Ligament TibioTalarPost_l: resting_length=0.01780257 pcsa_force=39.1422
      PathPoint TibioTalarPost_l_P1: tibia_l (-0.00223578 -0.409222 0.0203256)
      PathPoint TibioTalarPost_l_P2: talus_l (-0.01431512 -0.007104447 0.01560152)
      force_length_curve: SimmSpline: x=(-5 0.998 0.999 1 1.015 1.03 1.045 1.06 1.075 1.09 1.105 1.12 1.121 1.121 5)
          y=(0 0 0 0 0.0262525 0.0475607 0.0715761 0.111051 0.18384 0.312897 0.526278 0.85714 0.85714 0.85714 0.85714)
    Ligament TibioTalarAnt_l: resting_length=0.02384649 pcsa_force=19.56111
      PathPoint TibioTalarAnt_l_P1: tibia_l (0.011459 -0.410674 0.0225584)
      PathPoint TibioTalarAnt_l_P2: talus_l (0.0312163 -0.006466766 0.01648743)
      force_length_curve: SimmSpline: x=(-5 0.998 0.999 1 1.015 1.03 1.045 1.06 1.075 1.09 1.105 1.12 1.121 1.121 5)
          y=(0 0 0 0 0.0339791 0.0748974 0.126898 0.196886 0.294528 0.432254 0.625255 0.891483 0.891483 0.891483 0.891483)
    Ligament TibioCalcaneal_l: resting_length=0.02372104 pcsa_force=18.97472
      PathPoint TibioCalcaneal_l_P1: tibia_l (0.00167908 -0.409674 0.0215768)
      PathPoint TibioCalcaneal_l_P2: calcn_l (-0.002619814 0.005167702 0.0205234)
      force_length_curve: SimmSpline: x=(-5 0.998 0.999 1 1.015 1.03 1.045 1.06 1.075 1.076 1.076 5)
          y=(0 0 0 0 0.02594 0.0461918 0.104918 0.275722 0.66165 0.66165 0.66165 0.66165)
    Ligament TibioNavicular_l: resting_length=0.03831356 pcsa_force=450
      PathPoint TibioNavicular_l_P1: tibia_l (0.00342368 -0.409868 0.0220181)
      PathPoint TibioNavicular_l_P2: midfoot_l (0.005003878 0.006991694 0.023159)
      force_length_curve: SimmSpline: x=(-5 0.998 0.999 1 1.015 1.03 1.045 1.06 1.075 1.09 1.105 1.12 1.121 1.121 5)
          y=(0 0 0 0 0.12 0.24 0.36 0.48 0.6 0.72 0.84 0.96 0.96 0.96 0.96)
    Ligament TaloFibularPost_l: resting_length=0.02816297 pcsa_force=4.530965
      PathPoint TaloFibularPost_l_P1: tibia_l (-0.00118659 -0.411202 -0.0225417)
      PathPoint TaloFibularPost_l_P2: talus_l (-0.01830751 -0.009585144 -0.004017796)
      force_length_curve: SimmSpline: x=(-5 0.998 0.999 1 1.015 1.03 1.045 1.06 1.075 1.076 1.076 5)
          y=(0 0 0 0 0.0172143 0.0329115 0.0910622 0.26495 0.657174 0.657174 0.657174 0.657174)
    Ligament TaloFibularAnt_l: resting_length=0.02952559 pcsa_force=47.52764
      PathPoint TaloFibularAnt_l_P1: tibia_l (0.0074568 -0.412098 -0.0214746)
      PathPoint TaloFibularAnt_l_P2: talus_l (0.03081522 -0.003935461 -0.006294317)
      force_length_curve: SimmSpline: x=(-5 0.998 0.999 1 1.015 1.03 1.045 1.06 1.075 1.09 1.105 1.12 1.135 1.15 1.165 1.166 1.166 5)
          y=(0 0 0 0 0.0279035 0.0604477 0.0984197 0.143131 0.196418 0.260642 0.338688 0.433967 0.550413 0.692486 0.865171 0.865171 0.865171 0.865171)
    Ligament CalcaneoFibular_l: resting_length=0.02785541 pcsa_force=10.12472
      PathPoint CalcaneoFibular_l_P1: tibia_l (0.00268358 -0.41337 -0.0223599)
      PathPoint CalcaneoFibular_l_P2: calcn_l (-0.02071778 -0.0003146221 -0.01865244)
      force_length_curve: SimmSpline: x=(-5 0.998 0.999 1 1.015 1.03 1.045 1.06 1.075 1.076 1.076 5)
          y=(0 0 0 0 0.0174526 0.0458267 0.121604 0.305588 0.682904 0.682904 0.682904 0.682904)
    Ligament PlantarFascia1Ph_l: resting_length=0.1411871 pcsa_force=62.74039
      PathPoint PlantarFascia1Ph_l_P1: calcn_l (-0.02731647 -0.02664494 0.002349742)
      PathPoint PlantarFascia1Ph_l_P2: forefoot_l (0.0573456 -0.01491634 0.02484453)
      PathPoint PlantarFascia1Ph_l_P3: toes_l (0.006027789 -0.001278068 0.03017202)
      force_length_curve: SimmSpline: x=(-5 0.998 0.999 1 1.015 1.03 1.031 1.031 5)
          y=(0 0 0 0 0.312271 0.767168 0.767168 0.767168 0.767168)
    Ligament PlantarFascia2Ph_l: resting_length=0.1426199 pcsa_force=62.74039
      PathPoint PlantarFascia2Ph_l_P1: calcn_l (-0.02731647 -0.02664494 0.002349742)
      PathPoint PlantarFascia2Ph_l_P2: forefoot_l (0.06125178 -0.01188334 0.006306584)
      PathPoint PlantarFascia2Ph_l_P3: toes_l (0.008755745 -0.00167965 0.008155044)
      force_length_curve: SimmSpline: x=(-5 0.998 0.999 1 1.015 1.03 1.031 1.031 5)
          y=(0 0 0 0 0.312271 0.767168 0.767168 0.767168 0.767168)
    Ligament PlantarFascia3Ph_l: resting_length=0.142003 pcsa_force=50.19231
      PathPoint PlantarFascia3Ph_l_P1: calcn_l (-0.02731647 -0.02664494 0.002349742)
      PathPoint PlantarFascia3Ph_l_P2: forefoot_l (0.05716048 -0.01278592 -0.005764174)
      PathPoint PlantarFascia3Ph_l_P3: toes_l (0.007530956 -0.002395126 -0.005266085)
      force_length_curve: SimmSpline: x=(-5 0.998 0.999 1 1.015 1.03 1.031 1.031 5)
          y=(0 0 0 0 0.312271 0.767168 0.767168 0.767168 0.767168)
    Ligament PlantarFascia4Ph_l: resting_length=0.134901 pcsa_force=37.64423
      PathPoint PlantarFascia4Ph_l_P1: calcn_l (-0.02731647 -0.02664494 0.002349742)
      PathPoint PlantarFascia4Ph_l_P2: forefoot_l (0.04692753 -0.01396437 -0.0189274)
      PathPoint PlantarFascia4Ph_l_P3: toes_l (-0.001162747 -0.002507013 -0.01756544)
      force_length_curve: SimmSpline: x=(-5 0.998 0.999 1 1.015 1.03 1.031 1.031 5)
          y=(0 0 0 0 0.312271 0.767168 0.767168 0.767168 0.767168)
    Ligament PlantarFascia5Ph_l: resting_length=0.1271533 pcsa_force=37.64423
      PathPoint PlantarFascia5Ph_l_P1: calcn_l (-0.02731647 -0.02664494 0.002349742)
      PathPoint PlantarFascia5Ph_l_P2: forefoot_l (0.03853056 -0.0155509 -0.0296987)
      PathPoint PlantarFascia5Ph_l_P3: toes_l (-0.01189205 -0.004148402 -0.02741051)
      force_length_curve: SimmSpline: x=(-5 0.998 0.999 1 1.015 1.03 1.031 1.031 5)
          y=(0 0 0 0 0.312271 0.767168 0.767168 0.767168 0.767168)
    Ligament LongPlantar1_l: resting_length=0.07792285 pcsa_force=5383.125
      PathPoint LongPlantar1_l_P1: calcn_l (-0.0180222 -0.02011739 -0.007407026)
      PathPoint LongPlantar1_l_P2: midfoot_l (0.01041638 -0.01689799 -0.007337867)
      PathPoint LongPlantar1_l_P3: forefoot_l (0.01131369 0.002002477 0.005055314)
      force_length_curve: SimmSpline: x=(-5 0.998 0.999 1 1.015 1.03 1.045 1.06 1.075 1.09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)
          y=(0 0 0 0 0.015 0.03 0.045 0.06 0.075 0.09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)
    Ligament LongPlantar2_l: resting_length=0.07507771 pcsa_force=4037.344
      PathPoint LongPlantar2_l_P1: calcn_l (-0.0180222 -0.02011739 -0.007407026)
      PathPoint LongPlantar2_l_P2: midfoot_l (0.005941947 -0.01800195 -0.01216236)
      PathPoint LongPlantar2_l_P3: forefoot_l (0.009883146 -0.001942049 -0.0007838392)
      force_length_curve: SimmSpline: x=(-5 0.998 0.999 1 1.015 1.03 1.045 1.06 1.075 1.09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)
          y=(0 0 0 0 0.015 0.03 0.045 0.06 0.075 0.09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)
    Ligament LongPlantar3_l: resting_length=0.07043913 pcsa_force=2691.563
      PathPoint LongPlantar3_l_P1: calcn_l (-0.0180222 -0.02011739 -0.007407026)
      PathPoint LongPlantar3_l_P2: midfoot_l (0.002328143 -0.0183938 -0.01627351)
      PathPoint LongPlantar3_l_P3: forefoot_l (0.005645633 -0.00515716 -0.00810272)
      force_length_curve: SimmSpline: x=(-5 0.998 0.999 1 1.015 1.03 1.045 1.06 1.075 1.09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)
          y=(0 0 0 0 0.015 0.03 0.045 0.06 0.075 0.09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)
    Ligament LongPlantar4_l: resting_length=0.06301056 pcsa_force=1345.781
      PathPoint LongPlantar4_l_P1: calcn_l (-0.0180222 -0.02011739 -0.007407026)
      PathPoint LongPlantar4_l_P2: midfoot_l (-0.0004776621 -0.01842632 -0.02027815)
      PathPoint LongPlantar4_l_P3: forefoot_l (-0.002911317 -0.01098426 -0.02020206)
      force_length_curve: SimmSpline: x=(-5 0.998 0.999 1 1.015 1.03 1.045 1.06 1.075 1.09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)
          y=(0 0 0 0 0.015 0.03 0.045 0.06 0.075 0.09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)
    Ligament CalcaneoNavicularPlantar1Mus_l: resting_length=0.01937549 pcsa_force=1032.846
      PathPoint CalcaneoNavicularPlantar1Mus_l_P1: calcn_l (0.002424113 0.00440071 0.0178401)
      PathPoint CalcaneoNavicularPlantar1Mus_l_P2: midfoot_l (-0.003676769 0.002568664 0.01983453)
      force_length_curve: SimmSpline: x=(-5 0.998 0.999 1 1.015 1.03 1.045 1.06 1.075 1.09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)
          y=(0 0 0 0 0.015 0.03 0.045 0.06 0.075 0.09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)
    Ligament CalcaneoNavicularPlantar2Mus_rl: resting_length=0.01198355 pcsa_force=1200
      PathPoint CalcaneoNavicularPlantar2Mus_rl_P1: calcn_l (0.006073333 0.002952727 0.01386739)
      PathPoint CalcaneoNavicularPlantar2Mus_rl_P2: midfoot_l (-0.004013856 0.0001377441 0.01218227)
      force_length_curve: SimmSpline: x=(-5 0.998 0.999 1 1.015 1.03 1.045 1.06 1.075 1.09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)
          y=(0 0 0 0 0.015 0.03 0.045 0.06 0.075 0.09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)
    Ligament CalcaneoNavicularPlantar3Mus_l: resting_length=0.01025638 pcsa_force=1200
      PathPoint CalcaneoNavicularPlantar3Mus_l_P1: calcn_l (0.008065996 0.001967927 0.008603335)
      PathPoint CalcaneoNavicularPlantar3Mus_l_P2: midfoot_l (-0.00456341 -0.0006484758 0.004004912)
      force_length_curve: SimmSpline: x=(-5 0.998 0.999 1 1.015 1.03 1.045 1.06 1.075 1.09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)
          y=(0 0 0 0 0.015 0.03 0.045 0.06 0.075 0.09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)
    Ligament CalcaneoCuboidPlantar1Mus_l: resting_length=0.01752207 pcsa_force=1500
      PathPoint CalcaneoCuboidPlantar1Mus_l_P1: calcn_l (0.004170996 -0.01197392 -0.009422563)
      PathPoint CalcaneoCuboidPlantar1Mus_l_P2: midfoot_l (-0.001140932 -0.01527865 -0.0123872)
      force_length_curve: SimmSpline: x=(-5 0.998 0.999 1 1.015 1.03 1.045 1.06 1.075 1.09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)
          y=(0 0 0 0 0.015 0.03 0.045 0.06 0.075 0.09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)
    Ligament CalcaneoCuboidPlantar2Mus_l: resting_length=0.02272146 pcsa_force=1500
      PathPoint CalcaneoCuboidPlantar2Mus_l_P1: calcn_l (0.004965268 -0.009577433 -0.001286375)
      PathPoint CalcaneoCuboidPlantar2Mus_l_P2: midfoot_l (0.003474561 -0.01183401 -0.006532463)
      force_length_curve: SimmSpline: x=(-5 0.998 0.999 1 1.015 1.03 1.045 1.06 1.075 1.09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)
          y=(0 0 0 0 0.015 0.03 0.045 0.06 0.075 0.09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)
    Ligament CalcaneoCuboidDorsalMus_l: resting_length=0.0249564 pcsa_force=1032.846
      PathPoint CalcaneoCuboidDorsalMus_l_P1: calcn_l (0.008458588 -0.0009521922 -0.02326066)
      PathPoint CalcaneoCuboidDorsalMus_l_P2: midfoot_l (0.01095258 -0.00104891 -0.02192224)
      force_length_curve: SimmSpline: x=(-5 0.998 0.999 1 1.015 1.03 1.045 1.06 1.075 1.09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)
          y=(0 0 0 0 0.015 0.03 0.045 0.06 0.075 0.09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)
    Ligament TaloNavicularDorsal1Mus_l: resting_length=0.01126758 pcsa_force=500
      PathPoint TaloNavicularDorsal1Mus_l_P1: talus_l (0.02897686 -0.0002111883 -0.0003469252)
      PathPoint TaloNavicularDorsal1Mus_l_P2: midfoot_l (0.007526055 0.01602175 0.001035103)
      force_length_curve: SimmSpline: x=(-5 0.998 0.999 1 1.015 1.03 1.045 1.06 1.075 1.09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)
          y=(0 0 0 0 0.015 0.03 0.045 0.06 0.075 0.09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)
    Ligament TaloNavicularDorsal2Mus_l: resting_length=0.01126758 pcsa_force=500
      PathPoint TaloNavicularDorsal2Mus_l_P1: talus_l (0.02819553 -0.0003751978 0.007838472)
      PathPoint TaloNavicularDorsal2Mus_l_P2: midfoot_l (0.006744194 0.01585762 0.009226434)
      force_length_curve: SimmSpline: x=(-5 0.998 0.999 1 1.015 1.03 1.045 1.06 1.075 1.09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)
          y=(0 0 0 0 0.015 0.03 0.045 0.06 0.075 0.09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)
    Ligament CalcaneoNavicularBifurcateMus_l: resting_length=0.0161836 pcsa_force=1032.846
      PathPoint CalcaneoNavicularBifurcateMus_l_P1: calcn_l (0.009383641 0.009109412 -0.0145034)
      PathPoint CalcaneoNavicularBifurcateMus_l_P2: midfoot_l (0.00179844 0.008423714 -0.0092953)
      force_length_curve: SimmSpline: x=(-5 0.998 0.999 1 1.015 1.03 1.045 1.06 1.075 1.09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)
          y=(0 0 0 0 0.015 0.03 0.045 0.06 0.075 0.09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)
    Ligament CalcaneoCuboidBifurcateMus_l: resting_length=0.01377347 pcsa_force=1032.846
      PathPoint CalcaneoCuboidBifurcateMus_l_P1: calcn_l (0.009383641 0.009109412 -0.0145034)
      PathPoint CalcaneoCuboidBifurcateMus_l_P2: midfoot_l (0.0001849362 0.001669036 -0.01918326)
      force_length_curve: SimmSpline: x=(-5 0.998 0.999 1 1.015 1.03 1.045 1.06 1.075 1.09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)
          y=(0 0 0 0 0.015 0.03 0.045 0.06 0.075 0.09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)
    Ligament TarsoMetatarsalDorsal1Mus_l: resting_length=0.01215387 pcsa_force=500
      PathPoint TarsoMetatarsalDorsal1Mus_l_P1: midfoot_l (0.03869553 0.007313866 0.009614711)
      PathPoint TarsoMetatarsalDorsal1Mus_l_P2: forefoot_l (0.02750238 0.01332545 0.01673339)
      force_length_curve: SimmSpline: x=(-5 0.998 0.999 1 1.015 1.03 1.045 1.06 1.075 1.09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)
          y=(0 0 0 0 0.015 0.03 0.045 0.06 0.075 0.09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)
    Ligament TarsoMetatarsalDorsal3Mus_l: resting_length=0.009189313 pcsa_force=500
      PathPoint TarsoMetatarsalDorsal3Mus_l_P1: midfoot_l (0.02906099 0.00943862 -0.001598945)
      PathPoint TarsoMetatarsalDorsal3Mus_l_P2: forefoot_l (0.01504001 0.01618072 0.0003925496)
      force_length_curve: SimmSpline: x=(-5 0.998 0.999 1 1.015 1.03 1.045 1.06 1.075 1.09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)
          y=(0 0 0 0 0.015 0.03 0.045 0.06 0.075 0.09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)
    Ligament TarsoMetatarsalDorsal5Mus_l: resting_length=0.006511638 pcsa_force=200
      PathPoint TarsoMetatarsalDorsal5Mus_l_P1: midfoot_l (0.02767678 0.002373853 -0.01651916)
      PathPoint TarsoMetatarsalDorsal5Mus_l_P2: forefoot_l (0.0113613 0.009895364 -0.01323532)
      force_length_curve: SimmSpline: x=(-5 0.998 0.999 1 1.015 1.03 1.045 1.06 1.075 1.09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)
          y=(0 0 0 0 0.015 0.03 0.045 0.06 0.075 0.09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)
    Ligament TarsoMetatarsalDorsal7Mus_l: resting_length=0.008292945 pcsa_force=500
      PathPoint TarsoMetatarsalDorsal7Mus_l_P1: midfoot_l (0.01655189 -0.004569489 -0.02512767)
      PathPoint TarsoMetatarsalDorsal7Mus_l_P2: forefoot_l (0.00229486 0.003244096 -0.02104644)
      force_length_curve: SimmSpline: x=(-5 0.998 0.999 1 1.015 1.03 1.045 1.06 1.075 1.09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)
          y=(0 0 0 0 0.015 0.03 0.045 0.06 0.075 0.09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)
    Ligament TarsoMetatarsalDorsal8Mus_l: resting_length=0.006678972 pcsa_force=500
      PathPoint TarsoMetatarsalDorsal8Mus_l_P1: midfoot_l (0.01004793 -0.009450479 -0.03001923)
      PathPoint TarsoMetatarsalDorsal8Mus_l_P2: forefoot_l (-0.007033911 -0.002991068 -0.0281407)
      force_length_curve: SimmSpline: x=(-5 0.998 0.999 1 1.015 1.03 1.045 1.06 1.075 1.09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)
          y=(0 0 0 0 0.015 0.03 0.045 0.06 0.075 0.09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)
    Ligament TarsoMetatarsalPlantar1Mus_l: resting_length=0.008928642 pcsa_force=1032
      PathPoint TarsoMetatarsalPlantar1Mus_l_P1: midfoot_l (0.02888678 -0.01360148 0.01101382)
      PathPoint TarsoMetatarsalPlantar1Mus_l_P2: forefoot_l (0.01538822 -0.004798814 0.01552129)
      force_length_curve: SimmSpline: x=(-5 0.998 0.999 1 1.015 1.03 1.045 1.06 1.075 1.09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)
          y=(0 0 0 0 0.015 0.03 0.045 0.06 0.075 0.09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)
    Ligament TarsoMetatarsalPlantar2Mus_l: resting_length=0.007250729 pcsa_force=20913.46
      PathPoint TarsoMetatarsalPlantar2Mus_l_P1: midfoot_l (0.02326297 -0.006399979 0.001594499)
      PathPoint TarsoMetatarsalPlantar2Mus_l_P2: forefoot_l (0.007877249 0.001667071 0.005023574)
      force_length_curve: SimmSpline: x=(-5 0.998 0.999 1 1.015 1.03 1.045 1.06 1.075 1.09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)
          y=(0 0 0 0 0.015 0.03 0.045 0.06 0.075 0.09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)
    Ligament TarsoMetatarsalPlantar3Mus_l: resting_length=0.006903152 pcsa_force=20913.46
      PathPoint TarsoMetatarsalPlantar3Mus_l_P1: midfoot_l (0.02294254 -0.01092271 -0.003354277)
      PathPoint TarsoMetatarsalPlantar3Mus_l_P2: forefoot_l (0.007086242 -0.001986283 -0.0009150424)
      force_length_curve: SimmSpline: x=(-5 0.998 0.999 1 1.015 1.03 1.045 1.06 1.075 1.09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)
          y=(0 0 0 0 0.015 0.03 0.045 0.06 0.075 0.09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)
    Ligament TarsoMetatarsalPlantar4Mus_l: resting_length=0.007610401 pcsa_force=500
      PathPoint TarsoMetatarsalPlantar4Mus_l_P1: midfoot_l (0.01802368 -0.01460016 -0.01260355)
      PathPoint TarsoMetatarsalPlantar4Mus_l_P2: forefoot_l (0.003236311 -0.004979955 -0.009085377)
      force_length_curve: SimmSpline: x=(-5 0.998 0.999 1 1.015 1.03 1.045 1.06 1.075 1.09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)
          y=(0 0 0 0 0.015 0.03 0.045 0.06 0.075 0.09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)
    Ligament TarsoMetatarsalPlantar5Mus_l: resting_length=0.008535562 pcsa_force=500
      PathPoint TarsoMetatarsalPlantar5Mus_l_P1: midfoot_l (0.008783672 -0.01712433 -0.02075076)
      PathPoint TarsoMetatarsalPlantar5Mus_l_P2: forefoot_l (-0.006011717 -0.01030074 -0.01915123)
      force_length_curve: SimmSpline: x=(-5 0.998 0.999 1 1.015 1.03 1.045 1.06 1.075 1.09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)
          y=(0 0 0 0 0.015 0.03 0.045 0.06 0.075 0.09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)
    ObjectGroup R_hip_abd: members=(glut_max1_r glut_med1_r glut_med2_r glut_med3_r glut_min1_r glut_min2_r glut_min3_r peri_r sar_r tfl_r)
    ObjectGroup R_hip_flex: members=(add_brev_r add_long_r glut_med1_r glut_min1_r grac_r iliacus_r pect_r psoas_r rect_fem_r sar_r tfl_r)
    ObjectGroup R_hip_inrot: members=(glut_med1_r glut_min1_r iliacus_r psoas_r tfl_r)
    ObjectGroup R_hip_exrot: members=(gem_r glut_med3_r glut_min3_r peri_r quad_fem_r)
    ObjectGroup R_hip_ext: members=(add_long_r add_mag1_r add_mag2_r add_mag3_r bifemlh_r glut_max1_r glut_max2_r glut_max3_r glut_med3_r glut_min3_r semimem_r semiten_r)
    ObjectGroup R_hip_add: members=(add_brev_r add_long_r add_mag1_r add_mag2_r add_mag3_r bifemlh_r grac_r pect_r semimem_r semiten_r)
    ObjectGroup R_knee_bend: members=(bifemlh_r bifemsh_r grac_r lat_gas_r med_gas_r sar_r semimem_r semiten_r)
    ObjectGroup R_knee_ext: members=(rect_fem_r vas_int_r vas_lat_r vas_med_r)
    ObjectGroup R_ankle_pf: members=(flex_dig_r flex_hal_r lat_gas_r med_gas_r per_brev_r per_long_r soleus_r tib_post_r)
    ObjectGroup R_inverter: members=(ext_hal_r flex_dig_r flex_hal_r tib_ant_r tib_post_r)
    ObjectGroup R_ankle_df: members=(ext_dig_r ext_hal_r per_tert_r tib_ant_r)
    ObjectGroup R_everter: members=(ext_dig_r per_brev_r per_long_r per_tert_r)
    ObjectGroup L_hip_abd: members=(glut_max1_l glut_med1_l glut_med2_l glut_med3_l glut_min1_l glut_min2_l glut_min3_l peri_l sar_l tfl_l)
    ObjectGroup L_hip_flex: members=(add_brev_l add_long_l glut_med1_l glut_min1_l grac_l iliacus_l pect_l psoas_l rect_fem_l sar_l tfl_l)
    ObjectGroup L_hip_inrot: members=(glut_med1_l glut_min1_l iliacus_l psoas_l tfl_l)
    ObjectGroup L_hip_exrot: members=(gem_l glut_med3_l glut_min3_l peri_l quad_fem_l)
    ObjectGroup L_hip_ext: members=(add_long_l add_mag1_l add_mag2_l add_mag3_l bifemlh_l glut_max1_l glut_max2_l glut_max3_l glut_med3_l glut_min3_l semimem_l semiten_l)
    ObjectGroup L_hip_add: members=(add_brev_l add_long_l add_mag1_l add_mag2_l add_mag3_l bifemlh_l grac_l pect_l semimem_l semiten_l)
    ObjectGroup L_knee_bend: members=(bifemlh_l bifemsh_l grac_l lat_gas_l med_gas_l sar_l semimem_l semiten_l)
    ObjectGroup L_knee_ext: members=(rect_fem_l vas_int_l vas_lat_l vas_med_l)
    ObjectGroup L_ankle_pf: members=(flex_dig_l flex_hal_l lat_gas_l med_gas_l per_brev_l per_long_l soleus_l tib_post_l)
    ObjectGroup L_inverter: members=(ext_hal_l flex_dig_l flex_hal_l tib_ant_l tib_post_l)
    ObjectGroup L_ankle_df: members=(ext_dig_l ext_hal_l per_tert_l tib_ant_l)
    ObjectGroup L_everter: members=(ext_dig_l per_brev_l per_long_l per_tert_l)
    ObjectGroup back_ext: members=(ercspn_l ercspn_r)
    ObjectGroup back_rlb: members=(ercspn_r extobl_r intobl_r)
    ObjectGroup back_introt: members=(ercspn_r extobl_l intobl_r)
    ObjectGroup back_llb: members=(ercspn_l extobl_l intobl_l)
    ObjectGroup back_extrot: members=(ercspn_l extobl_r intobl_l)
    ObjectGroup back_flex: members=(extobl_l extobl_r intobl_l intobl_r)
  MarkerSet:
    Marker C7: torso (-0.074355 0.442953 0)
    Marker STRN: torso (0.1 0.24 0)
    Marker T10: torso (-0.1 0.22 0)
    Marker CLAV: torso (0.04 0.38 0)
    Marker RBAK: torso (-0.0826239 0.270296 0.0891336)
    Marker RSHO: torso (0.0062886 0.411461 0.16784)
    Marker RUPA: humerus_r (0.0062912 -0.0713697 0.0327068)
    Marker RELB: humerus_r (0.00728996 -0.276427 0.0406834)
    Marker RFRA: radius_r (0.0600027 -0.0679815 0.030432)
    Marker RWRA: radius_r (-0.00262503 -0.218796 0.0500793)
    Marker RWRB: radius_r (-0.0158165 -0.225811 -0.0203826)
    Marker RFIN: hand_r (-0.0130397 -0.0785848 0.000926989)
    Marker LSHO: torso (0.0062886 0.411461 -0.16784)
    Marker LUPA: humerus_l (0.00120368 -0.206847 -0.0266621)
    Marker LELB: humerus_l (0.00728996 -0.276427 -0.0406834)
    Marker LFRA: radius_l (-0.00706537 -0.159023 -0.0528077)
    Marker LWRA: radius_l (-0.00262503 -0.218796 -0.0500793)
    Marker LWRB: radius_l (-0.0158165 -0.225811 0.0203826)
    Marker LFIN: hand_l (-0.00829786 -0.0821209 0.00204646)
    Marker RASI: pelvis (0.0168374 0.0118812 0.119179)
    Marker LASI: pelvis (0.0168374 0.0118812 -0.119179)
    Marker RPSI: pelvis (-0.172322 0.0400191 0.04)
    Marker LPSI: pelvis (-0.172322 0.0400191 -0.04)
    Marker SACR: pelvis (-0.172322 0.0400191 0)
    Marker RCRI: pelvis (-0.031774 0.0695935 0.124248)
    Marker LCRI: pelvis (-0.031774 0.0695935 -0.124248)
    Marker RTM: femur_r (0.0406103 0.0206442 0.111258)
    Marker REPILB: femur_r (0.00410216 -0.391644 0.0566261)
    Marker REPIMB: femur_r (0.0100748 -0.391606 -0.0529548)
    Marker RCrVBB: femur_r (0.0315019 -0.191213 0.0990159)
    Marker RCrDBB: femur_r (0.0984965 -0.203226 0.0410029)
    Marker RCaVBB: femur_r (0.0617172 -0.335667 0.028309)
    Marker RCaDBB: femur_r (0.025865 -0.316127 0.0780273)
    Marker RFH: tibia_r (-0.0069657 -0.0744818 0.0645095)
    Marker RTT: tibia_r (0.0532922 -0.0799952 -0.0109653)
    Marker RLM: tibia_r (-0.00743164 -0.412487 0.05851)
    Marker RMM: tibia_r (0.00617904 -0.39951 -0.0358896)
    Marker RCrVOB: tibia_r (0.0519828 -0.166259 -0.0283108)
    Marker RCrDOB: tibia_r (0.0376942 -0.170397 0.0556548)
    Marker RCaVOB: tibia_r (0.0416226 -0.31435 -0.0251265)
    Marker RCaDOB: tibia_r (0.0284503 -0.316485 0.0505668)
    Marker RLCV: calcn_r (-0.01836892 0.0006313337 0.04050506)
    Marker RMCV: calcn_r (-0.005523641 -0.0002018643 -0.03275659)
    Marker RCCD: calcn_r (-0.0736837 0.007702077 0.004208196)
    Marker RCaCD: calcn_r (-0.07128066 -0.01196453 0.003549911)
    Marker RCUB: midfoot_r (0.00683332 0.001977385 0.03510794)
    Marker RNA: midfoot_r (0.006255552 0.004581988 -0.04226304)
    Marker RCUM: midfoot_r (0.02919561 0.003891715 -0.04116432)
    Marker RCUI: midfoot_r (0.02900791 0.02022972 -0.007333896)
    Marker RBMT3: forefoot_r (0.008621532 0.02022077 0.01308687)
    Marker RBMT1: forefoot_r (0.02919402 0.008951538 -0.04547817)
    Marker RBMT5: forefoot_r (-0.01605239 -0.002672439 0.04378507)
    Marker RHMT3: forefoot_r (0.06176139 0.002488606 0.01196167)
    Marker RHMT1: forefoot_r (0.06539515 -0.003559131 -0.05190995)
    Marker RHMT5: forefoot_r (0.03744903 -0.007774393 0.05241096)
    Marker RHAL: toes_r (0.05725522 0.0005144231 -0.02558685)
    Marker RTOE3: toes_r (0.04312075 0.007144686 0.007796617)
    Marker RTOE5: toes_r (0.01797805 0.01101889 0.04039522)
    Marker LTM: femur_l (0.0406103 0.0206442 -0.111258)
    Marker LEPILB: femur_l (0.00410216 -0.391644 -0.0566261)
    Marker LEPIMB: femur_l (0.0100748 -0.391606 0.0529548)
    Marker LCrVBB: femur_l (0.0315019 -0.191213 -0.0990159)
    Marker LCrDBB: femur_l (0.0984965 -0.203226 -0.0410029)
    Marker LCaVBB: femur_l (0.0617172 -0.335667 -0.028309)
    Marker LCaDBB: femur_l (0.025865 -0.316127 -0.0780273)
    Marker LFH: tibia_l (-0.0069657 -0.0744818 -0.0645095)
    Marker LTT: tibia_l (0.0532922 -0.0799952 0.0109653)
    Marker LLM: tibia_l (-0.00743164 -0.412487 -0.05851)
    Marker LMM: tibia_l (0.00617904 -0.39951 0.0358896)
    Marker LCrVOB: tibia_l (0.0519828 -0.166259 0.0283108)
    Marker LCrDOB: tibia_l (0.0376942 -0.170397 -0.0556548)
    Marker LCaVOB: tibia_l (0.0416226 -0.31435 0.0251265)
    Marker LCaDOB: tibia_l (0.0284503 -0.316485 -0.0505668)
    Marker LLCV: calcn_l (-0.01836892 0.0006313337 -0.04050506)
    Marker LMCV: calcn_l (-0.005523641 -0.0002018643 0.03275659)
    Marker LCCD: calcn_l (-0.0736837 0.007702077 -0.004208196)
    Marker LCaCD: calcn_l (-0.07128066 -0.01196453 -0.003549911)
    Marker LCUB: midfoot_l (0.00683332 0.001977385 -0.03510794)
    Marker LNA: midfoot_l (0.006255552 0.004581988 0.04226304)
    Marker LCUM: midfoot_l (0.02919561 0.003891715 0.04116432)
    Marker LCUI: midfoot_l (0.02900791 0.02022972 0.007333896)
    Marker LBMT3: forefoot_l (0.008621532 0.02022077 -0.01308687)
    Marker LBMT1: forefoot_l (0.02919402 0.008951538 0.04547817)
    Marker LHMT3: forefoot_l (0.06176139 0.002488606 -0.01196167)
    Marker LHMT1: forefoot_l (0.06539515 -0.003559131 0.05190995)
    Marker LBMT5: forefoot_l (-0.01605239 -0.002672439 -0.04378507)
    Marker LHMT5: forefoot_l (0.03744903 -0.007774393 -0.05241096)
    Marker LHAL: toes_l (0.05725522 0.0005144231 0.02558685)
    Marker LTOE3: toes_l (0.04312075 0.007144686 -0.007796617)
    Marker LTOE5: toes_l (0.01797805 0.01101889 -0.04039522)
