# OpenSim document version 40000
Model calcn_forefoot:
  gravity: 0 -9.80665 0
  length_units: meters
  force_units: N
  credits:
    Delp S.L., Loan J.P., Hoy M.G., Zajac F.E., Topp E.L., Rosen J.M., Thelen D.G., Anderson F.C., Seth A., Hamner S.R.
  publications:
    Notes: 3D, 23 DOF gait model created by D.G. Thelen, Univ. of Wisconsin-Madison, and Samuel Hamner, Ajay Seth, Frank C. Anderson, and Scott L. Delp, Stanford University. Lower extremity joint defintions based on Delp et al. (1990). Low back joint and anthropometry based on Anderson and Pandy (1999, 2001). Planar knee model of Yamaguchi and Zajac (1989). Seth removed the patella to avoid kinematic constraints; insertions of the quadrucepts are handled with moving points in the tibia frame. Hamner added arms adapted from Holzbaur et al., 2005. Hamner, S.R., Seth, A, Delp, S.L.: Muscle contributions to propulsion and support during running. Journal of Biomechanics, 2010. Delp, S.L., Loan, J.P., Hoy, M.G., Zajac, F.E., Topp E.L., Rosen, J.M.: An interactive graphics-based model of the lower extremity to study orthopaedic surgical procedures, IEEE Transactions on Biomedical Engineering, vol. 37, pp. 757-767, 1990. Yamaguchi G.T., Zajac F.E.: A planar model of the knee joint to characterize the knee extensor mechanism." J . Biomech. vol. 21. pp. 1-10. 1989. Anderson F.C., Pandy M.G.: A dynamic optimization solution for vertical jumping in three dimensions. Computer Methods in Biomechanics and Biomedical Engineering 2:201-231, 1999. Anderson F.C., Pandy M.G.: Dynamic optimization of human walking. Journal of Biomechanical Engineering 123:381-390, 2001. Holzbaur, KR, WM Murray and SL Delp, 2005. A model of the upper extremity for simulating musculoskeletal surgery and analyzing neuromuscular control. Ann Biomed Eng 33(6): 829-840.
  Ground
  BodySet:
    Body calcn_r: mass=0.6123449 [kg] mass_center=(0.03570389 0.007511644 -0.004421387)
        inertia=(0.0008212948 0 0.0008212948 0 0 0) meshes=calcaneous_rv.vtp
    Body forefoot_r: mass=0.4988495 mass_center=(0.03109281 -0.008181545 -0.0004746148)
        inertia=(0.001090012 0.001053793 0.001053793 0 0 0) meshes=model_r_forefoot.stl
      WrapCylinder MetatarsalHead_r: translation=(0.06194209 -0.01664216 0.003289906) quadrant=-y radius=0.01132471
          length=0.08029
    Body calcn_l: mass=0.6123449 mass_center=(0.03570389 0.007511644 0.004421387)
        inertia=(0.0008212948 0 0.0008212948 0 0 0) meshes=calcaneous_lv.vtp
    Body forefoot_l: mass=0.4988495 mass_center=(0.03109281 -0.008181545 0.0004746148)
        inertia=(0.001090012 0.001053793 0.001053793 0 0 0) meshes=model_l_forefoot.stl
      WrapCylinder MetatarsalHead_l: translation=(0.06194209 -0.01664216 -0.003289906) quadrant=-y radius=0.01132471
          length=0.08029
  JointSet:
    CustomJoint ground_calcn_r: socket_parent_frame=ground_offset socket_child_frame=calcn_r_offset
      Coordinate calcn_rx_r: default_value=0 range=(-1.570796 1.570796) clamped=false
      Coordinate calcn_ry_r: default_value=0 range=(-1.570796 1.570796) clamped=false
      Coordinate calcn_rz_r: default_value=0 range=(-1.570796 1.570796) clamped=false
      Coordinate calcn_tx_r: default_value=0 range=(-5 5) clamped=false
      Coordinate calcn_ty_r: default_value=0 range=(-1 2) clamped=false
      Coordinate calcn_tz_r: default_value=0 range=(-3 3) clamped=false
      PhysicalOffsetFrame ground_offset: socket_parent=/ground translation=(0 0 0) [meters]
      PhysicalOffsetFrame calcn_r_offset: socket_parent=/bodyset/calcn_r translation=(0 0 0)
      SpatialTransform:
        TransformAxis rotation1: coordinates=calcn_rx_r axis=(1 0 0) LinearFunction(coefficients=1 0)
        TransformAxis rotation2: coordinates=calcn_ry_r axis=(0 1 0) LinearFunction(coefficients=1 0)
        TransformAxis rotation3: coordinates=calcn_rz_r axis=(0 0 1) LinearFunction(coefficients=1 0)
        TransformAxis translation1: coordinates=calcn_tx_r axis=(1 0 0) LinearFunction(coefficients=1 0)
        TransformAxis translation2: coordinates=calcn_ty_r axis=(0 1 0) LinearFunction(coefficients=1 0)
        TransformAxis translation3: coordinates=calcn_tz_r axis=(0 0 1) LinearFunction(coefficients=1 0)
    CustomJoint ground_calcn_l: socket_parent_frame=ground_offset socket_child_frame=calcn_l_offset
      Coordinate calcn_rx_l: default_value=0 range=(-1.570796 1.570796) clamped=false
      Coordinate calcn_ry_l: default_value=0 range=(-1.570796 1.570796) clamped=false
      Coordinate calcn_rz_l: default_value=0 range=(-1.570796 1.570796) clamped=false
      Coordinate calcn_tx_l: default_value=0 range=(-5 5) clamped=false
      Coordinate calcn_ty_l: default_value=0 range=(-1 2) clamped=false
      Coordinate calcn_tz_l: default_value=0 range=(-3 3) clamped=false
      PhysicalOffsetFrame ground_offset: socket_parent=/ground translation=(0 0 0)
      PhysicalOffsetFrame calcn_l_offset: socket_parent=/bodyset/calcn_l translation=(0 0 0)
      SpatialTransform:
        TransformAxis rotation1: coordinates=calcn_rx_l axis=(1 0 0) LinearFunction(coefficients=1 0)
        TransformAxis rotation2: coordinates=calcn_ry_l axis=(0 1 0) LinearFunction(coefficients=1 0)
        TransformAxis rotation3: coordinates=calcn_rz_l axis=(0 0 1) LinearFunction(coefficients=1 0)
        TransformAxis translation1: coordinates=calcn_tx_l axis=(1 0 0) LinearFunction(coefficients=1 0)
        TransformAxis translation2: coordinates=calcn_ty_l axis=(0 1 0) LinearFunction(coefficients=1 0)
        TransformAxis translation3: coordinates=calcn_tz_l axis=(0 0 1) LinearFunction(coefficients=1 0)
    CustomJoint ground_forefoot_r: socket_parent_frame=ground_offset socket_child_frame=forefoot_r_offset
      Coordinate forefoot_rx_r: default_value=0 range=(-1.570796 1.570796) clamped=false
      Coordinate forefoot_ry_r: default_value=0 range=(-1.570796 1.570796) clamped=false
      Coordinate forefoot_rz_r: default_value=0 range=(-1.570796 1.570796) clamped=false
      Coordinate forefoot_tx_r: default_value=0 range=(-5 5) clamped=false
      Coordinate forefoot_ty_r: default_value=0 range=(-1 2) clamped=false
      Coordinate forefoot_tz_r: default_value=0 range=(-3 3) clamped=false
      PhysicalOffsetFrame ground_offset: socket_parent=/ground translation=(0 0 0)
      PhysicalOffsetFrame forefoot_r_offset: socket_parent=/bodyset/forefoot_r translation=(0 0 0)
      SpatialTransform:
        TransformAxis rotation1: coordinates=forefoot_rx_r axis=(1 0 0) LinearFunction(coefficients=1 0)
        TransformAxis rotation2: coordinates=forefoot_ry_r axis=(0 1 0) LinearFunction(coefficients=1 0)
        TransformAxis rotation3: coordinates=forefoot_rz_r axis=(0 0 1) LinearFunction(coefficients=1 0)
        TransformAxis translation1: coordinates=forefoot_tx_r axis=(1 0 0) LinearFunction(coefficients=1 0)
        TransformAxis translation2: coordinates=forefoot_ty_r axis=(0 1 0) LinearFunction(coefficients=1 0)
        TransformAxis translation3: coordinates=forefoot_tz_r axis=(0 0 1) LinearFunction(coefficients=1 0)
    CustomJoint ground_forefoot_l: socket_parent_frame=ground_offset socket_child_frame=forefoot_l_offset
      Coordinate forefoot_rx_l: default_value=0 range=(-1.570796 1.570796) clamped=false
      Coordinate forefoot_ry_l: default_value=0 range=(-1.570796 1.570796) clamped=false
      Coordinate forefoot_rz_l: default_value=0 range=(-1.570796 1.570796) clamped=false
      Coordinate forefoot_tx_l: default_value=0 range=(-5 5) clamped=false
      Coordinate forefoot_ty_l: default_value=0 range=(-1 2) clamped=false
      Coordinate forefoot_tz_l: default_value=0 range=(-3 3) clamped=false
      PhysicalOffsetFrame ground_offset: socket_parent=/ground translation=(0 0 0)
      PhysicalOffsetFrame forefoot_l_offset: socket_parent=/bodyset/forefoot_l translation=(0 0 0)
      SpatialTransform:
        TransformAxis rotation1: coordinates=forefoot_rx_l axis=(1 0 0) LinearFunction(coefficients=1 0)
        TransformAxis rotation2: coordinates=forefoot_ry_l axis=(0 1 0) LinearFunction(coefficients=1 0)
        TransformAxis rotation3: coordinates=forefoot_rz_l axis=(0 0 1) LinearFunction(coefficients=1 0)
        TransformAxis translation1: coordinates=forefoot_tx_l axis=(1 0 0) LinearFunction(coefficients=1 0)
        TransformAxis translation2: coordinates=forefoot_ty_l axis=(0 1 0) LinearFunction(coefficients=1 0)
        TransformAxis translation3: coordinates=forefoot_tz_l axis=(0 0 1) LinearFunction(coefficients=1 0)
  MarkerSet:
    Marker Foot_r1: calcn_r (-0.01242661 0.04712014 0.003372451)
    Marker Foot_r2: calcn_r (-0.01901277 0.01302153 0.00761759)
    Marker Foot_r3: calcn_r (0.04484858 0.027582 0.03535122)
    Marker Foot_r4: forefoot_r (-0.02236722 -0.002875031 0.04607593)
    Marker Foot_r5: forefoot_r (0.04647907 -0.007447853 0.06577853)
    Marker Foot_r8: forefoot_r (0.08078574 0.001870196 -0.03713958)
    Marker Foot_r9: forefoot_r (0.02849789 0.02343617 -0.03137838)
    Marker Foot_r10: calcn_r (0.0535256 0.03909548 -0.03972037)
    Marker Foot_l1: calcn_l (-0.02228468 0.0403714 -0.006913784)
    Marker Foot_l2: calcn_l (-0.02534942 0.007274217 -0.01020576)
    Marker Foot_l3: calcn_l (0.04416436 0.02840796 -0.03689327)
    Marker Foot_l4: forefoot_l (-0.0206478 0.0002024851 -0.04389372)
    Marker Foot_l5: forefoot_l (0.05514101 -0.005327901 -0.05421513)
    Marker Foot_l8: forefoot_l (0.07037393 0.004544138 0.0443498)
    Marker Foot_l9: forefoot_l (0.008010992 0.01371268 0.04145339)
    Marker Foot_l10: calcn_l (0.03527088 0.03606314 0.03620474)
