# OpenSim document version 40000
Model subject1_withMTJ_locked_scaled_custom:
  gravity: 0 -9.80665 0
  length_units: meters
  force_units: N
  credits:
    Delp S.L., Loan J.P., Hoy M.G., Zajac F.E., Topp E.L., Rosen J.M., Thelen D.G., Anderson F.C., Seth A., Hamner S.R.
  publications:
    Notes: 3D, 23 DOF gait model created by D.G. Thelen, Univ. of Wisconsin-Madison, and Samuel Hamner, Ajay Seth, Frank C. Anderson, and Scott L. Delp, Stanford University. Lower extremity joint defintions based on Delp et al. (1990). Low back joint and anthropometry based on Anderson and Pandy (1999, 2001). Planar knee model of Yamaguchi and Zajac (1989). Seth removed the patella to avoid kinematic constraints; insertions of the quadrucepts are handled with moving points in the tibia frame. Hamner added arms adapted from Holzbaur et al., 2005. Hamner, S.R., Seth, A, Delp, S.L.: Muscle contributions to propulsion and support during running. Journal of Biomechanics, 2010. Delp, S.L., Loan, J.P., Hoy, M.G., Zajac, F.E., Topp E.L., Rosen, J.M.: An interactive graphics-based model of the lower extremity to study orthopaedic surgical procedures, IEEE Transactions on Biomedical Engineering, vol. 37, pp. 757-767, 1990. Yamaguchi G.T., Zajac F.E.: A planar model of the knee joint to characterize the knee extensor mechanism." J . Biomech. vol. 21. pp. 1-10. 1989. Anderson F.C., Pandy M.G.: A dynamic optimization solution for vertical jumping in three dimensions. Computer Methods in Biomechanics and Biomedical Engineering 2:201-231, 1999. Anderson F.C., Pandy M.G.: Dynamic optimization of human walking. Journal of Biomechanical Engineering 123:381-390, 2001. Holzbaur, KR, WM Murray and SL Delp, 2005. A model of the upper extremity for simulating musculoskeletal surgery and analyzing neuromuscular control. Ann Biomed Eng 33(6): 829-840.
  Ground
  BodySet:
    Body tibia_r: mass=3.005646 [kg] mass_center=(0 -0.1752504 0) inertia=(0.03600213 0.003644872 0.03600213 0 0 0)
        meshes=(tibia_r.vtp fibula_r.vtp)
    Body talus_r: mass=0.1146108 mass_center=(0 0 0) inertia=(0.001561428 0.001453938 0.001561428 0 0 0)
        meshes=talus_rv.vtp
    Body calcn_r: mass=0.6123449 mass_center=(0.03570389 0.007511644 -0.004421387)
        inertia=(0.0008212948 0 0.0008212948 0 0 0) meshes=calcaneous_rv.vtp
    Body midfoot_r: mass=0.2954572 mass_center=(0.01395438 -0.006397697 -0.00260127)
        inertia=(0.0004403065 0 0.0004403065 0 0 0) meshes=model_r_midfoot.stl
    Body forefoot_r: mass=0.4988495 mass_center=(0.03109281 -0.008181545 -0.0004746148)
        inertia=(0.001090012 0.001053793 0.001053793 0 0 0) meshes=model_r_forefoot.stl
      WrapCylinder MetatarsalHead_r: translation=(0.065 -0.015 -0.02) quadrant=-y radius=0.0095 length=0.05
    Body toes_r: mass=0.2742298 mass_center=(0.03543282 0.007087905 -0.0200725)
        inertia=(0.0001805888 0.0002445255 0.0002445255 0 0 0) meshes=model_r_toes.stl
  JointSet:
    CustomJoint ground_tibia: socket_parent_frame=ground_offset socket_child_frame=tibia_offset
      Coordinate tibia_tilt: default_value=0 range=(-1.570796 1.570796) clamped=true
      Coordinate tibia_list: default_value=0 range=(-1.570796 1.570796) clamped=true
      Coordinate tibia_rotation: default_value=0 range=(-1.570796 1.570796) clamped=true
      Coordinate tibia_tx: default_value=0 range=(-5 5) clamped=true
      Coordinate tibia_ty: default_value=0 range=(-1 2) clamped=true
      Coordinate tibia_tz: default_value=0 range=(-3 3) clamped=true
      PhysicalOffsetFrame ground_offset: socket_parent=/ground translation=(0 0 0) [meters]
      PhysicalOffsetFrame tibia_offset: socket_parent=/bodyset/tibia_r translation=(0 0 0)
      SpatialTransform:
        TransformAxis rotation1: coordinates=tibia_tilt axis=(0 0 1) LinearFunction(coefficients=1 0)
        TransformAxis rotation2: coordinates=tibia_list axis=(1 0 0) LinearFunction(coefficients=1 0)
        TransformAxis rotation3: coordinates=tibia_rotation axis=(0 1 0) LinearFunction(coefficients=1 0)
        TransformAxis translation1: coordinates=tibia_tx axis=(1 0 0) LinearFunction(coefficients=1 0)
        TransformAxis translation2: coordinates=tibia_ty axis=(0 1 0) LinearFunction(coefficients=1 0)
        TransformAxis translation3: coordinates=tibia_tz axis=(0 0 1) LinearFunction(coefficients=1 0)
    CustomJoint ankle_r: socket_parent_frame=tibia_r_offset socket_child_frame=talus_r_offset
      Coordinate ankle_angle_r: default_value=0 range=(-1.570796 1.570796) clamped=true
      PhysicalOffsetFrame tibia_r_offset: socket_parent=/bodyset/tibia_r translation=(0 -0.4036298 0)
      PhysicalOffsetFrame talus_r_offset: socket_parent=/bodyset/talus_r translation=(0 0 0)
      SpatialTransform: axes_held_at_zero=(rotation2 rotation3 translation1 translation2 translation3)
        TransformAxis rotation1: coordinates=ankle_angle_r axis=(-0.1050135 -0.1740224 0.9791263)
            LinearFunction(coefficients=1 0)
    CustomJoint subtalar_r: socket_parent_frame=talus_r_offset socket_child_frame=calcn_r_offset
      Coordinate subtalar_angle_r: default_value=0 range=(-1.570796 1.570796) clamped=true
      PhysicalOffsetFrame talus_r_offset: socket_parent=/bodyset/talus_r
          translation=(-0.04395062 -0.05996309 0.007903289)
      PhysicalOffsetFrame calcn_r_offset: socket_parent=/bodyset/calcn_r translation=(0 0 0)
      SpatialTransform: axes_held_at_zero=(rotation2 rotation3 translation1 translation2 translation3)
        TransformAxis rotation1: coordinates=subtalar_angle_r axis=(0.7871796 0.6047475 -0.1209495)
            LinearFunction(coefficients=1 0)
    CustomJoint midtarsal_r: socket_parent_frame=calcn_r_offset socket_child_frame=midfoot_r_offset
      Coordinate mtj_angle_r: default_value=0 range=(-1.570796 1.570796) clamped=false
      PhysicalOffsetFrame calcn_r_offset: socket_parent=/bodyset/calcn_r
          translation=(0.07723074 0.02919002 -0.007434893)
      PhysicalOffsetFrame midfoot_r_offset: socket_parent=/bodyset/midfoot_r translation=(0 0 0)
      SpatialTransform: axes_held_at_zero=(rotation2 rotation3 translation1 translation2 translation3)
        TransformAxis rotation1: coordinates=mtj_angle_r axis=(0.020132 -0.30093 0.95344)
            LinearFunction(coefficients=1 0)
    WeldJoint tarsometatarsal_r: socket_parent_frame=midfoot_r_offset socket_child_frame=forefoot_r_offset
      PhysicalOffsetFrame midfoot_r_offset: socket_parent=/bodyset/midfoot_r
          translation=(0.02300583 -0.01558453 0.005244348)
      PhysicalOffsetFrame forefoot_r_offset: socket_parent=/bodyset/forefoot_r translation=(0 0 0)
    CustomJoint mtp_r: socket_parent_frame=forefoot_r_offset socket_child_frame=toes_r_offset
      Coordinate mtp_angle_r: default_value=0 range=(-0.3491 0.8727) clamped=false
      PhysicalOffsetFrame forefoot_r_offset: socket_parent=/bodyset/forefoot_r
          translation=(0.06194209 -0.01664216 0.003289906)
      PhysicalOffsetFrame toes_r_offset: socket_parent=/bodyset/toes_r translation=(0 0 0)
      SpatialTransform: axes_held_at_zero=(rotation2 rotation3 translation1 translation2 translation3)
        TransformAxis rotation1: coordinates=mtp_angle_r axis=(-0.282997 0.0424223 0.958182)
            LinearFunction(coefficients=1 0)
  ForceSet:
    Thelen2003Muscle [values shared by the 10 below unless stated]: FmaxTendonStrain=0.033 FmaxMuscleStrain=0.6
        KshapeActive=0.5 KshapePassive=4 Af=0.3 Flen=1.8 activation_time_constant=0.01 [seconds]
        deactivation_time_constant=0.04 [seconds]
    Thelen2003Muscle soleus_r: max_isometric_force=3549 optimal_fiber_length=0.04779569 tendon_slack_length=0.2389785
        pennation_angle_at_optimal=0.4363323 [radians]
      PathPoint P1: tibia_r (-0.002253403 -0.1438987 0.006666318)
      PathPoint P2: calcn_r (0 0.04431122 -0.005288817)
    Thelen2003Muscle tib_post_r: max_isometric_force=1588 optimal_fiber_length=0.03007615 tendon_slack_length=0.3007615
        pennation_angle_at_optimal=0.2094395
      PathPoint P1: tibia_r (-0.00882583 -0.1265332 0.001783944)
      PathPoint P2: tibia_r (-0.01352042 -0.3802568 -0.02150122)
      PathPoint P3: calcn_r (0.03757927 0.04774177 -0.02853965)
      PathPoint P4: midfoot_r (0.0005721473 0.001013649 -0.0233426)
    Thelen2003Muscle flex_dig_r: max_isometric_force=310 optimal_fiber_length=0.03252889 tendon_slack_length=0.3826929
        pennation_angle_at_optimal=0.1221731
      PathPoint P1: tibia_r (-0.00779302 -0.1920527 -0.001690053)
      PathPoint P2: tibia_r (-0.01445934 -0.3802568 -0.01840279)
      PathPoint P3: calcn_r (0.03929151 0.04502592 -0.02794092)
      PathPoint P4: midfoot_r (-0.01342709 -0.004032687 -0.01880961)
      PathPoint P5: forefoot_r (0.04917931 -0.02518359 0.01376607)
      PathPoint P6: toes_r (-0.001712245 -0.01114927 0.01466898)
      PathPoint P7: toes_r (0.02568367 -0.0101487 0.02145463)
      PathPoint P8: toes_r (0.0397421 -0.008576365 0.02414894)
    Thelen2003Muscle flex_hal_r: max_isometric_force=322 optimal_fiber_length=0.04093934 tendon_slack_length=0.3617895
        pennation_angle_at_optimal=0.1745329
      PathPoint P1: tibia_r (-0.007417453 -0.2190865 0.0229096)
      PathPoint P2: tibia_r (-0.01746388 -0.3828851 -0.01633717)
      PathPoint P3: calcn_r (0.03370419 0.03945128 -0.02404915)
      PathPoint P4: midfoot_r (0.0163119 -0.01947014 -0.01811109)
      PathPoint P5: forefoot_r (0.05530735 -0.023 -0.027)
      PathPoint P6: toes_r (0.01396831 -0.009148123 -0.03044408)
      PathPoint P7: toes_r (0.0506464 -0.01457982 -0.03006181)
      PathWrap: wrap_object=MetatarsalHead_r method=hybrid range=(5 6)
    Thelen2003Muscle tib_ant_r: max_isometric_force=905 optimal_fiber_length=0.09434574 tendon_slack_length=0.2146847
        pennation_angle_at_optimal=0.08726646
      PathPoint P1: tibia_r (0.01680663 -0.1524406 0.01079756)
      PathPoint P2: tibia_r (0.0308904 -0.3708701 -0.01661885)
      PathPoint P3: midfoot_r (0.04497376 0.009615513 -0.02084099)
    Thelen2003Muscle per_brev_r: max_isometric_force=435 optimal_fiber_length=0.05484301 tendon_slack_length=0.1765945
        pennation_angle_at_optimal=0.08726646
      PathPoint P1: tibia_r (-0.006572426 -0.2483731 0.03051484)
      PathPoint P2: tibia_r (-0.01859058 -0.3927412 0.02657138)
      PathPoint P3: tibia_r (-0.01352042 -0.4031605 0.02713473)
      PathPoint P4: calcn_r (0.04244565 0.03859364 0.02325084)
      PathPoint P5: forefoot_r (-0.02268535 -0.009356485 0.03123189)
    Thelen2003Muscle per_long_r: max_isometric_force=943 optimal_fiber_length=0.04948137 tendon_slack_length=0.3483892
        pennation_angle_at_optimal=0.1745329
      PathPoint P1: tibia_r (0.000469459 -0.1471841 0.03398883)
      PathPoint P2: tibia_r (-0.0194356 -0.3947124 0.02685306)
      PathPoint P3: tibia_r (-0.01521047 -0.4054133 0.02713473)
      PathPoint P4: calcn_r (0.03947175 0.03287607 0.02205337)
      PathPoint P5: midfoot_r (0.002770918 -0.03247213 0.02700875)
      PathPoint P6: midfoot_r (0.01787321 -0.02342133 0.0098603)
      PathPoint P7: forefoot_r (0.0169679 -0.005211676 -0.02000093)
    Thelen2003Muscle per_tert_r: max_isometric_force=180 optimal_fiber_length=0.08792177 tendon_slack_length=0.1112934
        pennation_angle_at_optimal=0.2268928
      PathPoint P1: tibia_r (0.0009389181 -0.2632042 0.02168901)
      PathPoint P2: tibia_r (0.02150122 -0.3819464 0.0149288)
      PathPoint P3: forefoot_r (-0.002914804 0.0006694051 0.03094893)
    Thelen2003Muscle ext_dig_r: max_isometric_force=512 optimal_fiber_length=0.09708468 tendon_slack_length=0.3283747
        pennation_angle_at_optimal=0.1396263
      PathPoint P1: tibia_r (0.003004538 -0.1296309 0.02591414)
      PathPoint P2: tibia_r (0.02713473 -0.3761267 0.00676021)
      PathPoint P3: midfoot_r (0.005858191 0.02627047 0.007335104)
      PathPoint P4: forefoot_r (0.04539435 -0.005743826 0.01516312)
      PathPoint P5: toes_r (0.0002703544 0.006718153 0.01526772)
      PathPoint P6: toes_r (0.03992234 -0.0005717577 0.02494725)
    Thelen2003Muscle ext_hal_r: max_isometric_force=162 optimal_fiber_length=0.1050929 tendon_slack_length=0.2887688
        pennation_angle_at_optimal=0.1047198
      PathPoint P1: tibia_r (0.001126702 -0.1658637 0.02140733)
      PathPoint P2: tibia_r (0.03060873 -0.3740616 -0.007980804)
      PathPoint P3: midfoot_r (0.01018386 0.02641341 -0.01362059)
      PathPoint P4: forefoot_r (0.01628619 0.03056279 -0.02345523)
      PathPoint P5: forefoot_r (0.05602829 0.006263085 -0.02575037)
      PathPoint P6: toes_r (0.02685521 0.005860516 -0.02844831)
      PathPoint P7: toes_r (0.05073651 0.00485994 -0.02256075)
    Ligament PlantarFascia_r: resting_length=0.1489649 pcsa_force=62.74039
      PathPoint PlantarFascia_r_P1: calcn_r (0.03236061 -0.01571152 -0.0102083)
      PathPoint PlantarFascia_r_P3: toes_r (0.01313467 -0.002727308 -0.009256577)
      PathWrap: wrap_object=MetatarsalHead_r method=hybrid range=(1 2)
      force_length_curve: SimmSpline: x=(-5 0.998 0.999 1 1.015 1.03 1.031 1.031 5)
          y=(0 0 0 0 0.312271 0.767168 0.767168 0.767168 0.767168)
    SmoothSphereHalfSpaceForce SmoothSphereHalfSpaceForce_s1_r: socket_sphere=/contactgeometryset/s1_r
        socket_half_space=/contactgeometryset/floor stiffness=10000000 [N/m^2] dissipation=2 [s/m] static_friction=0.8
        dynamic_friction=0.8 viscous_friction=0.5 transition_velocity=0.2 [m/s]
    SmoothSphereHalfSpaceForce SmoothSphereHalfSpaceForce_s2_r: socket_sphere=/contactgeometryset/s2_r
        socket_half_space=/contactgeometryset/floor stiffness=10000000 dissipation=2 static_friction=0.8
        dynamic_friction=0.8 viscous_friction=0.5 transition_velocity=0.2
    SmoothSphereHalfSpaceForce SmoothSphereHalfSpaceForce_s3_r: socket_sphere=/contactgeometryset/s3_r
        socket_half_space=/contactgeometryset/floor stiffness=10000000 dissipation=2 static_friction=0.8
        dynamic_friction=0.8 viscous_friction=0.5 transition_velocity=0.2
    SmoothSphereHalfSpaceForce SmoothSphereHalfSpaceForce_s4_r: socket_sphere=/contactgeometryset/s4_r
        socket_half_space=/contactgeometryset/floor stiffness=10000000 dissipation=2 static_friction=0.8
        dynamic_friction=0.8 viscous_friction=0.5 transition_velocity=0.2
    ObjectGroup R_hip_abd
    ObjectGroup R_hip_flex
    ObjectGroup R_hip_inrot
    ObjectGroup R_hip_exrot
    ObjectGroup R_hip_ext
    ObjectGroup R_hip_add
    ObjectGroup R_knee_bend
    ObjectGroup R_knee_ext
    ObjectGroup R_ankle_pf: members=(flex_dig_r flex_hal_r per_brev_r per_long_r soleus_r tib_post_r)
    ObjectGroup R_inverter: members=(ext_hal_r flex_dig_r flex_hal_r tib_ant_r tib_post_r)
    ObjectGroup R_ankle_df: members=(ext_dig_r ext_hal_r per_tert_r tib_ant_r)
    ObjectGroup R_everter: members=(ext_dig_r per_brev_r per_long_r per_tert_r)
    ObjectGroup L_hip_abd
    ObjectGroup L_hip_flex
    ObjectGroup L_hip_inrot
    ObjectGroup L_hip_exrot
    ObjectGroup L_hip_ext
    ObjectGroup L_hip_add
    ObjectGroup L_knee_bend
    ObjectGroup L_knee_ext
    ObjectGroup L_ankle_pf
    ObjectGroup L_inverter
    ObjectGroup L_ankle_df
    ObjectGroup L_everter
    ObjectGroup back_ext
    ObjectGroup back_rlb
    ObjectGroup back_introt
    ObjectGroup back_llb
    ObjectGroup back_extrot
    ObjectGroup back_flex
  ContactGeometrySet:
    ContactHalfSpace floor: socket_frame=/ground location=(0 0 0) orientation=(0 0 -1.570796)
    ContactSphere s1_r: socket_frame=/bodyset/calcn_r location=(-0.00042152 0.006922918 -0.0049972) radius=0.032
    ContactSphere s2_r: socket_frame=/bodyset/calcn_r location=(0.06 0.01192292 0.020001) radius=0.032
    ContactSphere s3_r: socket_frame=/bodyset/forefoot_r location=(0.06397017 -0.01140601 0.02274865) radius=0.023
    ContactSphere s4_r: socket_frame=/bodyset/forefoot_r location=(0.06397017 -0.01140601 -0.008434048) radius=0.021
