# OpenSim document version 40000
Model subject1_withMTJ_locked_scaled_default:
  gravity: 0 -9.80665 0
  length_units: meters
  force_units: N
  credits:
    Delp S.L., Loan J.P., Hoy M.G., Zajac F.E., Topp E.L., Rosen J.M., Thelen D.G., Anderson F.C., Seth A., Hamner S.R.
  publications:
    Notes: 3D, 23 DOF gait model created by D.G. Thelen, Univ. of Wisconsin-Madison, and Samuel Hamner, Ajay Seth, Frank C. Anderson, and Scott L. Delp, Stanford University. Lower extremity joint defintions based on Delp et al. (1990). Low back joint and anthropometry based on Anderson and Pandy (1999, 2001). Planar knee model of Yamaguchi and Zajac (1989). Seth removed the patella to avoid kinematic constraints; insertions of the quadrucepts are handled with moving points in the tibia frame. Hamner added arms adapted from Holzbaur et al., 2005. Hamner, S.R., Seth, A, Delp, S.L.: Muscle contributions to propulsion and support during running. Journal of Biomechanics, 2010. Delp, S.L., Loan, J.P., Hoy, M.G., Zajac, F.E., Topp E.L., Rosen, J.M.: An interactive graphics-based model of the lower extremity to study orthopaedic surgical procedures, IEEE Transactions on Biomedical Engineering, vol. 37, pp. 757-767, 1990. Yamaguchi G.T., Zajac F.E.: A planar model of the knee joint to characterize the knee extensor mechanism." J . Biomech. vol. 21. pp. 1-10. 1989. Anderson F.C., Pandy M.G.: A dynamic optimization solution for vertical jumping in three dimensions. Computer Methods in Biomechanics and Biomedical Engineering 2:201-231, 1999. Anderson F.C., Pandy M.G.: Dynamic optimization of human walking. Journal of Biomechanical Engineering 123:381-390, 2001. Holzbaur, KR, WM Murray and SL Delp, 2005. A model of the upper extremity for simulating musculoskeletal surgery and analyzing neuromuscular control. Ann Biomed Eng 33(6): 829-840.
  Ground
  BodySet:
    Body tibia_r: mass=3.059089 [kg] mass_center=(0 -0.1806365 0) inertia=(0.03892918 0.003941208 0.03892918 0 0 0)
        meshes=(tibia_r.vtp fibula_r.vtp)
    Body talus_r: mass=0.08146422 mass_center=(0 0 0) inertia=(0.0006295363 0.0007461013 0.0006295363 0 0 0)
        meshes=talus_rv.vtp
    Body calcn_r: mass=0.4352488 mass_center=(0.03458778 0.004621901 -0.003895443)
        inertia=(0.00022101 0 0.00022101 0 0 0) meshes=calcaneous_rv.vtp
    Body midfoot_r: mass=0.2100081 mass_center=(0.01351817 -0.003936492 -0.002291837)
        inertia=(0.0001184862 0 0.0001184862 0 0 0) meshes=model_r_midfoot.stl
    Body forefoot_r: mass=0.3545774 mass_center=(0.03012085 -0.005034091 -0.0004181573)
        inertia=(0.0004200073 0.0005493884 0.0004200073 0 0 0) meshes=model_r_forefoot.stl
      WrapCylinder MetatarsalHead_r: translation=(0.06000578 -0.0102399 0.002898557) quadrant=-y radius=0.0085946
          length=0.07073915
    Body toes_r: mass=0.1949199 mass_center=(0.03432518 0.004361176 -0.01768479)
        inertia=(6.958513e-5 0.0001376718 0.0001376718 0 0 0) meshes=model_r_toes.stl
  JointSet:
    CustomJoint ground_tibia: socket_parent_frame=ground_offset socket_child_frame=tibia_offset
      Coordinate tibia_tilt: default_value=0 range=(-1.570796 1.570796) clamped=true
      Coordinate tibia_list: default_value=0 range=(-1.570796 1.570796) clamped=true
      Coordinate tibia_rotation: default_value=0 range=(-1.570796 1.570796) clamped=true
      Coordinate tibia_tx: default_value=0 range=(-5 5) clamped=true
      Coordinate tibia_ty: default_value=0 range=(-1 2) clamped=true
      Coordinate tibia_tz: default_value=0 range=(-3 3) clamped=true
      PhysicalOffsetFrame ground_offset: socket_parent=/ground translation=(0 0 0) [meters]
      PhysicalOffsetFrame tibia_offset: socket_parent=/bodyset/tibia_r translation=(0 0 0)
      SpatialTransform:
        TransformAxis rotation1: coordinates=tibia_tilt axis=(0 0 1) LinearFunction(coefficients=1 0)
        TransformAxis rotation2: coordinates=tibia_list axis=(1 0 0) LinearFunction(coefficients=1 0)
        TransformAxis rotation3: coordinates=tibia_rotation axis=(0 1 0) LinearFunction(coefficients=1 0)
        TransformAxis translation1: coordinates=tibia_tx axis=(1 0 0) LinearFunction(coefficients=1 0)
        TransformAxis translation2: coordinates=tibia_ty axis=(0 1 0) LinearFunction(coefficients=1 0)
        TransformAxis translation3: coordinates=tibia_tz axis=(0 0 1) LinearFunction(coefficients=1 0)
    CustomJoint ankle_r: socket_parent_frame=tibia_r_offset socket_child_frame=talus_r_offset
      Coordinate ankle_angle_r: default_value=0 range=(-1.570796 1.570796) clamped=true
      PhysicalOffsetFrame tibia_r_offset: socket_parent=/bodyset/tibia_r translation=(0 -0.4160348 0)
      PhysicalOffsetFrame talus_r_offset: socket_parent=/bodyset/talus_r translation=(0 0 0)
      SpatialTransform: axes_held_at_zero=(rotation2 rotation3 translation1 translation2 translation3)
        TransformAxis rotation1: coordinates=ankle_angle_r axis=(-0.1050135 -0.1740224 0.9791263)
            LinearFunction(coefficients=1 0)
    CustomJoint subtalar_r: socket_parent_frame=talus_r_offset socket_child_frame=calcn_r_offset
      Coordinate subtalar_angle_r: default_value=0 range=(-1.570796 1.570796) clamped=true
      PhysicalOffsetFrame talus_r_offset: socket_parent=/bodyset/talus_r
          translation=(-0.04257672 -0.03689518 0.006963158)
      PhysicalOffsetFrame calcn_r_offset: socket_parent=/bodyset/calcn_r translation=(0 0 0)
      SpatialTransform: axes_held_at_zero=(rotation2 rotation3 translation1 translation2 translation3)
        TransformAxis rotation1: coordinates=subtalar_angle_r axis=(0.7871796 0.6047475 -0.1209495)
            LinearFunction(coefficients=1 0)
    CustomJoint midtarsal_r: socket_parent_frame=calcn_r_offset socket_child_frame=midfoot_r_offset
      Coordinate mtj_angle_r: default_value=0 range=(-1.570796 1.570796) clamped=false
      PhysicalOffsetFrame calcn_r_offset: socket_parent=/bodyset/calcn_r translation=(0.0748165 0.01796057 -0.00655048)
      PhysicalOffsetFrame midfoot_r_offset: socket_parent=/bodyset/midfoot_r translation=(0 0 0)
      SpatialTransform: axes_held_at_zero=(rotation2 rotation3 translation1 translation2 translation3)
        TransformAxis rotation1: coordinates=mtj_angle_r axis=(0.020132 -0.30093 0.95344)
            LinearFunction(coefficients=1 0)
    WeldJoint tarsometatarsal_r: socket_parent_frame=midfoot_r_offset socket_child_frame=forefoot_r_offset
      PhysicalOffsetFrame midfoot_r_offset: socket_parent=/bodyset/midfoot_r
          translation=(0.02228667 -0.009589135 0.00462051)
      PhysicalOffsetFrame forefoot_r_offset: socket_parent=/bodyset/forefoot_r translation=(0 0 0)
    PinJoint mtp_r: socket_parent_frame=forefoot_r_offset socket_child_frame=toes_r_offset
      Coordinate mtp_angle_r: default_value=0 range=(-1.570796 1.570796) clamped=false
      PhysicalOffsetFrame forefoot_r_offset: socket_parent=/bodyset/forefoot_r
          translation=(0.06000578 -0.0102399 0.002898557)
      PhysicalOffsetFrame toes_r_offset: socket_parent=/bodyset/toes_r translation=(0 0 0)
  ForceSet:
    Thelen2003Muscle [values shared by the 10 below unless stated]: FmaxTendonStrain=0.033 FmaxMuscleStrain=0.6
        KshapeActive=0.5 KshapePassive=4 Af=0.3 Flen=1.8 activation_time_constant=0.01 [seconds]
        deactivation_time_constant=0.04 [seconds]
    Thelen2003Muscle soleus_r: max_isometric_force=3549 optimal_fiber_length=0.04809358 tendon_slack_length=0.2404679
        pennation_angle_at_optimal=0.4363323 [radians]
      PathPoint P1: tibia_r (-0.002322659 -0.1483212 0.006871199)
      PathPoint P2: calcn_r (0 0.02726462 -0.004659689)
    Thelen2003Muscle tib_post_r: max_isometric_force=1588 optimal_fiber_length=0.02962538 tendon_slack_length=0.2962538
        pennation_angle_at_optimal=0.2094395
      PathPoint P1: tibia_r (-0.00909708 -0.1304221 0.001838771)
      PathPoint P2: tibia_r (-0.01393595 -0.3919435 -0.02216203)
      PathPoint P3: calcn_r (0.03640454 0.02937543 -0.02514474)
      PathPoint P4: midfoot_r (-0.007420093 -0.003976462 -0.01815466)
    Thelen2003Muscle flex_dig_r: max_isometric_force=310 optimal_fiber_length=0.03140829 tendon_slack_length=0.3695092
        pennation_angle_at_optimal=0.1221731
      PathPoint P1: tibia_r (-0.008032528 -0.1979552 -0.001741994)
      PathPoint P2: tibia_r (-0.01490373 -0.3919435 -0.01896838)
      PathPoint P3: calcn_r (0.03806326 0.02770437 -0.02461722)
      PathPoint P4: midfoot_r (-0.01300736 -0.002481305 -0.01657213)
      PathPoint P5: forefoot_r (0.04764197 -0.01549542 0.01212853)
      PathPoint P6: toes_r (-0.00165872 -0.006860129 0.01292404)
      PathPoint P7: toes_r (0.0248808 -0.006244477 0.01890251)
      PathPoint P8: toes_r (0.03849976 -0.005277023 0.02127632)
    Thelen2003Muscle flex_hal_r: max_isometric_force=322 optimal_fiber_length=0.03955197 tendon_slack_length=0.349529
        pennation_angle_at_optimal=0.1745329
      PathPoint P1: tibia_r (-0.007645418 -0.2258198 0.0236137)
      PathPoint P2: tibia_r (-0.0180006 -0.3946526 -0.01683928)
      PathPoint P3: calcn_r (0.03265059 0.0242743 -0.0211884)
      PathPoint P4: midfoot_r (0.01580199 -0.01197995 -0.0159567)
      PathPoint P5: forefoot_r (0.05357844 -0.01303281 -0.02172015)
      PathPoint P6: toes_r (0.01353166 -0.005628824 -0.02329844)
      PathPoint P7: toes_r (0.04906319 -0.008970939 -0.01591328)
    Thelen2003Muscle tib_ant_r: max_isometric_force=905 optimal_fiber_length=0.09319035 tendon_slack_length=0.2120556
        pennation_angle_at_optimal=0.08726646
      PathPoint P1: tibia_r (0.01732316 -0.1571257 0.01112941)
      PathPoint P2: tibia_r (0.03183978 -0.3822683 -0.01712961)
      PathPoint P3: midfoot_r (0.02697652 -0.002305405 -0.02026471)
    Thelen2003Muscle per_brev_r: max_isometric_force=435 optimal_fiber_length=0.04761002 tendon_slack_length=0.1533043
        pennation_angle_at_optimal=0.08726646
      PathPoint P1: tibia_r (-0.006774421 -0.2560065 0.03145267)
      PathPoint P2: tibia_r (-0.01916193 -0.4048116 0.02738802)
      PathPoint P3: tibia_r (-0.01393595 -0.4155511 0.02796868)
      PathPoint P4: calcn_r (0.04111879 0.0237466 0.02048505)
      PathPoint P5: forefoot_r (-0.03800036 0.0108897 0.03208607)
    Thelen2003Muscle per_long_r: max_isometric_force=943 optimal_fiber_length=0.0461568 tendon_slack_length=0.3249816
        pennation_angle_at_optimal=0.1745329
      PathPoint P1: tibia_r (0.0004838872 -0.1517076 0.03503344)
      PathPoint P2: tibia_r (-0.02003293 -0.4068433 0.02767835)
      PathPoint P3: tibia_r (-0.01567795 -0.4178731 0.02796868)
      PathPoint P4: calcn_r (0.03823786 0.02022859 0.01943002)
      PathPoint P5: midfoot_r (-0.01536449 -0.008637832 0.03151938)
      PathPoint P6: midfoot_r (-0.0004360092 -0.011892 0.01692488)
      PathPoint P7: forefoot_r (0.007919991 -0.0008956547 -0.01424706)
    Thelen2003Muscle per_tert_r: max_isometric_force=180 optimal_fiber_length=0.07476072 tendon_slack_length=0.09463382
        pennation_angle_at_optimal=0.2268928
      PathPoint P1: tibia_r (0.0009677745 -0.2712934 0.02235559)
      PathPoint P2: tibia_r (0.02216203 -0.393685 0.01538761)
      PathPoint P3: forefoot_r (-0.02228617 0.01168125 0.02821765)
    Thelen2003Muscle ext_dig_r: max_isometric_force=512 optimal_fiber_length=0.09522977 tendon_slack_length=0.3221007
        pennation_angle_at_optimal=0.1396263
      PathPoint P1: tibia_r (0.003096878 -0.1336149 0.02671057)
      PathPoint P2: tibia_r (0.02796868 -0.3876864 0.006967976)
      PathPoint P3: midfoot_r (0.005675064 0.01616417 0.006462561)
      PathPoint P4: forefoot_r (0.04397532 -0.003534166 0.0133594)
      PathPoint P5: toes_r (0.0002619031 0.004133668 0.01345155)
      PathPoint P6: toes_r (0.03867436 -0.0003518015 0.02197966)
    Thelen2003Muscle ext_hal_r: max_isometric_force=162 optimal_fiber_length=0.1031586 tendon_slack_length=0.2834538
        pennation_angle_at_optimal=0.1047198
      PathPoint P1: tibia_r (0.001161329 -0.1709613 0.02206526)
      PathPoint P2: tibia_r (0.03154945 -0.3855578 -0.008226083)
      PathPoint P3: midfoot_r (0.009865514 0.01625212 -0.01200036)
      PathPoint P4: forefoot_r (0.01577708 0.01880523 -0.02066513)
      PathPoint P5: forefoot_r (0.05427685 0.003853666 -0.02268725)
      PathPoint P6: toes_r (0.02601571 0.003605965 -0.02154007)
      PathPoint P7: toes_r (0.04915049 0.002990313 -0.01635287)
    Ligament PlantarFascia_r: resting_length=0.1432459 pcsa_force=62.74039
      PathPoint PlantarFascia_r_P1: calcn_r (0.03134901 -0.009667273 -0.008993978)
      PathPoint PlantarFascia_r_P3: toes_r (0.01272408 -0.001678108 -0.008155466)
      PathWrap: wrap_object=MetatarsalHead_r method=hybrid range=(1 2)
      force_length_curve: SimmSpline: x=(-5 0.998 0.999 1 1.015 1.03 1.031 1.031 5)
          y=(0 0 0 0 0.312271 0.767168 0.767168 0.767168 0.767168)
    SmoothSphereHalfSpaceForce SmoothSphereHalfSpaceForce_s1_r: socket_sphere=/contactgeometryset/s1_r
        socket_half_space=/contactgeometryset/floor stiffness=10000000 [N/m^2] dissipation=2 [s/m] static_friction=0.8
        dynamic_friction=0.8 viscous_friction=0.5 transition_velocity=0.2 [m/s]
    SmoothSphereHalfSpaceForce SmoothSphereHalfSpaceForce_s2_r: socket_sphere=/contactgeometryset/s2_r
        socket_half_space=/contactgeometryset/floor stiffness=10000000 dissipation=2 static_friction=0.8
        dynamic_friction=0.8 viscous_friction=0.5 transition_velocity=0.2
    SmoothSphereHalfSpaceForce SmoothSphereHalfSpaceForce_s3_r: socket_sphere=/contactgeometryset/s3_r
        socket_half_space=/contactgeometryset/floor stiffness=10000000 dissipation=2 static_friction=0.8
        dynamic_friction=0.8 viscous_friction=0.5 transition_velocity=0.2
    SmoothSphereHalfSpaceForce SmoothSphereHalfSpaceForce_s4_r: socket_sphere=/contactgeometryset/s4_r
        socket_half_space=/contactgeometryset/floor stiffness=10000000 dissipation=2 static_friction=0.8
        dynamic_friction=0.8 viscous_friction=0.5 transition_velocity=0.2
    ObjectGroup R_hip_abd: members=(glut_max1_r glut_med1_r glut_med2_r glut_med3_r glut_min1_r glut_min2_r glut_min3_r peri_r sar_r tfl_r)
    ObjectGroup R_hip_flex: members=(add_brev_r add_long_r glut_med1_r glut_min1_r grac_r iliacus_r pect_r psoas_r rect_fem_r sar_r tfl_r)
    ObjectGroup R_hip_inrot: members=(glut_med1_r glut_min1_r iliacus_r psoas_r tfl_r)
    ObjectGroup R_hip_exrot: members=(gem_r glut_med3_r glut_min3_r peri_r quad_fem_r)
    ObjectGroup R_hip_ext: members=(add_long_r add_mag1_r add_mag2_r add_mag3_r bifemlh_r glut_max1_r glut_max2_r glut_max3_r glut_med3_r glut_min3_r semimem_r semiten_r)
    ObjectGroup R_hip_add: members=(add_brev_r add_long_r add_mag1_r add_mag2_r add_mag3_r bifemlh_r grac_r pect_r semimem_r semiten_r)
    ObjectGroup R_knee_bend: members=(bifemlh_r bifemsh_r grac_r lat_gas_r med_gas_r sar_r semimem_r semiten_r)
    ObjectGroup R_knee_ext: members=(rect_fem_r vas_int_r vas_lat_r vas_med_r)
    ObjectGroup R_ankle_pf: members=(flex_dig_r flex_hal_r lat_gas_r med_gas_r per_brev_r per_long_r soleus_r tib_post_r)
    ObjectGroup R_inverter: members=(ext_hal_r flex_dig_r flex_hal_r tib_ant_r tib_post_r)
    ObjectGroup R_ankle_df: members=(ext_dig_r ext_hal_r per_tert_r tib_ant_r)
    ObjectGroup R_everter: members=(ext_dig_r per_brev_r per_long_r per_tert_r)
    ObjectGroup L_hip_abd: members=(glut_max1_l glut_med1_l glut_med2_l glut_med3_l glut_min1_l glut_min2_l glut_min3_l peri_l sar_l tfl_l)
    ObjectGroup L_hip_flex: members=(add_brev_l add_long_l glut_med1_l glut_min1_l grac_l iliacus_l pect_l psoas_l rect_fem_l sar_l tfl_l)
    ObjectGroup L_hip_inrot: members=(glut_med1_l glut_min1_l iliacus_l psoas_l tfl_l)
    ObjectGroup L_hip_exrot: members=(gem_l glut_med3_l glut_min3_l peri_l quad_fem_l)
    ObjectGroup L_hip_ext: members=(add_long_l add_mag1_l add_mag2_l add_mag3_l bifemlh_l glut_max1_l glut_max2_l glut_max3_l glut_med3_l glut_min3_l semimem_l semiten_l)
    ObjectGroup L_hip_add: members=(add_brev_l add_long_l add_mag1_l add_mag2_l add_mag3_l bifemlh_l grac_l pect_l semimem_l semiten_l)
    ObjectGroup L_knee_bend: members=(bifemlh_l bifemsh_l grac_l lat_gas_l med_gas_l sar_l semimem_l semiten_l)
    ObjectGroup L_knee_ext: members=(rect_fem_l vas_int_l vas_lat_l vas_med_l)
    ObjectGroup L_ankle_pf: members=(flex_dig_l flex_hal_l lat_gas_l med_gas_l per_brev_l per_long_l soleus_l tib_post_l)
    ObjectGroup L_inverter: members=(ext_hal_l flex_dig_l flex_hal_l tib_ant_l tib_post_l)
    ObjectGroup L_ankle_df: members=(ext_dig_l ext_hal_l per_tert_l tib_ant_l)
    ObjectGroup L_everter: members=(ext_dig_l per_brev_l per_long_l per_tert_l)
    ObjectGroup back_ext: members=(ercspn_l ercspn_r)
    ObjectGroup back_rlb: members=(ercspn_r extobl_r intobl_r)
    ObjectGroup back_introt: members=(ercspn_r extobl_l intobl_r)
    ObjectGroup back_llb: members=(ercspn_l extobl_l intobl_l)
    ObjectGroup back_extrot: members=(ercspn_l extobl_r intobl_l)
    ObjectGroup back_flex: members=(extobl_l extobl_r intobl_l intobl_r)
  ContactGeometrySet:
    ContactHalfSpace floor: socket_frame=/ground location=(0 0 0) orientation=(0 0 -1.570796)
    ContactSphere s1_r: socket_frame=/bodyset/calcn_r location=(-0.00042152 0.006922918 -0.0049972) radius=0.032
    ContactSphere s2_r: socket_frame=/bodyset/calcn_r location=(0.06 0.01192292 0.020001) radius=0.032
    ContactSphere s3_r: socket_frame=/bodyset/forefoot_r location=(0.06397017 -0.005 0.02274865) radius=0.023
    ContactSphere s4_r: socket_frame=/bodyset/forefoot_r location=(0.06397017 -0.005 -0.008434048) radius=0.021
