# OpenSim document version 40000
AnalyzeTool dummy_motion:
  model_file: C:\Users\u0150099\Documents\master_thesis\3dpredictsim\OpenSimModel\subject1\Fal_s1_mtjc3_FK_sc_FDB2_MTc5_cspx10_oy3.osim
  replace_force_set: false
  results_directory: C:\Users\u0150099\Documents\master_thesis\3dpredictsim\Polynomials\Fal_s1_mtjc3_FK_sc_FDB2_MTc5\MuscleAnalysis
  output_precision: 8
  initial_time: 0.01
  final_time: 50
  solve_for_equilibrium_for_auxiliary_states: false
  maximum_number_of_integrator_steps: 20000
  maximum_integrator_step_size: 1
  minimum_integrator_step_size: 1e-8
  integrator_error_tolerance: 1e-5
  coordinates_file: C:\Users\u0150099\Documents\master_thesis\3dpredictsim\Polynomials\Fal_s1_mtjc3_FK_sc_FDB2_MTc5\dummy_motion.mot
  lowpass_cutoff_frequency_for_coordinates: -1
  AnalysisSet Analyses:
    MuscleAnalysis: start_time=0.01 end_time=50 step_interval=1 in_degrees=true muscle_list=all
        moment_arm_coordinate_list=(hip_flexion_r hip_adduction_r hip_rotation_r knee_angle_r ankle_angle_r subtalar_angle_r mtj_angle_r mtp_angle_r lumbar_extension lumbar_bending lumbar_rotation)
        compute_moments=true
